<?xml version="1.0"?>
<?xml-stylesheet type="text/xsl" href="/JSBSim.xsl"?>
<fdm_config name="Mirage2000" version="2.0" release="DEVELOPMENT"
   xmlns:xsi="http://www.w3.org/2001/XMLSchema-instance"
   xsi:noNamespaceSchemaLocation="http://jsbsim.sourceforge.net/JSBSim.xsd">

    <fileheader>
        <author>Richard Harrison</author>
        <filecreationdate>2018-04-05</filecreationdate>
        <version>1.0</version>
        <copyright>Copyright (C) 2017 Richard Harrison, All rights reserved</copyright>
        <description>Dassault Mirage2000 Aerodynamic data built from vspaero; CG (7.898, 0, 0.508)M, 2018-04-05 20:30</description>
        <note>Built using VSPAERO. VSPAero control sub surfaces are used for the elevons, slats and rudder. These are all then processed and this data is built from the results (together with the -stab to get the derivatives)</note>
        <note>Aircraft origin for measurements is the nose</note>
        <note>VSPAERO notes: Rudder deflection is LE right. Elevator is TE down.</note>
        <note>Cl max 1.6</note>
        <note>Built with AeroTool 1.0.0.0: Options: AeroDetail=Full, Gear, Flaps, WakeIterations=3</note>
        <limitation></limitation>
        <reference
            refID="ZDAT/AED/2017/09-08"
            author="Richard Harrison, rjh@zaretto.com"
            title="Mirage 2000 Aerodynamic data built from vspaero; CG (7.898, 0, 0.508)M"
            date="September, 2017"
            URL="http://www.zaretto.com/sites/zaretto.com/files/Mirage2000-data-data/rjh-zaretto-Mirage2000-aerodynamic-data-vspaero.pdf"
        />
        <reference
            refID="VSPAERO"
            author="Brandon Litherland"
            title="Using VSPAERO"
            date=" 2015/07/01 06:56"
            URL="http://www.openvsp.org/wiki/doku.php?id=vspaerotutorial"
        />
    </fileheader>
<metrics>
  <wingarea unit="M2">41.038</wingarea>
  <wing_incidence unit="DEG">0</wing_incidence>
  <wingspan unit="M">9.13</wingspan>
  <chord unit="M">4.495</chord>
  <location unit="IN" name="EYEPOINT">
    <x>197</x>
    <y>0</y>
    <z>-3.94</z>
  </location>
  <location unit="IN" name="VRP">
    <x>200</x>
    <y>0</y>
    <z>0</z>
  </location>
  <location unit="M" name="AERORP">
    <x>7.898</x>
    <y>0</y>
    <z>0.508</z>
  </location>
</metrics>

<mass_balance>
  <location unit="M" name="CG">
    <x>7.898</x>
    <y>0</y>
    <z>0.508</z>
  </location>
  <ixx unit="KG*M2">6262</ixx>
  <iyy unit="KG*M2">75686</iyy>
  <izz unit="KG*M2">78802</izz>
  <ixz unit="KG*M2">2141</ixz>
  <emptywt unit="LBS">28000</emptywt>
</mass_balance>

<ground_reactions>
  <contact type="BOGEY" name="NOSE_LG">
    <location unit="M">
      <x>3.5</x>
      <y>0</y>
      <z>-2.7261</z>
    </location>
    <static_friction>1.0</static_friction>
    <dynamic_friction>0.5</dynamic_friction>
    <rolling_friction>0.02</rolling_friction>
    <spring_coeff unit="LBS/FT">25200</spring_coeff>
    <damping_coeff unit="LBS/FT/SEC">1400</damping_coeff>
    <max_steer unit="DEG">35</max_steer>
    <!--0: NOSE_LG-->
    <brake_group>NOSE</brake_group>
    <retractable>1</retractable>
  </contact>
  <contact type="BOGEY" name="LEFT_MLG">
    <location unit="M">
      <x>8.255</x>
      <y>-1.631</y>
      <z>-2.65</z>
    </location>
    <static_friction>1.0</static_friction>
    <dynamic_friction>0.5</dynamic_friction>
    <rolling_friction>0.02</rolling_friction>
    <spring_coeff unit="LBS/FT">25200</spring_coeff>
    <damping_coeff unit="LBS/FT/SEC">1400</damping_coeff>
    <max_steer unit="DEG">0</max_steer>
    <!--1: LEFT_MLG-->
    <brake_group>LEFT</brake_group>
    <retractable>1</retractable>
  </contact>
  <contact type="BOGEY" name="RIGHT_MLG">
    <location unit="M">
      <x>8.255</x>
      <y>1.631</y>
      <z>-2.65</z>
    </location>
    <static_friction>1.0</static_friction>
    <dynamic_friction>0.5</dynamic_friction>
    <rolling_friction>0.02</rolling_friction>
    <spring_coeff unit="LBS/FT">25200</spring_coeff>
    <damping_coeff unit="LBS/FT/SEC">1400</damping_coeff>
    <max_steer unit="DEG">0</max_steer>
    <!--2: RIGHT_MLG-->
    <brake_group>RIGHT</brake_group>
    <retractable>1</retractable>
  </contact>
  <contact type="STRUCTURE" name="LEFT_WING_TIP">
    <!--3: LEFT_WING_TIP-->
    <location unit="M">
      <x>12.09</x>
      <y>-6.9074</y>
      <z>-0.388</z>
    </location>
    <static_friction>1.2</static_friction>
    <dynamic_friction>1.212</dynamic_friction>
    <rolling_friction>1.413</rolling_friction>
    <spring_coeff unit="LBS/FT">25200</spring_coeff>
    <damping_coeff unit="LBS/FT/SEC">5600</damping_coeff>
  </contact>
  <contact type="STRUCTURE" name="RIGHT_WING_TIP">
    <!--4: RIGHT_WING_TIP-->
    <location unit="M">
      <x>12.09</x>
      <y>6.9074</y>
      <z>-0.388</z>
    </location>
    <static_friction>1.2</static_friction>
    <dynamic_friction>1.212</dynamic_friction>
    <rolling_friction>1.413</rolling_friction>
    <spring_coeff unit="LBS/FT">25200</spring_coeff>
    <damping_coeff unit="LBS/FT/SEC">5600</damping_coeff>
  </contact>
  <contact type="STRUCTURE" name="CANOPY">
    <!--5: CANOPY-->
    <location unit="M">
      <x>5.08</x>
      <y>0</y>
      <z>1.338</z>
    </location>
    <static_friction>1.2</static_friction>
    <dynamic_friction>1.212</dynamic_friction>
    <rolling_friction>1.413</rolling_friction>
    <spring_coeff unit="LBS/FT">25200</spring_coeff>
    <damping_coeff unit="LBS/FT/SEC">5600</damping_coeff>
  </contact>
  <contact type="STRUCTURE" name="RADOME_FRONT">
    <!--6: RADOME_FRONT-->
    <location unit="M">
      <x>0</x>
      <y>0</y>
      <z>-0.508</z>
    </location>
    <static_friction>1.2</static_friction>
    <dynamic_friction>1.212</dynamic_friction>
    <rolling_friction>1.413</rolling_friction>
    <spring_coeff unit="LBS/FT">25200</spring_coeff>
    <damping_coeff unit="LBS/FT/SEC">5600</damping_coeff>
  </contact>
  <contact type="STRUCTURE" name="VERTICAL_TAIL">
    <!--7: VERTICAL_TAIL-->
    <location unit="M">
      <x>18</x>
      <y>0</y>
      <z>2.308</z>
    </location>
    <static_friction>1.2</static_friction>
    <dynamic_friction>1.212</dynamic_friction>
    <rolling_friction>1.413</rolling_friction>
    <spring_coeff unit="LBS/FT">25200</spring_coeff>
    <damping_coeff unit="LBS/FT/SEC">5600</damping_coeff>
  </contact>
  <contact type="STRUCTURE" name="REAR_BODY_LEFT">
    <!--8: REAR_BODY_LEFT-->
    <location unit="M">
      <x>16.53</x>
      <y>0.94</y>
      <z>-0.315</z>
    </location>
    <static_friction>1.2</static_friction>
    <dynamic_friction>1.212</dynamic_friction>
    <rolling_friction>1.413</rolling_friction>
    <spring_coeff unit="LBS/FT">25200</spring_coeff>
    <damping_coeff unit="LBS/FT/SEC">5600</damping_coeff>
  </contact>
  <contact type="STRUCTURE" name="REAR_BODY_RIGHT">
    <!--9: REAR_BODY_RIGHT-->
    <location unit="M">
      <x>16.53</x>
      <y>0.94</y>
      <z>-0.315</z>
    </location>
    <static_friction>1.2</static_friction>
    <dynamic_friction>1.212</dynamic_friction>
    <rolling_friction>1.413</rolling_friction>
    <spring_coeff unit="LBS/FT">25200</spring_coeff>
    <damping_coeff unit="LBS/FT/SEC">5600</damping_coeff>
  </contact>
</ground_reactions>

<propulsion>
  <engine file="SNECMA_M53-P2">
    <location unit="M">
      <x>17.448</x>
      <y>0</y>
      <z>0.508</z>
    </location>
    <orient unit="DEG">
      <roll>0</roll>
      <pitch>0</pitch>
      <yaw>0</yaw>
    </orient>
    <feed>0</feed>
    <feed>1</feed>
    <feed>2</feed>
    <feed>3</feed>
    <feed>4</feed>
    <thruster file="direct">
      <location unit="M">
        <x>17.448</x>
        <y>0</y>
        <z>0.508</z>
      </location>
      <orient unit="DEG">
        <roll>0</roll>
        <pitch>0</pitch>
        <yaw>0</yaw>
      </orient>
    </thruster>
  </engine>
  <tank number="0" type="FUEL">
    <!--0: Main Tank-->
    <location unit="M">
      <x>7.898</x>
      <y>0</y>
      <z>0.508</z>
    </location>
    <capacity unit="KG">2128</capacity>
    <standpipe unit="KG">50</standpipe>
    <contents unit="KG">2128</contents>
    <priority>4</priority>
  </tank>
  <tank number="1" type="FUEL">
    <!--1: Right Wing Tank-->
    <location unit="M">
      <x>7.898</x>
      <y>4</y>
      <z>0.108</z>
    </location>
    <capacity unit="LBS">385</capacity>
    <standpipe unit="LBS">100</standpipe>
    <contents unit="LBS">385</contents>
    <priority>3</priority>
  </tank>
  <tank number="2" type="FUEL">
    <!--2: Left Wing Tank-->
    <location unit="M">
      <x>7.898</x>
      <y>-4</y>
      <z>0.108</z>
    </location>
    <capacity unit="LBS">385</capacity>
    <standpipe unit="LBS">100</standpipe>
    <contents unit="LBS">385</contents>
    <priority>3</priority>
  </tank>
  <tank number="3" type="FUEL">
    <!--3: External Tank-->
    <location unit="M">
      <x>7.898</x>
      <y>0</y>
      <z>0.008</z>
    </location>
    <capacity unit="KG">1200</capacity>
    <standpipe unit="KG">50</standpipe>
    <contents unit="KG">1200</contents>
    <priority>2</priority>
  </tank>
  <tank number="4" type="FUEL">
    <!--4: Feed line-->
    <location unit="M">
      <x>7.898</x>
      <y>0</y>
      <z>0.508</z>
    </location>
    <capacity unit="LBS">10</capacity>
    <contents unit="LBS">10</contents>
    <priority>1</priority>
  </tank>
</propulsion>

<external_reactions>
  <force name="catapult" frame="BODY">
    <location unit="IN">
      <x>667</x>
      <y>0</y>
      <z>0</z>
    </location>
    <direction>
      <x>1</x>
      <y>0</y>
      <z>0</z>
    </direction>
  </force>
  <force name="holdback" frame="BODY">
    <location unit="IN">
      <x>667</x>
      <y>0</y>
      <z>0</z>
    </location>
    <direction>
      <x>-1</x>
      <y>0</y>
      <z>0</z>
    </direction>
  </force>
  <force name="hook" frame="BODY">
    <location unit="IN">
      <x>300</x>
      <y>0</y>
      <z>0</z>
    </location>
    <direction>
      <x>-0.9995</x>
      <y>0</y>
      <z>0.01</z>
    </direction>
  </force>
</external_reactions>

<flight_control name="Mirage2000-FCS">
       <property value="7.898">metrics/cg-x-m</property>
       <property value="0.508">metrics/cg-z-m</property>
  <channel name="extra-aero">
        <!-- need %Cg in chord for moments [Xcg - Xref)/100] -->
        <summer name="cg-x-offset-chord-in">
            <input> inertia/cg-x-in</input>
            <input> -metrics/aero-rp-x-in</input>
            <output>inertia/cg-x-offset-chord-in</output>
        </summer>

        <!-- figure out the factor for the fuel tank aero -->
        <pure_gain name="cg-x-chord-percent">
            <description>Percent offset of the CoP from the CG</description>
            <input>inertia/cg-x-offset-chord-in</input>
            <gain> -0.01</gain>
            <clipto>
                <min> -1 </min>
                <max> 1 </max>
            </clipto>
            <output> inertia/cg-x-mac-percent </output>
        </pure_gain>

        <fcs_function name="pb">
            <description>PB Denormalization</description>
            <function>
                    <product>
                        <property>aero/bi2vel</property>
                        <property>velocities/p-aero-rad_sec</property>
                    </product>
            </function>
            <output>aero/pb</output>
        </fcs_function>

        <fcs_function name="cbarq-2vo">
            <description>For denormalization</description>
            <function>
                    <product>
                        <property>aero/ci2vel</property>
                        <property>velocities/q-aero-rad_sec</property>
                    </product>
            </function>
            <output>aero/qb</output>
        </fcs_function>

        <fcs_function name="rb-2vo">
            <description>For denormalization</description>
            <function>
                <product>
                        <property>aero/bi2vel</property>
                        <property>velocities/r-aero-rad_sec</property>
                    </product>
            </function>
            <output>aero/rb</output>
        </fcs_function>


        <fcs_function name="aero-cos-alpha">
            <function>
                <product>
                    <cos>
                        <property>aero/alpha-rad</property>
                    </cos>
                </product>
            </function>
            <output>aero/cos-alpha</output>
        </fcs_function>

        <fcs_function name="aero-sin-alpha">
            <function>
                <product>
                    <sin>
                        <property>aero/alpha-rad</property>
                    </sin>
                </product>
            </function>
            <output>aero/sin-alpha</output>
        </fcs_function>
       </channel>
</flight_control>
<system file="Mirage-2000-hydraulics"/>
<system file="Mirage-2000-electrics"/>
<system file="Mirage-2000-avionics"/>
<system file="Mirage-2000-ecs"/>
<system file="Mirage-2000-fcs"/>
<aerodynamics>
    <function name="aero/c/CFXB">
    <description>BASIC DRAG</description>
    <product>
          <table>
            <independentVar lookup="row">aero/alpha-deg</independentVar>
            <tableData>
                    -10		    0.05590
                     -5		    0.02964
                     -2		    0.02224
                      0		    0.02063
                      1		    0.02081
                      2		    0.02164
                      3		    0.02310
                      4		    0.02522
                      5		    0.02800
                      6		    0.03145
                      7		    0.03558
                      8		    0.04045
                      9		    0.04601
                     10		    0.05209
                     11		    0.05875
                     12		    0.06591
                     13		    0.07318
                     14		    0.08079
                     15		    0.08855
                     16		    0.09424
                     17		    0.10077
                     18		    0.10769
                     19		    0.11513
                     20		    0.12140
                     22		    0.13533
                     24		    0.14600
                     25		    0.15165
                     28		    0.16467
                     30		    0.16946
                     35		    0.17846
                     45		    0.17664
                     50		    0.17537
                     55		    0.17593
                     60		    0.17868
            </tableData>
          </table>
       </product>
    </function>
    <function name="aero/c/CFXDED1L">
    <description>DRAG DUE TO ELEVON 1L</description>
    <product>
          <table>
            <independentVar lookup="row">aero/alpha-deg</independentVar>
            <independentVar lookup="column">aero/beta-deg</independentVar>
            <independentVar lookup="table">fcs/elevon-1L-pos-deg</independentVar>
              <tableData breakPoint="-25">
                              -10	        -5	        -2	         0	         2	         5	        10
                    -10	    0.02414	    0.02641	    0.02640	    0.02574	    0.02498	    0.02364	    0.02152
                     -5	    0.01631	    0.01894	    0.02122	    0.02145	    0.02073	    0.01959	    0.01891
                     -2	    0.01105	    0.01285	    0.01496	    0.01584	    0.01536	    0.01478	    0.01476
                      0	    0.00740	    0.00943	    0.01109	    0.01167	    0.01104	    0.01099	    0.01103
                      1	    0.00566	    0.00769	    0.00895	    0.00950	    0.00914	    0.00901	    0.00926
                      2	    0.00393	    0.00594	    0.00676	    0.00735	    0.00730	    0.00698	    0.00749
                      3	    0.00226	    0.00400	    0.00463	    0.00526	    0.00541	    0.00494	    0.00567
                      4	    0.00061	    0.00209	    0.00246	    0.00318	    0.00350	    0.00287	    0.00377
                      5	  -0.00100	  -0.00031	    0.00035	    0.00112	    0.00160	    0.00144	    0.00189
                      6	  -0.00277	  -0.00237	  -0.00178	  -0.00093	  -0.00030	  -0.00005	  -0.00005
                      7	  -0.00444	  -0.00463	  -0.00391	  -0.00299	  -0.00223	  -0.00186	  -0.00197
                      8	  -0.00654	  -0.00682	  -0.00597	  -0.00509	  -0.00426	  -0.00374	  -0.00388
                      9	  -0.00913	  -0.00905	  -0.00808	  -0.00718	  -0.00628	  -0.00556	  -0.00570
                     10	  -0.01128	  -0.01113	  -0.01005	  -0.00915	  -0.00820	  -0.00741	  -0.00737
                     11	  -0.01316	  -0.01293	  -0.01199	  -0.01106	  -0.01016	  -0.00920	  -0.00835
                     12	  -0.01493	  -0.01458	  -0.01364	  -0.01284	  -0.01197	  -0.01084	  -0.00985
                     13	  -0.01667	  -0.01596	  -0.01507	  -0.01428	  -0.01337	  -0.01219	  -0.01128
                     14	  -0.01778	  -0.01701	  -0.01630	  -0.01543	  -0.01464	  -0.01340	  -0.01224
                     15	  -0.01775	  -0.01773	  -0.01685	  -0.01653	  -0.01527	  -0.01390	  -0.01204
                     16	  -0.01775	  -0.01763	  -0.01661	  -0.01562	  -0.01521	  -0.01498	  -0.01297
                     17	  -0.01781	  -0.01663	  -0.01627	  -0.01562	  -0.01502	  -0.01388	  -0.01336
                     18	  -0.01800	  -0.01695	  -0.01630	  -0.01558	  -0.01461	  -0.01383	  -0.01347
                     19	  -0.01844	  -0.01771	  -0.01706	  -0.01626	  -0.01537	  -0.01386	  -0.01271
                     20	  -0.01978	  -0.01813	  -0.01731	  -0.01634	  -0.01514	  -0.01453	  -0.01253
                     22	  -0.02093	  -0.01880	  -0.01811	  -0.01762	  -0.01640	  -0.01529	  -0.01190
                     24	  -0.02082	  -0.01896	  -0.01843	  -0.01747	  -0.01663	  -0.01516	  -0.01236
                     25	  -0.02103	  -0.01921	  -0.01822	  -0.01764	  -0.01662	  -0.01513	  -0.01240
                     28	  -0.02136	  -0.01957	  -0.01853	  -0.01742	  -0.01641	  -0.01504	  -0.01254
                     30	  -0.02092	  -0.01882	  -0.01732	  -0.01628	  -0.01543	  -0.01415	  -0.01137
                     35	  -0.01986	  -0.01730	  -0.01628	  -0.01519	  -0.01415	  -0.01272	  -0.01036
                     45	  -0.01480	  -0.01269	  -0.01130	  -0.01057	  -0.00957	  -0.00840	  -0.00674
                     50	  -0.01233	  -0.01136	  -0.00992	  -0.00872	  -0.00802	  -0.00698	  -0.00568
                     55	  -0.01052	  -0.00921	  -0.00841	  -0.00724	  -0.00713	  -0.00655	  -0.00585
                     60	  -0.00867	  -0.00746	  -0.00699	  -0.00667	  -0.00644	  -0.00639	  -0.00608
              </tableData>
              <tableData breakPoint="-20">
                              -10	        -5	        -2	         0	         2	         5	        10
                    -10	    0.01940	    0.02134	    0.02145	    0.02110	    0.02037	    0.01921	    0.01748
                     -5	    0.01245	    0.01446	    0.01625	    0.01646	    0.01591	    0.01511	    0.01489
                     -2	    0.00799	    0.00935	    0.01096	    0.01164	    0.01130	    0.01095	    0.01098
                      0	    0.00492	    0.00646	    0.00766	    0.00812	    0.00773	    0.00775	    0.00786
                      1	    0.00346	    0.00498	    0.00588	    0.00631	    0.00613	    0.00610	    0.00638
                      2	    0.00200	    0.00351	    0.00407	    0.00451	    0.00456	    0.00440	    0.00490
                      3	    0.00059	    0.00190	    0.00229	    0.00277	    0.00294	    0.00271	    0.00338
                      4	  -0.00080	    0.00025	    0.00046	    0.00104	    0.00135	    0.00099	    0.00180
                      5	  -0.00214	  -0.00178	  -0.00130	  -0.00067	  -0.00024	  -0.00027	    0.00023
                      6	  -0.00362	  -0.00351	  -0.00308	  -0.00236	  -0.00181	  -0.00151	  -0.00138
                      7	  -0.00501	  -0.00539	  -0.00485	  -0.00406	  -0.00340	  -0.00303	  -0.00299
                      8	  -0.00681	  -0.00722	  -0.00655	  -0.00580	  -0.00508	  -0.00459	  -0.00457
                      9	  -0.00902	  -0.00908	  -0.00829	  -0.00752	  -0.00674	  -0.00609	  -0.00608
                     10	  -0.01082	  -0.01079	  -0.00990	  -0.00912	  -0.00832	  -0.00762	  -0.00744
                     11	  -0.01235	  -0.01223	  -0.01144	  -0.01066	  -0.00989	  -0.00907	  -0.00826
                     12	  -0.01378	  -0.01352	  -0.01275	  -0.01204	  -0.01132	  -0.01036	  -0.00947
                     13	  -0.01515	  -0.01457	  -0.01383	  -0.01316	  -0.01243	  -0.01139	  -0.01054
                     14	  -0.01594	  -0.01532	  -0.01476	  -0.01400	  -0.01335	  -0.01231	  -0.01128
                     15	  -0.01574	  -0.01576	  -0.01507	  -0.01484	  -0.01370	  -0.01249	  -0.01084
                     16	  -0.01552	  -0.01540	  -0.01448	  -0.01372	  -0.01343	  -0.01330	  -0.01157
                     17	  -0.01529	  -0.01425	  -0.01399	  -0.01346	  -0.01300	  -0.01205	  -0.01170
                     18	  -0.01545	  -0.01496	  -0.01451	  -0.01364	  -0.01254	  -0.01190	  -0.01174
                     19	  -0.01610	  -0.01544	  -0.01488	  -0.01429	  -0.01345	  -0.01197	  -0.01098
                     20	  -0.01716	  -0.01596	  -0.01494	  -0.01417	  -0.01310	  -0.01265	  -0.01079
                     22	  -0.01806	  -0.01623	  -0.01556	  -0.01514	  -0.01419	  -0.01320	  -0.01025
                     24	  -0.01772	  -0.01626	  -0.01583	  -0.01496	  -0.01423	  -0.01290	  -0.01056
                     25	  -0.01791	  -0.01636	  -0.01552	  -0.01498	  -0.01421	  -0.01292	  -0.01060
                     28	  -0.01796	  -0.01657	  -0.01559	  -0.01475	  -0.01391	  -0.01274	  -0.01064
                     30	  -0.01757	  -0.01590	  -0.01451	  -0.01375	  -0.01301	  -0.01199	  -0.00957
                     35	  -0.01660	  -0.01448	  -0.01345	  -0.01269	  -0.01184	  -0.01066	  -0.00870
                     45	  -0.01226	  -0.01048	  -0.00938	  -0.00874	  -0.00788	  -0.00694	  -0.00556
                     50	  -0.01007	  -0.00938	  -0.00814	  -0.00713	  -0.00655	  -0.00576	  -0.00460
                     55	  -0.00856	  -0.00749	  -0.00685	  -0.00599	  -0.00581	  -0.00533	  -0.00486
                     60	  -0.00699	  -0.00605	  -0.00560	  -0.00538	  -0.00524	  -0.00516	  -0.00493
              </tableData>
              <tableData breakPoint="-16">
                              -10	        -5	        -2	         0	         2	         5	        10
                    -10	    0.01541	    0.01703	    0.01709	    0.01676	    0.01629	    0.01541	    0.01403
                     -5	    0.00937	    0.01088	    0.01227	    0.01242	    0.01200	    0.01142	    0.01138
                     -2	    0.00566	    0.00667	    0.00788	    0.00840	    0.00816	    0.00798	    0.00804
                      0	    0.00311	    0.00426	    0.00513	    0.00548	    0.00525	    0.00532	    0.00547
                      1	    0.00191	    0.00304	    0.00367	    0.00399	    0.00393	    0.00396	    0.00425
                      2	    0.00070	    0.00181	    0.00220	    0.00251	    0.00262	    0.00257	    0.00304
                      3	  -0.00047	    0.00051	    0.00073	    0.00109	    0.00127	    0.00118	    0.00178
                      4	  -0.00160	  -0.00089	  -0.00078	  -0.00033	  -0.00004	  -0.00021	    0.00049
                      5	  -0.00270	  -0.00257	  -0.00223	  -0.00172	  -0.00134	  -0.00129	  -0.00079
                      6	  -0.00392	  -0.00399	  -0.00369	  -0.00309	  -0.00262	  -0.00231	  -0.00211
                      7	  -0.00506	  -0.00554	  -0.00514	  -0.00447	  -0.00391	  -0.00356	  -0.00343
                      8	  -0.00657	  -0.00704	  -0.00651	  -0.00589	  -0.00528	  -0.00483	  -0.00473
                      9	  -0.00844	  -0.00857	  -0.00793	  -0.00728	  -0.00663	  -0.00606	  -0.00595
                     10	  -0.00990	  -0.00994	  -0.00921	  -0.00854	  -0.00790	  -0.00729	  -0.00704
                     11	  -0.01112	  -0.01106	  -0.01042	  -0.00977	  -0.00913	  -0.00843	  -0.00770
                     12	  -0.01224	  -0.01206	  -0.01141	  -0.01082	  -0.01024	  -0.00943	  -0.00865
                     13	  -0.01325	  -0.01279	  -0.01220	  -0.01167	  -0.01108	  -0.01023	  -0.00947
                     14	  -0.01392	  -0.01342	  -0.01294	  -0.01229	  -0.01175	  -0.01087	  -0.00996
                     15	  -0.01347	  -0.01354	  -0.01297	  -0.01285	  -0.01183	  -0.01080	  -0.00982
                     16	  -0.01307	  -0.01298	  -0.01227	  -0.01160	  -0.01160	  -0.01134	  -0.00996
                     17	  -0.01271	  -0.01212	  -0.01192	  -0.01151	  -0.01087	  -0.01025	  -0.01000
                     18	  -0.01324	  -0.01274	  -0.01208	  -0.01149	  -0.01074	  -0.01005	  -0.00992
                     19	  -0.01386	  -0.01335	  -0.01297	  -0.01231	  -0.01146	  -0.01040	  -0.00918
                     20	  -0.01459	  -0.01348	  -0.01286	  -0.01218	  -0.01103	  -0.01090	  -0.00902
                     22	  -0.01515	  -0.01363	  -0.01313	  -0.01273	  -0.01195	  -0.01124	  -0.00860
                     24	  -0.01482	  -0.01358	  -0.01325	  -0.01258	  -0.01199	  -0.01079	  -0.00883
                     25	  -0.01493	  -0.01365	  -0.01296	  -0.01246	  -0.01186	  -0.01078	  -0.00905
                     28	  -0.01486	  -0.01376	  -0.01294	  -0.01225	  -0.01158	  -0.01059	  -0.00885
                     30	  -0.01450	  -0.01316	  -0.01201	  -0.01137	  -0.01077	  -0.00990	  -0.00810
                     35	  -0.01371	  -0.01189	  -0.01106	  -0.01045	  -0.00977	  -0.00877	  -0.00729
                     45	  -0.00989	  -0.00851	  -0.00771	  -0.00709	  -0.00651	  -0.00570	  -0.00451
                     50	  -0.00824	  -0.00764	  -0.00663	  -0.00571	  -0.00525	  -0.00463	  -0.00380
                     55	  -0.00688	  -0.00601	  -0.00555	  -0.00513	  -0.00465	  -0.00424	  -0.00390
                     60	  -0.00558	  -0.00485	  -0.00442	  -0.00432	  -0.00419	  -0.00410	  -0.00395
              </tableData>
              <tableData breakPoint="-15">
                              -10	        -5	        -2	         0	         2	         5	        10
                    -10	    0.01441	    0.01594	    0.01598	    0.01566	    0.01520	    0.01445	    0.01314
                     -5	    0.00862	    0.01001	    0.01130	    0.01144	    0.01105	    0.01052	    0.01052
                     -2	    0.00511	    0.00604	    0.00715	    0.00763	    0.00741	    0.00727	    0.00734
                      0	    0.00271	    0.00376	    0.00454	    0.00487	    0.00468	    0.00475	    0.00491
                      1	    0.00157	    0.00260	    0.00317	    0.00347	    0.00344	    0.00348	    0.00377
                      2	    0.00043	    0.00145	    0.00179	    0.00207	    0.00220	    0.00217	    0.00262
                      3	  -0.00068	    0.00022	    0.00041	    0.00073	    0.00091	    0.00086	    0.00143
                      4	  -0.00175	  -0.00111	  -0.00102	  -0.00060	  -0.00032	  -0.00046	    0.00022
                      5	  -0.00278	  -0.00270	  -0.00239	  -0.00191	  -0.00154	  -0.00148	  -0.00099
                      6	  -0.00393	  -0.00404	  -0.00376	  -0.00320	  -0.00275	  -0.00244	  -0.00223
                      7	  -0.00501	  -0.00550	  -0.00513	  -0.00450	  -0.00397	  -0.00362	  -0.00347
                      8	  -0.00643	  -0.00691	  -0.00642	  -0.00583	  -0.00525	  -0.00482	  -0.00470
                      9	  -0.00821	  -0.00835	  -0.00775	  -0.00714	  -0.00651	  -0.00597	  -0.00585
                     10	  -0.00958	  -0.00964	  -0.00895	  -0.00831	  -0.00770	  -0.00713	  -0.00687
                     11	  -0.01072	  -0.01067	  -0.01007	  -0.00945	  -0.00885	  -0.00819	  -0.00748
                     12	  -0.01175	  -0.01159	  -0.01100	  -0.01043	  -0.00987	  -0.00911	  -0.00836
                     13	  -0.01268	  -0.01227	  -0.01172	  -0.01122	  -0.01066	  -0.00985	  -0.00912
                     14	  -0.01333	  -0.01289	  -0.01245	  -0.01177	  -0.01125	  -0.01042	  -0.00954
                     15	  -0.01281	  -0.01289	  -0.01235	  -0.01225	  -0.01129	  -0.01029	  -0.00937
                     16	  -0.01237	  -0.01231	  -0.01163	  -0.01098	  -0.01102	  -0.01080	  -0.00948
                     17	  -0.01230	  -0.01144	  -0.01130	  -0.01084	  -0.01026	  -0.00970	  -0.00951
                     18	  -0.01252	  -0.01223	  -0.01148	  -0.01092	  -0.01020	  -0.00950	  -0.00940
                     19	  -0.01318	  -0.01270	  -0.01228	  -0.01167	  -0.01104	  -0.00986	  -0.00865
                     20	  -0.01385	  -0.01307	  -0.01219	  -0.01154	  -0.01059	  -0.01034	  -0.00852
                     22	  -0.01437	  -0.01291	  -0.01245	  -0.01207	  -0.01132	  -0.01067	  -0.00812
                     24	  -0.01404	  -0.01285	  -0.01253	  -0.01191	  -0.01137	  -0.01022	  -0.00834
                     25	  -0.01413	  -0.01292	  -0.01226	  -0.01178	  -0.01123	  -0.01022	  -0.00856
                     28	  -0.01403	  -0.01301	  -0.01222	  -0.01150	  -0.01096	  -0.01001	  -0.00848
                     30	  -0.01369	  -0.01239	  -0.01134	  -0.01075	  -0.01018	  -0.00935	  -0.00765
                     35	  -0.01295	  -0.01119	  -0.01042	  -0.00986	  -0.00921	  -0.00829	  -0.00687
                     45	  -0.00929	  -0.00801	  -0.00725	  -0.00667	  -0.00612	  -0.00536	  -0.00424
                     50	  -0.00773	  -0.00721	  -0.00622	  -0.00534	  -0.00491	  -0.00433	  -0.00355
                     55	  -0.00645	  -0.00563	  -0.00521	  -0.00481	  -0.00435	  -0.00395	  -0.00364
                     60	  -0.00521	  -0.00452	  -0.00411	  -0.00404	  -0.00391	  -0.00387	  -0.00369
              </tableData>
              <tableData breakPoint="-10">
                              -10	        -5	        -2	         0	         2	         5	        10
                    -10	    0.00916	    0.01042	    0.01048	    0.01019	    0.00983	    0.00933	    0.00868
                     -5	    0.00510	    0.00593	    0.00673	    0.00681	    0.00657	    0.00627	    0.00637
                     -2	    0.00267	    0.00321	    0.00388	    0.00417	    0.00406	    0.00405	    0.00413
                      0	    0.00103	    0.00164	    0.00207	    0.00227	    0.00223	    0.00231	    0.00248
                      1	    0.00025	    0.00085	    0.00114	    0.00131	    0.00137	    0.00145	    0.00170
                      2	  -0.00053	    0.00005	    0.00021	    0.00036	    0.00051	    0.00056	    0.00092
                      3	  -0.00129	  -0.00078	  -0.00073	  -0.00054	  -0.00039	  -0.00033	    0.00010
                      4	  -0.00202	  -0.00171	  -0.00170	  -0.00144	  -0.00123	  -0.00122	  -0.00072
                      5	  -0.00272	  -0.00281	  -0.00264	  -0.00232	  -0.00205	  -0.00195	  -0.00154
                      6	  -0.00351	  -0.00372	  -0.00357	  -0.00319	  -0.00286	  -0.00260	  -0.00238
                      7	  -0.00424	  -0.00471	  -0.00449	  -0.00405	  -0.00368	  -0.00340	  -0.00322
                      8	  -0.00523	  -0.00567	  -0.00536	  -0.00494	  -0.00453	  -0.00421	  -0.00404
                      9	  -0.00648	  -0.00665	  -0.00625	  -0.00582	  -0.00538	  -0.00497	  -0.00482
                     10	  -0.00741	  -0.00749	  -0.00702	  -0.00656	  -0.00611	  -0.00568	  -0.00547
                     11	  -0.00812	  -0.00809	  -0.00768	  -0.00726	  -0.00684	  -0.00641	  -0.00586
                     12	  -0.00869	  -0.00865	  -0.00828	  -0.00790	  -0.00751	  -0.00700	  -0.00642
                     13	  -0.00940	  -0.00911	  -0.00873	  -0.00837	  -0.00798	  -0.00738	  -0.00683
                     14	  -0.00971	  -0.00940	  -0.00908	  -0.00862	  -0.00827	  -0.00763	  -0.00700
                     15	  -0.00894	  -0.00909	  -0.00876	  -0.00881	  -0.00805	  -0.00779	  -0.00688
                     16	  -0.00843	  -0.00873	  -0.00794	  -0.00752	  -0.00769	  -0.00770	  -0.00683
                     17	  -0.00882	  -0.00813	  -0.00801	  -0.00791	  -0.00723	  -0.00666	  -0.00669
                     18	  -0.00897	  -0.00891	  -0.00821	  -0.00797	  -0.00726	  -0.00658	  -0.00655
                     19	  -0.00966	  -0.00884	  -0.00859	  -0.00825	  -0.00787	  -0.00696	  -0.00608
                     20	  -0.00972	  -0.00935	  -0.00853	  -0.00821	  -0.00760	  -0.00725	  -0.00598
                     22	  -0.01008	  -0.00902	  -0.00872	  -0.00842	  -0.00790	  -0.00745	  -0.00592
                     24	  -0.00977	  -0.00896	  -0.00873	  -0.00827	  -0.00792	  -0.00709	  -0.00585
                     25	  -0.00979	  -0.00897	  -0.00853	  -0.00812	  -0.00779	  -0.00711	  -0.00590
                     28	  -0.00963	  -0.00888	  -0.00842	  -0.00791	  -0.00759	  -0.00692	  -0.00585
                     30	  -0.00937	  -0.00845	  -0.00777	  -0.00731	  -0.00701	  -0.00642	  -0.00523
                     35	  -0.00885	  -0.00762	  -0.00708	  -0.00666	  -0.00635	  -0.00567	  -0.00469
                     45	  -0.00620	  -0.00538	  -0.00486	  -0.00448	  -0.00409	  -0.00358	  -0.00287
                     50	  -0.00513	  -0.00453	  -0.00414	  -0.00355	  -0.00322	  -0.00286	  -0.00259
                     55	  -0.00427	  -0.00372	  -0.00351	  -0.00322	  -0.00289	  -0.00254	  -0.00239
                     60	  -0.00337	  -0.00299	  -0.00264	  -0.00265	  -0.00266	  -0.00246	  -0.00241
              </tableData>
              <tableData breakPoint="-5">
                              -10	        -5	        -2	         0	         2	         5	        10
                    -10	    0.00425	    0.00489	    0.00493	    0.00483	    0.00472	    0.00445	    0.00412
                     -5	    0.00216	    0.00252	    0.00289	    0.00291	    0.00280	    0.00270	    0.00279
                     -2	    0.00092	    0.00114	    0.00143	    0.00156	    0.00152	    0.00157	    0.00162
                      0	    0.00008	    0.00034	    0.00050	    0.00059	    0.00061	    0.00068	    0.00079
                      1	  -0.00030	  -0.00007	    0.00003	    0.00010	    0.00018	    0.00025	    0.00040
                      2	  -0.00070	  -0.00047	  -0.00043	  -0.00037	  -0.00027	  -0.00021	    0.00000
                      3	  -0.00109	  -0.00088	  -0.00091	  -0.00083	  -0.00073	  -0.00065	  -0.00041
                      4	  -0.00146	  -0.00137	  -0.00140	  -0.00127	  -0.00116	  -0.00109	  -0.00083
                      5	  -0.00181	  -0.00193	  -0.00187	  -0.00171	  -0.00156	  -0.00148	  -0.00123
                      6	  -0.00221	  -0.00239	  -0.00234	  -0.00214	  -0.00197	  -0.00180	  -0.00165
                      7	  -0.00258	  -0.00289	  -0.00280	  -0.00257	  -0.00237	  -0.00221	  -0.00208
                      8	  -0.00309	  -0.00338	  -0.00323	  -0.00301	  -0.00280	  -0.00261	  -0.00249
                      9	  -0.00375	  -0.00387	  -0.00367	  -0.00344	  -0.00321	  -0.00298	  -0.00287
                     10	  -0.00421	  -0.00424	  -0.00399	  -0.00374	  -0.00352	  -0.00331	  -0.00317
                     11	  -0.00446	  -0.00446	  -0.00430	  -0.00411	  -0.00391	  -0.00369	  -0.00334
                     12	  -0.00484	  -0.00483	  -0.00463	  -0.00442	  -0.00419	  -0.00390	  -0.00356
                     13	  -0.00511	  -0.00491	  -0.00469	  -0.00452	  -0.00434	  -0.00408	  -0.00376
                     14	  -0.00514	  -0.00504	  -0.00492	  -0.00465	  -0.00443	  -0.00410	  -0.00376
                     15	  -0.00445	  -0.00453	  -0.00440	  -0.00467	  -0.00408	  -0.00422	  -0.00363
                     16	  -0.00443	  -0.00469	  -0.00415	  -0.00401	  -0.00374	  -0.00398	  -0.00366
                     17	  -0.00478	  -0.00435	  -0.00429	  -0.00407	  -0.00378	  -0.00339	  -0.00339
                     18	  -0.00467	  -0.00468	  -0.00455	  -0.00423	  -0.00365	  -0.00347	  -0.00325
                     19	  -0.00501	  -0.00470	  -0.00460	  -0.00447	  -0.00416	  -0.00375	  -0.00291
                     20	  -0.00510	  -0.00505	  -0.00446	  -0.00416	  -0.00394	  -0.00397	  -0.00322
                     22	  -0.00524	  -0.00469	  -0.00452	  -0.00438	  -0.00408	  -0.00387	  -0.00309
                     24	  -0.00503	  -0.00461	  -0.00449	  -0.00425	  -0.00409	  -0.00365	  -0.00312
                     25	  -0.00501	  -0.00461	  -0.00439	  -0.00416	  -0.00401	  -0.00370	  -0.00301
                     28	  -0.00490	  -0.00452	  -0.00428	  -0.00403	  -0.00382	  -0.00353	  -0.00299
                     30	  -0.00475	  -0.00427	  -0.00394	  -0.00373	  -0.00353	  -0.00325	  -0.00266
                     35	  -0.00428	  -0.00381	  -0.00358	  -0.00336	  -0.00324	  -0.00288	  -0.00237
                     45	  -0.00309	  -0.00264	  -0.00241	  -0.00223	  -0.00199	  -0.00176	  -0.00138
                     50	  -0.00254	  -0.00227	  -0.00208	  -0.00189	  -0.00148	  -0.00134	  -0.00128
                     55	  -0.00210	  -0.00180	  -0.00171	  -0.00158	  -0.00134	  -0.00117	  -0.00117
                     60	  -0.00158	  -0.00146	  -0.00117	  -0.00129	  -0.00128	  -0.00117	  -0.00116
              </tableData>
              <tableData breakPoint="0">
                              -10	        -5	        -2	         0	         2	         5	        10
                    -10	    0.00000	    0.00000	    0.00000	    0.00000	    0.00000	    0.00000	    0.00000
                     -5	    0.00000	    0.00000	    0.00000	  -0.00001	    0.00000	    0.00000	    0.00000
                     -2	    0.00000	    0.00000	    0.00000	    0.00000	    0.00000	    0.00000	    0.00000
                      0	    0.00000	    0.00000	    0.00000	    0.00000	    0.00000	    0.00000	    0.00000
                      1	    0.00000	    0.00000	    0.00000	    0.00000	    0.00000	    0.00000	    0.00000
                      2	    0.00000	    0.00000	    0.00000	    0.00000	    0.00000	    0.00000	    0.00000
                      3	    0.00000	    0.00000	    0.00000	    0.00000	    0.00000	    0.00000	    0.00000
                      4	    0.00000	    0.00000	    0.00000	    0.00000	    0.00000	    0.00000	    0.00000
                      5	    0.00000	    0.00000	    0.00000	    0.00000	    0.00000	    0.00000	    0.00000
                      6	    0.00000	    0.00000	    0.00000	    0.00000	    0.00000	    0.00000	    0.00000
                      7	    0.00000	    0.00000	    0.00000	    0.00000	    0.00000	    0.00000	    0.00000
                      8	    0.00000	    0.00000	    0.00000	    0.00000	    0.00000	    0.00000	    0.00000
                      9	    0.00000	    0.00000	    0.00000	    0.00000	    0.00000	    0.00000	    0.00000
                     10	    0.00000	    0.00000	    0.00000	    0.00000	    0.00000	    0.00000	    0.00000
                     11	    0.00000	    0.00000	    0.00000	    0.00000	    0.00000	    0.00000	    0.00000
                     12	    0.00000	    0.00000	    0.00000	    0.00000	    0.00000	    0.00000	    0.00000
                     13	    0.00000	    0.00000	    0.00000	  -0.00001	    0.00000	    0.00000	    0.00000
                     14	    0.00000	    0.00000	    0.00000	    0.00000	    0.00000	    0.00000	    0.00000
                     15	    0.00000	    0.00000	    0.00000	    0.00001	    0.00000	    0.00000	    0.00000
                     16	    0.00000	    0.00000	    0.00000	    0.00000	    0.00000	    0.00000	    0.00000
                     17	    0.00000	    0.00000	    0.00000	    0.00000	    0.00000	    0.00000	    0.00000
                     18	    0.00000	    0.00000	    0.00000	    0.00000	    0.00000	    0.00000	    0.00000
                     19	    0.00000	    0.00000	    0.00000	    0.00000	    0.00000	    0.00000	    0.00000
                     20	    0.00000	    0.00000	    0.00000	    0.00000	    0.00000	    0.00000	    0.00000
                     22	    0.00000	    0.00000	    0.00000	    0.00000	    0.00000	    0.00000	    0.00000
                     24	    0.00000	    0.00000	    0.00000	    0.00000	  -0.00001	    0.00000	    0.00000
                     25	  -0.00001	    0.00000	    0.00000	  -0.00001	    0.00000	    0.00000	    0.00005
                     28	    0.00000	    0.00000	    0.00000	  -0.00002	    0.00000	    0.00000	    0.00000
                     30	    0.00000	    0.00000	    0.00000	  -0.00002	    0.00000	    0.00000	    0.00000
                     35	    0.00000	    0.00000	    0.00000	    0.00001	    0.00000	    0.00000	    0.00000
                     45	    0.00000	    0.00000	    0.00000	  -0.00001	    0.00000	    0.00000	    0.00000
                     50	    0.00000	    0.00000	    0.00000	    0.00000	    0.00000	    0.00000	    0.00001
                     55	    0.00000	    0.00000	    0.00000	    0.00000	    0.00000	    0.00001	    0.00000
                     60	    0.00000	  -0.00001	    0.00000	    0.00004	    0.00000	    0.00000	    0.00000
              </tableData>
              <tableData breakPoint="5">
                              -10	        -5	        -2	         0	         2	         5	        10
                    -10	  -0.00341	  -0.00410	  -0.00409	  -0.00399	  -0.00382	  -0.00368	  -0.00349
                     -5	  -0.00128	  -0.00151	  -0.00182	  -0.00184	  -0.00174	  -0.00169	  -0.00187
                     -2	  -0.00003	  -0.00014	  -0.00033	  -0.00041	  -0.00042	  -0.00057	  -0.00066
                      0	    0.00080	    0.00066	    0.00063	    0.00055	    0.00044	    0.00032	    0.00015
                      1	    0.00120	    0.00108	    0.00108	    0.00104	    0.00088	    0.00076	    0.00056
                      2	    0.00159	    0.00147	    0.00153	    0.00151	    0.00135	    0.00120	    0.00095
                      3	    0.00199	    0.00186	    0.00199	    0.00195	    0.00182	    0.00164	    0.00136
                      4	    0.00235	    0.00239	    0.00248	    0.00238	    0.00223	    0.00207	    0.00177
                      5	    0.00269	    0.00295	    0.00295	    0.00279	    0.00263	    0.00247	    0.00217
                      6	    0.00307	    0.00340	    0.00340	    0.00320	    0.00301	    0.00280	    0.00256
                      7	    0.00342	    0.00390	    0.00384	    0.00361	    0.00339	    0.00317	    0.00297
                      8	    0.00397	    0.00437	    0.00425	    0.00402	    0.00377	    0.00354	    0.00336
                      9	    0.00465	    0.00473	    0.00451	    0.00430	    0.00409	    0.00386	    0.00365
                     10	    0.00493	    0.00499	    0.00483	    0.00464	    0.00444	    0.00421	    0.00387
                     11	    0.00530	    0.00521	    0.00504	    0.00481	    0.00457	    0.00427	    0.00398
                     12	    0.00540	    0.00529	    0.00509	    0.00493	    0.00476	    0.00451	    0.00409
                     13	    0.00549	    0.00547	    0.00534	    0.00509	    0.00485	    0.00449	    0.00407
                     14	    0.00503	    0.00551	    0.00519	    0.00501	    0.00483	    0.00459	    0.00412
                     15	    0.00460	    0.00484	    0.00476	    0.00438	    0.00481	    0.00440	    0.00394
                     16	    0.00497	    0.00473	    0.00437	    0.00443	    0.00402	    0.00360	    0.00398
                     17	    0.00526	    0.00510	    0.00470	    0.00433	    0.00427	    0.00386	    0.00380
                     18	    0.00539	    0.00502	    0.00477	    0.00437	    0.00410	    0.00399	    0.00358
                     19	    0.00526	    0.00491	    0.00474	    0.00455	    0.00431	    0.00392	    0.00333
                     20	    0.00523	    0.00493	    0.00474	    0.00452	    0.00435	    0.00371	    0.00292
                     22	    0.00540	    0.00482	    0.00469	    0.00446	    0.00428	    0.00397	    0.00294
                     24	    0.00511	    0.00469	    0.00457	    0.00440	    0.00415	    0.00381	    0.00310
                     25	    0.00507	    0.00470	    0.00443	    0.00428	    0.00409	    0.00375	    0.00319
                     28	    0.00485	    0.00452	    0.00429	    0.00412	    0.00383	    0.00355	    0.00294
                     30	    0.00470	    0.00421	    0.00390	    0.00373	    0.00349	    0.00322	    0.00271
                     35	    0.00416	    0.00380	    0.00349	    0.00329	    0.00308	    0.00280	    0.00235
                     45	    0.00289	    0.00249	    0.00237	    0.00208	    0.00196	    0.00134	    0.00137
                     50	    0.00244	    0.00210	    0.00190	    0.00176	    0.00157	    0.00100	    0.00130
                     55	    0.00184	    0.00164	    0.00151	    0.00145	    0.00124	    0.00070	    0.00103
                     60	    0.00144	    0.00124	    0.00122	    0.00121	    0.00104	    0.00016	    0.00105
              </tableData>
              <tableData breakPoint="10">
                              -10	        -5	        -2	         0	         2	         5	        10
                    -10	  -0.00588	  -0.00713	  -0.00718	  -0.00701	  -0.00671	  -0.00639	  -0.00615
                     -5	  -0.00167	  -0.00201	  -0.00255	  -0.00256	  -0.00238	  -0.00235	  -0.00280
                     -2	    0.00080	    0.00069	    0.00040	    0.00028	    0.00024	  -0.00018	  -0.00037
                      0	    0.00244	    0.00226	    0.00232	    0.00220	    0.00189	    0.00160	    0.00123
                      1	    0.00321	    0.00309	    0.00321	    0.00316	    0.00276	    0.00247	    0.00202
                      2	    0.00398	    0.00388	    0.00407	    0.00407	    0.00369	    0.00335	    0.00280
                      3	    0.00477	    0.00463	    0.00498	    0.00494	    0.00463	    0.00420	    0.00361
                      4	    0.00546	    0.00569	    0.00594	    0.00576	    0.00544	    0.00502	    0.00439
                      5	    0.00613	    0.00680	    0.00686	    0.00655	    0.00621	    0.00583	    0.00516
                      6	    0.00688	    0.00767	    0.00773	    0.00732	    0.00692	    0.00644	    0.00592
                      7	    0.00754	    0.00863	    0.00856	    0.00808	    0.00762	    0.00715	    0.00669
                      8	    0.00863	    0.00948	    0.00920	    0.00873	    0.00830	    0.00782	    0.00736
                      9	    0.00988	    0.01013	    0.00976	    0.00933	    0.00895	    0.00847	    0.00784
                     10	    0.01040	    0.01052	    0.01020	    0.00979	    0.00934	    0.00879	    0.00808
                     11	    0.01083	    0.01067	    0.01043	    0.01004	    0.00963	    0.00908	    0.00838
                     12	    0.01105	    0.01096	    0.01055	    0.01013	    0.00973	    0.00918	    0.00833
                     13	    0.01127	    0.01097	    0.01071	    0.01029	    0.00988	    0.00925	    0.00841
                     14	    0.00949	    0.00993	    0.00991	    0.01015	    0.00972	    0.00916	    0.00826
                     15	    0.00957	    0.00947	    0.00917	    0.00857	    0.00873	    0.00894	    0.00769
                     16	    0.01003	    0.00916	    0.00925	    0.00879	    0.00834	    0.00729	    0.00763
                     17	    0.01067	    0.01013	    0.00951	    0.00893	    0.00801	    0.00749	    0.00713
                     18	    0.01063	    0.00999	    0.00965	    0.00939	    0.00833	    0.00779	    0.00686
                     19	    0.01053	    0.00990	    0.00952	    0.00920	    0.00853	    0.00769	    0.00667
                     20	    0.01045	    0.00973	    0.00984	    0.00901	    0.00867	    0.00778	    0.00632
                     22	    0.01050	    0.00958	    0.00931	    0.00882	    0.00851	    0.00786	    0.00617
                     24	    0.01014	    0.00927	    0.00904	    0.00868	    0.00824	    0.00752	    0.00623
                     25	    0.00995	    0.00923	    0.00875	    0.00843	    0.00815	    0.00744	    0.00617
                     28	    0.00950	    0.00883	    0.00843	    0.00804	    0.00755	    0.00702	    0.00579
                     30	    0.00917	    0.00823	    0.00769	    0.00728	    0.00685	    0.00632	    0.00532
                     35	    0.00803	    0.00740	    0.00676	    0.00640	    0.00592	    0.00539	    0.00453
                     45	    0.00547	    0.00474	    0.00441	    0.00391	    0.00374	    0.00304	    0.00248
                     50	    0.00452	    0.00395	    0.00370	    0.00330	    0.00296	    0.00217	    0.00236
                     55	    0.00342	    0.00306	    0.00298	    0.00270	    0.00239	    0.00174	    0.00194
                     60	    0.00254	    0.00229	    0.00178	    0.00217	    0.00198	    0.00109	    0.00189
              </tableData>
              <tableData breakPoint="13">
                              -10	        -5	        -2	         0	         2	         5	        10
                    -10	  -0.00691	  -0.00843	  -0.00850	  -0.00829	  -0.00793	  -0.00756	  -0.00730
                     -5	  -0.00151	  -0.00185	  -0.00249	  -0.00248	  -0.00227	  -0.00228	  -0.00293
                     -2	    0.00167	    0.00160	    0.00130	    0.00117	    0.00110	    0.00048	    0.00022
                      0	    0.00377	    0.00362	    0.00379	    0.00365	    0.00318	    0.00278	    0.00226
                      1	    0.00475	    0.00468	    0.00492	    0.00487	    0.00430	    0.00389	    0.00328
                      2	    0.00574	    0.00569	    0.00600	    0.00604	    0.00550	    0.00502	    0.00427
                      3	    0.00674	    0.00664	    0.00717	    0.00714	    0.00672	    0.00610	    0.00532
                      4	    0.00763	    0.00803	    0.00840	    0.00818	    0.00775	    0.00714	    0.00631
                      5	    0.00846	    0.00946	    0.00956	    0.00918	    0.00872	    0.00819	    0.00728
                      6	    0.00942	    0.01056	    0.01067	    0.01015	    0.00962	    0.00894	    0.00824
                      7	    0.01025	    0.01177	    0.01169	    0.01103	    0.01045	    0.00981	    0.00914
                      8	    0.01167	    0.01272	    0.01240	    0.01186	    0.01130	    0.01068	    0.00999
                      9	    0.01322	    0.01357	    0.01314	    0.01259	    0.01202	    0.01127	    0.01041
                     10	    0.01364	    0.01382	    0.01345	    0.01295	    0.01241	    0.01170	    0.01074
                     11	    0.01420	    0.01407	    0.01380	    0.01332	    0.01274	    0.01198	    0.01098
                     12	    0.01455	    0.01431	    0.01374	    0.01325	    0.01275	    0.01204	    0.01094
                     13	    0.01374	    0.01427	    0.01396	    0.01345	    0.01295	    0.01217	    0.01090
                     14	    0.01261	    0.01243	    0.01263	    0.01312	    0.01260	    0.01192	    0.01075
                     15	    0.01251	    0.01245	    0.01202	    0.01091	    0.01121	    0.01159	    0.01011
                     16	    0.01320	    0.01230	    0.01176	    0.01144	    0.01054	    0.00961	    0.00998
                     17	    0.01380	    0.01307	    0.01209	    0.01164	    0.01061	    0.00989	    0.00920
                     18	    0.01372	    0.01292	    0.01253	    0.01223	    0.01097	    0.01007	    0.00873
                     19	    0.01354	    0.01283	    0.01231	    0.01185	    0.01111	    0.01008	    0.00857
                     20	    0.01351	    0.01248	    0.01256	    0.01162	    0.01120	    0.01009	    0.00824
                     22	    0.01341	    0.01231	    0.01197	    0.01133	    0.01096	    0.01016	    0.00804
                     24	    0.01301	    0.01189	    0.01159	    0.01113	    0.01057	    0.00969	    0.00800
                     25	    0.01275	    0.01193	    0.01119	    0.01080	    0.01041	    0.00954	    0.00796
                     28	    0.01212	    0.01127	    0.01077	    0.01026	    0.00965	    0.00895	    0.00738
                     30	    0.01168	    0.01049	    0.00980	    0.00928	    0.00873	    0.00810	    0.00679
                     35	    0.01017	    0.00930	    0.00855	    0.00809	    0.00751	    0.00680	    0.00568
                     45	    0.00679	    0.00598	    0.00552	    0.00495	    0.00469	    0.00390	    0.00280
                     50	    0.00554	    0.00492	    0.00458	    0.00411	    0.00371	    0.00283	    0.00271
                     55	    0.00422	    0.00378	    0.00366	    0.00333	    0.00295	    0.00226	    0.00243
                     60	    0.00310	    0.00281	    0.00227	    0.00266	    0.00245	    0.00154	    0.00231
              </tableData>
              <tableData breakPoint="16">
                              -10	        -5	        -2	         0	         2	         5	        10
                    -10	  -0.00762	  -0.00936	  -0.00944	  -0.00920	  -0.00880	  -0.00838	  -0.00813
                     -5	  -0.00109	  -0.00138	  -0.00211	  -0.00207	  -0.00184	  -0.00190	  -0.00276
                     -2	    0.00277	    0.00278	    0.00249	    0.00237	    0.00226	    0.00141	    0.00107
                      0	    0.00530	    0.00522	    0.00552	    0.00537	    0.00473	    0.00420	    0.00353
                      1	    0.00648	    0.00649	    0.00688	    0.00685	    0.00609	    0.00555	    0.00476
                      2	    0.00767	    0.00771	    0.00817	    0.00826	    0.00755	    0.00691	    0.00597
                      3	    0.00889	    0.00884	    0.00958	    0.00957	    0.00903	    0.00822	    0.00723
                      4	    0.00995	    0.01055	    0.01106	    0.01082	    0.01026	    0.00946	    0.00841
                      5	    0.01094	    0.01229	    0.01245	    0.01200	    0.01142	    0.01074	    0.00958
                      6	    0.01209	    0.01359	    0.01377	    0.01314	    0.01247	    0.01160	    0.01069
                      7	    0.01308	    0.01500	    0.01489	    0.01414	    0.01344	    0.01261	    0.01172
                      8	    0.01479	    0.01611	    0.01578	    0.01511	    0.01444	    0.01359	    0.01251
                      9	    0.01636	    0.01679	    0.01633	    0.01570	    0.01504	    0.01414	    0.01304
                     10	    0.01690	    0.01714	    0.01673	    0.01616	    0.01553	    0.01467	    0.01343
                     11	    0.01759	    0.01749	    0.01708	    0.01641	    0.01572	    0.01480	    0.01353
                     12	    0.01792	    0.01753	    0.01691	    0.01634	    0.01576	    0.01490	    0.01354
                     13	    0.01654	    0.01677	    0.01702	    0.01654	    0.01589	    0.01488	    0.01335
                     14	    0.01491	    0.01524	    0.01518	    0.01504	    0.01541	    0.01462	    0.01319
                     15	    0.01517	    0.01542	    0.01451	    0.01344	    0.01330	    0.01300	    0.01229
                     16	    0.01617	    0.01515	    0.01433	    0.01384	    0.01300	    0.01180	    0.01226
                     17	    0.01671	    0.01592	    0.01509	    0.01420	    0.01320	    0.01224	    0.01095
                     18	    0.01666	    0.01577	    0.01530	    0.01473	    0.01376	    0.01234	    0.01054
                     19	    0.01645	    0.01563	    0.01496	    0.01424	    0.01359	    0.01234	    0.01007
                     20	    0.01645	    0.01511	    0.01517	    0.01412	    0.01359	    0.01243	    0.01008
                     22	    0.01619	    0.01493	    0.01449	    0.01373	    0.01329	    0.01235	    0.00988
                     24	    0.01572	    0.01440	    0.01401	    0.01346	    0.01277	    0.01172	    0.00959
                     25	    0.01540	    0.01439	    0.01351	    0.01303	    0.01254	    0.01155	    0.00967
                     28	    0.01457	    0.01354	    0.01298	    0.01235	    0.01163	    0.01076	    0.00884
                     30	    0.01402	    0.01260	    0.01177	    0.01114	    0.01050	    0.00974	    0.00818
                     35	    0.01215	    0.01142	    0.01021	    0.00962	    0.00898	    0.00814	    0.00691
                     45	    0.00803	    0.00706	    0.00652	    0.00590	    0.00555	    0.00468	    0.00341
                     50	    0.00649	    0.00578	    0.00537	    0.00483	    0.00437	    0.00342	    0.00320
                     55	    0.00491	    0.00440	    0.00425	    0.00388	    0.00345	    0.00273	    0.00286
                     60	    0.00358	    0.00323	    0.00268	    0.00307	    0.00283	    0.00192	    0.00267
              </tableData>
          </table>
       </product>
    </function>
    <function name="aero/c/CFXDED1R">
    <description>DRAG DUE TO ELEVON 1R</description>
    <product>
          <table>
            <independentVar lookup="row">aero/alpha-deg</independentVar>
            <independentVar lookup="column">aero/beta-deg</independentVar>
            <independentVar lookup="table">fcs/elevon-1R-pos-deg</independentVar>
              <tableData breakPoint="-25">
                              -10	        -5	        -2	         0	         2	         5	        10
                    -10	    0.02414	    0.02641	    0.02640	    0.02574	    0.02498	    0.02364	    0.02152
                     -5	    0.01631	    0.01894	    0.02122	    0.02145	    0.02073	    0.01959	    0.01891
                     -2	    0.01105	    0.01285	    0.01496	    0.01584	    0.01536	    0.01478	    0.01476
                      0	    0.00740	    0.00943	    0.01109	    0.01167	    0.01104	    0.01099	    0.01103
                      1	    0.00566	    0.00769	    0.00895	    0.00950	    0.00914	    0.00901	    0.00926
                      2	    0.00393	    0.00594	    0.00676	    0.00735	    0.00730	    0.00698	    0.00749
                      3	    0.00226	    0.00400	    0.00463	    0.00526	    0.00541	    0.00494	    0.00567
                      4	    0.00061	    0.00209	    0.00246	    0.00318	    0.00350	    0.00287	    0.00377
                      5	  -0.00100	  -0.00031	    0.00035	    0.00112	    0.00160	    0.00144	    0.00189
                      6	  -0.00277	  -0.00237	  -0.00178	  -0.00093	  -0.00030	  -0.00005	  -0.00005
                      7	  -0.00444	  -0.00463	  -0.00391	  -0.00299	  -0.00223	  -0.00186	  -0.00197
                      8	  -0.00654	  -0.00682	  -0.00597	  -0.00509	  -0.00426	  -0.00374	  -0.00388
                      9	  -0.00913	  -0.00905	  -0.00808	  -0.00718	  -0.00628	  -0.00556	  -0.00570
                     10	  -0.01128	  -0.01113	  -0.01005	  -0.00915	  -0.00820	  -0.00741	  -0.00737
                     11	  -0.01316	  -0.01293	  -0.01199	  -0.01106	  -0.01016	  -0.00920	  -0.00835
                     12	  -0.01493	  -0.01458	  -0.01364	  -0.01284	  -0.01197	  -0.01084	  -0.00985
                     13	  -0.01667	  -0.01596	  -0.01507	  -0.01428	  -0.01337	  -0.01219	  -0.01128
                     14	  -0.01778	  -0.01701	  -0.01630	  -0.01543	  -0.01464	  -0.01340	  -0.01224
                     15	  -0.01775	  -0.01773	  -0.01685	  -0.01653	  -0.01527	  -0.01390	  -0.01204
                     16	  -0.01775	  -0.01763	  -0.01661	  -0.01562	  -0.01521	  -0.01498	  -0.01297
                     17	  -0.01781	  -0.01663	  -0.01627	  -0.01562	  -0.01502	  -0.01388	  -0.01336
                     18	  -0.01800	  -0.01695	  -0.01630	  -0.01558	  -0.01461	  -0.01383	  -0.01347
                     19	  -0.01844	  -0.01771	  -0.01706	  -0.01626	  -0.01537	  -0.01386	  -0.01271
                     20	  -0.01978	  -0.01813	  -0.01731	  -0.01634	  -0.01514	  -0.01453	  -0.01253
                     22	  -0.02093	  -0.01880	  -0.01811	  -0.01762	  -0.01640	  -0.01529	  -0.01190
                     24	  -0.02082	  -0.01896	  -0.01843	  -0.01747	  -0.01663	  -0.01516	  -0.01236
                     25	  -0.02103	  -0.01921	  -0.01822	  -0.01764	  -0.01662	  -0.01513	  -0.01240
                     28	  -0.02136	  -0.01957	  -0.01853	  -0.01742	  -0.01641	  -0.01504	  -0.01254
                     30	  -0.02092	  -0.01882	  -0.01732	  -0.01628	  -0.01543	  -0.01415	  -0.01137
                     35	  -0.01986	  -0.01730	  -0.01628	  -0.01519	  -0.01415	  -0.01272	  -0.01036
                     45	  -0.01480	  -0.01269	  -0.01130	  -0.01057	  -0.00957	  -0.00840	  -0.00674
                     50	  -0.01233	  -0.01136	  -0.00992	  -0.00872	  -0.00802	  -0.00698	  -0.00568
                     55	  -0.01052	  -0.00921	  -0.00841	  -0.00724	  -0.00713	  -0.00655	  -0.00585
                     60	  -0.00867	  -0.00746	  -0.00699	  -0.00667	  -0.00644	  -0.00639	  -0.00608
              </tableData>
              <tableData breakPoint="-20">
                              -10	        -5	        -2	         0	         2	         5	        10
                    -10	    0.01940	    0.02134	    0.02145	    0.02110	    0.02037	    0.01921	    0.01748
                     -5	    0.01245	    0.01446	    0.01625	    0.01646	    0.01591	    0.01511	    0.01489
                     -2	    0.00799	    0.00935	    0.01096	    0.01164	    0.01130	    0.01095	    0.01098
                      0	    0.00492	    0.00646	    0.00766	    0.00812	    0.00773	    0.00775	    0.00786
                      1	    0.00346	    0.00498	    0.00588	    0.00631	    0.00613	    0.00610	    0.00638
                      2	    0.00200	    0.00351	    0.00407	    0.00451	    0.00456	    0.00440	    0.00490
                      3	    0.00059	    0.00190	    0.00229	    0.00277	    0.00294	    0.00271	    0.00338
                      4	  -0.00080	    0.00025	    0.00046	    0.00104	    0.00135	    0.00099	    0.00180
                      5	  -0.00214	  -0.00178	  -0.00130	  -0.00067	  -0.00024	  -0.00027	    0.00023
                      6	  -0.00362	  -0.00351	  -0.00308	  -0.00236	  -0.00181	  -0.00151	  -0.00138
                      7	  -0.00501	  -0.00539	  -0.00485	  -0.00406	  -0.00340	  -0.00303	  -0.00299
                      8	  -0.00681	  -0.00722	  -0.00655	  -0.00580	  -0.00508	  -0.00459	  -0.00457
                      9	  -0.00902	  -0.00908	  -0.00829	  -0.00752	  -0.00674	  -0.00609	  -0.00608
                     10	  -0.01082	  -0.01079	  -0.00990	  -0.00912	  -0.00832	  -0.00762	  -0.00744
                     11	  -0.01235	  -0.01223	  -0.01144	  -0.01066	  -0.00989	  -0.00907	  -0.00826
                     12	  -0.01378	  -0.01352	  -0.01275	  -0.01204	  -0.01132	  -0.01036	  -0.00947
                     13	  -0.01515	  -0.01457	  -0.01383	  -0.01316	  -0.01243	  -0.01139	  -0.01054
                     14	  -0.01594	  -0.01532	  -0.01476	  -0.01400	  -0.01335	  -0.01231	  -0.01128
                     15	  -0.01574	  -0.01576	  -0.01507	  -0.01484	  -0.01370	  -0.01249	  -0.01084
                     16	  -0.01552	  -0.01540	  -0.01448	  -0.01372	  -0.01343	  -0.01330	  -0.01157
                     17	  -0.01529	  -0.01425	  -0.01399	  -0.01346	  -0.01300	  -0.01205	  -0.01170
                     18	  -0.01545	  -0.01496	  -0.01451	  -0.01364	  -0.01254	  -0.01190	  -0.01174
                     19	  -0.01610	  -0.01544	  -0.01488	  -0.01429	  -0.01345	  -0.01197	  -0.01098
                     20	  -0.01716	  -0.01596	  -0.01494	  -0.01417	  -0.01310	  -0.01265	  -0.01079
                     22	  -0.01806	  -0.01623	  -0.01556	  -0.01514	  -0.01419	  -0.01320	  -0.01025
                     24	  -0.01772	  -0.01626	  -0.01583	  -0.01496	  -0.01423	  -0.01290	  -0.01056
                     25	  -0.01791	  -0.01636	  -0.01552	  -0.01498	  -0.01421	  -0.01292	  -0.01060
                     28	  -0.01796	  -0.01657	  -0.01559	  -0.01475	  -0.01391	  -0.01274	  -0.01064
                     30	  -0.01757	  -0.01590	  -0.01451	  -0.01375	  -0.01301	  -0.01199	  -0.00957
                     35	  -0.01660	  -0.01448	  -0.01345	  -0.01269	  -0.01184	  -0.01066	  -0.00870
                     45	  -0.01226	  -0.01048	  -0.00938	  -0.00874	  -0.00788	  -0.00694	  -0.00556
                     50	  -0.01007	  -0.00938	  -0.00814	  -0.00713	  -0.00655	  -0.00576	  -0.00460
                     55	  -0.00856	  -0.00749	  -0.00685	  -0.00599	  -0.00581	  -0.00533	  -0.00486
                     60	  -0.00699	  -0.00605	  -0.00560	  -0.00538	  -0.00524	  -0.00516	  -0.00493
              </tableData>
              <tableData breakPoint="-16">
                              -10	        -5	        -2	         0	         2	         5	        10
                    -10	    0.01541	    0.01703	    0.01709	    0.01676	    0.01629	    0.01541	    0.01403
                     -5	    0.00937	    0.01088	    0.01227	    0.01242	    0.01200	    0.01142	    0.01138
                     -2	    0.00566	    0.00667	    0.00788	    0.00840	    0.00816	    0.00798	    0.00804
                      0	    0.00311	    0.00426	    0.00513	    0.00548	    0.00525	    0.00532	    0.00547
                      1	    0.00191	    0.00304	    0.00367	    0.00399	    0.00393	    0.00396	    0.00425
                      2	    0.00070	    0.00181	    0.00220	    0.00251	    0.00262	    0.00257	    0.00304
                      3	  -0.00047	    0.00051	    0.00073	    0.00109	    0.00127	    0.00118	    0.00178
                      4	  -0.00160	  -0.00089	  -0.00078	  -0.00033	  -0.00004	  -0.00021	    0.00049
                      5	  -0.00270	  -0.00257	  -0.00223	  -0.00172	  -0.00134	  -0.00129	  -0.00079
                      6	  -0.00392	  -0.00399	  -0.00369	  -0.00309	  -0.00262	  -0.00231	  -0.00211
                      7	  -0.00506	  -0.00554	  -0.00514	  -0.00447	  -0.00391	  -0.00356	  -0.00343
                      8	  -0.00657	  -0.00704	  -0.00651	  -0.00589	  -0.00528	  -0.00483	  -0.00473
                      9	  -0.00844	  -0.00857	  -0.00793	  -0.00728	  -0.00663	  -0.00606	  -0.00595
                     10	  -0.00990	  -0.00994	  -0.00921	  -0.00854	  -0.00790	  -0.00729	  -0.00704
                     11	  -0.01112	  -0.01106	  -0.01042	  -0.00977	  -0.00913	  -0.00843	  -0.00770
                     12	  -0.01224	  -0.01206	  -0.01141	  -0.01082	  -0.01024	  -0.00943	  -0.00865
                     13	  -0.01325	  -0.01279	  -0.01220	  -0.01167	  -0.01108	  -0.01023	  -0.00947
                     14	  -0.01392	  -0.01342	  -0.01294	  -0.01229	  -0.01175	  -0.01087	  -0.00996
                     15	  -0.01347	  -0.01354	  -0.01297	  -0.01285	  -0.01183	  -0.01080	  -0.00982
                     16	  -0.01307	  -0.01298	  -0.01227	  -0.01160	  -0.01160	  -0.01134	  -0.00996
                     17	  -0.01271	  -0.01212	  -0.01192	  -0.01151	  -0.01087	  -0.01025	  -0.01000
                     18	  -0.01324	  -0.01274	  -0.01208	  -0.01149	  -0.01074	  -0.01005	  -0.00992
                     19	  -0.01386	  -0.01335	  -0.01297	  -0.01231	  -0.01146	  -0.01040	  -0.00918
                     20	  -0.01459	  -0.01348	  -0.01286	  -0.01218	  -0.01103	  -0.01090	  -0.00902
                     22	  -0.01515	  -0.01363	  -0.01313	  -0.01273	  -0.01195	  -0.01124	  -0.00860
                     24	  -0.01482	  -0.01358	  -0.01325	  -0.01258	  -0.01199	  -0.01079	  -0.00883
                     25	  -0.01493	  -0.01365	  -0.01296	  -0.01246	  -0.01186	  -0.01078	  -0.00905
                     28	  -0.01486	  -0.01376	  -0.01294	  -0.01225	  -0.01158	  -0.01059	  -0.00885
                     30	  -0.01450	  -0.01316	  -0.01201	  -0.01137	  -0.01077	  -0.00990	  -0.00810
                     35	  -0.01371	  -0.01189	  -0.01106	  -0.01045	  -0.00977	  -0.00877	  -0.00729
                     45	  -0.00989	  -0.00851	  -0.00771	  -0.00709	  -0.00651	  -0.00570	  -0.00451
                     50	  -0.00824	  -0.00764	  -0.00663	  -0.00571	  -0.00525	  -0.00463	  -0.00380
                     55	  -0.00688	  -0.00601	  -0.00555	  -0.00513	  -0.00465	  -0.00424	  -0.00390
                     60	  -0.00558	  -0.00485	  -0.00442	  -0.00432	  -0.00419	  -0.00410	  -0.00395
              </tableData>
              <tableData breakPoint="-15">
                              -10	        -5	        -2	         0	         2	         5	        10
                    -10	    0.01441	    0.01594	    0.01598	    0.01566	    0.01520	    0.01445	    0.01314
                      3	  -0.00068	    0.00022	    0.00041	    0.00073	    0.00091	    0.00086	    0.00143
                      9	  -0.00821	  -0.00835	  -0.00775	  -0.00714	  -0.00651	  -0.00597	  -0.00585
                     15	  -0.01281	  -0.01289	  -0.01235	  -0.01225	  -0.01129	  -0.01029	  -0.00937
                     22	  -0.01437	  -0.01291	  -0.01245	  -0.01207	  -0.01132	  -0.01067	  -0.00812
                     45	  -0.00929	  -0.00801	  -0.00725	  -0.00667	  -0.00612	  -0.00536	  -0.00424
                     60	  -0.00521	  -0.00452	  -0.00411	  -0.00404	  -0.00391	  -0.00387	  -0.00369
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              </tableData>
              <tableData breakPoint="-10">
                              -10	        -5	        -2	         0	         2	         5	        10
                    -10	    0.00916	    0.01042	    0.01048	    0.01019	    0.00983	    0.00933	    0.00868
                      3	  -0.00129	  -0.00078	  -0.00073	  -0.00054	  -0.00039	  -0.00033	    0.00010
                      9	  -0.00648	  -0.00665	  -0.00625	  -0.00582	  -0.00538	  -0.00497	  -0.00482
                     15	  -0.00894	  -0.00909	  -0.00876	  -0.00881	  -0.00805	  -0.00779	  -0.00688
                     22	  -0.01008	  -0.00902	  -0.00872	  -0.00842	  -0.00790	  -0.00745	  -0.00592
                     45	  -0.00620	  -0.00538	  -0.00486	  -0.00448	  -0.00409	  -0.00358	  -0.00287
                     60	  -0.00337	  -0.00299	  -0.00264	  -0.00265	  -0.00266	  -0.00246	  -0.00241
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              </tableData>
              <tableData breakPoint="-5">
                              -10	        -5	        -2	         0	         2	         5	        10
                    -10	    0.00425	    0.00489	    0.00493	    0.00483	    0.00472	    0.00445	    0.00412
                      3	  -0.00109	  -0.00088	  -0.00091	  -0.00083	  -0.00073	  -0.00065	  -0.00041
                      9	  -0.00375	  -0.00387	  -0.00367	  -0.00344	  -0.00321	  -0.00298	  -0.00287
                     15	  -0.00445	  -0.00453	  -0.00440	  -0.00467	  -0.00408	  -0.00422	  -0.00363
                     22	  -0.00524	  -0.00469	  -0.00452	  -0.00438	  -0.00408	  -0.00387	  -0.00309
                     45	  -0.00309	  -0.00264	  -0.00241	  -0.00223	  -0.00199	  -0.00176	  -0.00138
                     60	  -0.00158	  -0.00146	  -0.00117	  -0.00129	  -0.00128	  -0.00117	  -0.00116
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              </tableData>
              <tableData breakPoint="0">
                              -10	        -5	        -2	         0	         2	         5	        10
                    -10	    0.00000	    0.00000	    0.00000	    0.00000	    0.00000	    0.00000	    0.00000
                      3	    0.00000	    0.00000	    0.00000	    0.00000	    0.00000	    0.00000	    0.00000
                      9	    0.00000	    0.00000	    0.00000	    0.00000	    0.00000	    0.00000	    0.00000
                     15	    0.00000	    0.00000	    0.00000	    0.00001	    0.00000	    0.00000	    0.00000
                     22	    0.00000	    0.00000	    0.00000	    0.00000	    0.00000	    0.00000	    0.00000
                     45	    0.00000	    0.00000	    0.00000	  -0.00001	    0.00000	    0.00000	    0.00000
                     60	    0.00000	  -0.00001	    0.00000	    0.00004	    0.00000	    0.00000	    0.00000
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              </tableData>
              <tableData breakPoint="5">
                              -10	        -5	        -2	         0	         2	         5	        10
                    -10	  -0.00341	  -0.00410	  -0.00409	  -0.00399	  -0.00382	  -0.00368	  -0.00349
                      3	    0.00199	    0.00186	    0.00199	    0.00195	    0.00182	    0.00164	    0.00136
                      9	    0.00465	    0.00473	    0.00451	    0.00430	    0.00409	    0.00386	    0.00365
                     15	    0.00460	    0.00484	    0.00476	    0.00438	    0.00481	    0.00440	    0.00394
                     22	    0.00540	    0.00482	    0.00469	    0.00446	    0.00428	    0.00397	    0.00294
                     45	    0.00289	    0.00249	    0.00237	    0.00208	    0.00196	    0.00134	    0.00137
                     60	    0.00144	    0.00124	    0.00122	    0.00121	    0.00104	    0.00016	    0.00105
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              </tableData>
              <tableData breakPoint="10">
                              -10	        -5	        -2	         0	         2	         5	        10
                    -10	  -0.00588	  -0.00713	  -0.00718	  -0.00701	  -0.00671	  -0.00639	  -0.00615
                      3	    0.00477	    0.00463	    0.00498	    0.00494	    0.00463	    0.00420	    0.00361
                      9	    0.00988	    0.01013	    0.00976	    0.00933	    0.00895	    0.00847	    0.00784
                     15	    0.00957	    0.00947	    0.00917	    0.00857	    0.00873	    0.00894	    0.00769
                     22	    0.01050	    0.00958	    0.00931	    0.00882	    0.00851	    0.00786	    0.00617
                     45	    0.00547	    0.00474	    0.00441	    0.00391	    0.00374	    0.00304	    0.00248
                     60	    0.00254	    0.00229	    0.00178	    0.00217	    0.00198	    0.00109	    0.00189
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              </tableData>
              <tableData breakPoint="13">
                              -10	        -5	        -2	         0	         2	         5	        10
                    -10	  -0.00691	  -0.00843	  -0.00850	  -0.00829	  -0.00793	  -0.00756	  -0.00730
                      3	    0.00674	    0.00664	    0.00717	    0.00714	    0.00672	    0.00610	    0.00532
                      9	    0.01322	    0.01357	    0.01314	    0.01259	    0.01202	    0.01127	    0.01041
                     15	    0.01251	    0.01245	    0.01202	    0.01091	    0.01121	    0.01159	    0.01011
                     22	    0.01341	    0.01231	    0.01197	    0.01133	    0.01096	    0.01016	    0.00804
                     45	    0.00679	    0.00598	    0.00552	    0.00495	    0.00469	    0.00390	    0.00280
                     60	    0.00310	    0.00281	    0.00227	    0.00266	    0.00245	    0.00154	    0.00231
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              </tableData>
              <tableData breakPoint="16">
                              -10	        -5	        -2	         0	         2	         5	        10
                    -10	  -0.00762	  -0.00936	  -0.00944	  -0.00920	  -0.00880	  -0.00838	  -0.00813
                      3	    0.00889	    0.00884	    0.00958	    0.00957	    0.00903	    0.00822	    0.00723
                      9	    0.01636	    0.01679	    0.01633	    0.01570	    0.01504	    0.01414	    0.01304
                     15	    0.01517	    0.01542	    0.01451	    0.01344	    0.01330	    0.01300	    0.01229
                     22	    0.01619	    0.01493	    0.01449	    0.01373	    0.01329	    0.01235	    0.00988
                     45	    0.00803	    0.00706	    0.00652	    0.00590	    0.00555	    0.00468	    0.00341
                     60	    0.00358	    0.00323	    0.00268	    0.00307	    0.00283	    0.00192	    0.00267
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              </tableData>
          </table>
       </product>
    </function>
    <function name="aero/c/CFXDED2L">
    <description>DRAG DUE TO ELEVON 2L</description>
    <product>
          <table>
            <independentVar lookup="row">aero/alpha-deg</independentVar>
            <independentVar lookup="column">aero/beta-deg</independentVar>
            <independentVar lookup="table">fcs/elevon-2L-pos-deg</independentVar>
              <tableData breakPoint="-25">
                              -10	        -5	        -2	         0	         2	         5	        10
                    -10	    0.01654	    0.01679	    0.01676	    0.01667	    0.01666	    0.01670	    0.01707
                      3	    0.00022	    0.00184	    0.00229	    0.00281	    0.00288	    0.00218	    0.00243
                      9	  -0.00855	  -0.00733	  -0.00651	  -0.00627	  -0.00605	  -0.00589	  -0.00639
                     15	  -0.01489	  -0.01464	  -0.01423	  -0.01437	  -0.01361	  -0.01349	  -0.01298
                     22	  -0.02230	  -0.02096	  -0.02109	  -0.02109	  -0.02025	  -0.01915	  -0.01646
                     45	  -0.01764	  -0.01243	  -0.01024	  -0.00931	  -0.00827	  -0.00781	  -0.00930
                     60	  -0.01176	  -0.00960	  -0.00943	  -0.00782	  -0.00844	  -0.00970	  -0.00908
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              </tableData>
              <tableData breakPoint="-20">
                              -10	        -5	        -2	         0	         2	         5	        10
                    -10	    0.01324	    0.01331	    0.01322	    0.01313	    0.01314	    0.01325	    0.01363
                      3	  -0.00057	    0.00066	    0.00102	    0.00142	    0.00150	    0.00105	    0.00122
                      9	  -0.00803	  -0.00700	  -0.00631	  -0.00611	  -0.00592	  -0.00581	  -0.00630
                     15	  -0.01307	  -0.01292	  -0.01258	  -0.01273	  -0.01210	  -0.01197	  -0.01153
                     22	  -0.01929	  -0.01832	  -0.01834	  -0.01827	  -0.01763	  -0.01652	  -0.01413
                     45	  -0.01482	  -0.01002	  -0.00808	  -0.00730	  -0.00643	  -0.00642	  -0.00809
                     60	  -0.00988	  -0.00801	  -0.00795	  -0.00631	  -0.00718	  -0.00815	  -0.00760
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              </tableData>
              <tableData breakPoint="-16">
                              -10	        -5	        -2	         0	         2	         5	        10
                    -10	    0.01042	    0.01037	    0.01022	    0.01013	    0.01015	    0.01030	    0.01072
                      3	  -0.00104	  -0.00010	    0.00018	    0.00050	    0.00056	    0.00029	    0.00039
                      9	  -0.00732	  -0.00643	  -0.00584	  -0.00566	  -0.00551	  -0.00544	  -0.00594
                     15	  -0.01126	  -0.01113	  -0.01081	  -0.01106	  -0.01048	  -0.01035	  -0.00997
                     22	  -0.01659	  -0.01538	  -0.01559	  -0.01556	  -0.01499	  -0.01419	  -0.01195
                     45	  -0.01235	  -0.00788	  -0.00610	  -0.00555	  -0.00479	  -0.00497	  -0.00721
                     60	  -0.00837	  -0.00662	  -0.00672	  -0.00508	  -0.00646	  -0.00690	  -0.00643
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              </tableData>
              <tableData breakPoint="-15">
                              -10	        -5	        -2	         0	         2	         5	        10
                    -10	    0.00971	    0.00962	    0.00946	    0.00938	    0.00939	    0.00953	    0.00999
                      3	  -0.00113	  -0.00026	    0.00001	    0.00030	    0.00036	    0.00013	    0.00021
                      9	  -0.00709	  -0.00623	  -0.00567	  -0.00550	  -0.00536	  -0.00530	  -0.00581
                     15	  -0.01073	  -0.01062	  -0.01031	  -0.01059	  -0.01002	  -0.00989	  -0.00953
                     22	  -0.01577	  -0.01459	  -0.01481	  -0.01479	  -0.01427	  -0.01348	  -0.01168
                     45	  -0.01171	  -0.00732	  -0.00559	  -0.00511	  -0.00435	  -0.00456	  -0.00688
                     60	  -0.00796	  -0.00627	  -0.00637	  -0.00478	  -0.00616	  -0.00656	  -0.00610
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              </tableData>
              <tableData breakPoint="-10">
                              -10	        -5	        -2	         0	         2	         5	        10
                    -10	    0.00614	    0.00590	    0.00570	    0.00561	    0.00564	    0.00585	    0.00632
                      3	  -0.00133	  -0.00077	  -0.00059	  -0.00040	  -0.00036	  -0.00044	  -0.00045
                      9	  -0.00565	  -0.00492	  -0.00448	  -0.00436	  -0.00427	  -0.00428	  -0.00482
                     15	  -0.00774	  -0.00769	  -0.00748	  -0.00785	  -0.00733	  -0.00721	  -0.00694
                     22	  -0.01131	  -0.01048	  -0.01072	  -0.01078	  -0.01036	  -0.00957	  -0.00831
                     45	  -0.00835	  -0.00437	  -0.00290	  -0.00261	  -0.00210	  -0.00254	  -0.00522
                     60	  -0.00595	  -0.00462	  -0.00467	  -0.00311	  -0.00451	  -0.00482	  -0.00449
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              </tableData>
              <tableData breakPoint="-5">
                              -10	        -5	        -2	         0	         2	         5	        10
                    -10	    0.00276	    0.00237	    0.00212	    0.00204	    0.00210	    0.00235	    0.00284
                      3	  -0.00107	  -0.00075	  -0.00066	  -0.00054	  -0.00054	  -0.00055	  -0.00064
                      9	  -0.00366	  -0.00301	  -0.00271	  -0.00262	  -0.00259	  -0.00270	  -0.00327
                     15	  -0.00425	  -0.00421	  -0.00412	  -0.00451	  -0.00404	  -0.00396	  -0.00383
                     22	  -0.00626	  -0.00565	  -0.00596	  -0.00601	  -0.00564	  -0.00550	  -0.00490
                     45	  -0.00498	  -0.00142	  -0.00012	  -0.00006	    0.00022	  -0.00044	  -0.00343
                     60	  -0.00396	  -0.00319	  -0.00299	  -0.00147	  -0.00292	  -0.00313	  -0.00304
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              </tableData>
              <tableData breakPoint="0">
                              -10	        -5	        -2	         0	         2	         5	        10
                    -10	  -0.00030	  -0.00082	  -0.00108	  -0.00115	  -0.00108	  -0.00082	  -0.00029
                      3	  -0.00032	  -0.00016	  -0.00013	  -0.00008	  -0.00013	  -0.00016	  -0.00032
                      9	  -0.00116	  -0.00054	  -0.00036	  -0.00031	  -0.00036	  -0.00054	  -0.00116
                     15	  -0.00029	  -0.00021	  -0.00024	  -0.00066	  -0.00024	  -0.00021	  -0.00029
                     22	  -0.00082	  -0.00046	  -0.00074	  -0.00083	  -0.00075	  -0.00045	  -0.00082
                     45	  -0.00168	    0.00168	    0.00258	    0.00247	    0.00261	    0.00168	  -0.00163
                     60	  -0.00212	  -0.00158	  -0.00144	    0.00008	  -0.00144	  -0.00158	  -0.00213
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              </tableData>
              <tableData breakPoint="5">
                              -10	        -5	        -2	         0	         2	         5	        10
                    -10	  -0.00288	  -0.00357	  -0.00378	  -0.00384	  -0.00375	  -0.00351	  -0.00297
                      3	    0.00092	    0.00101	    0.00099	    0.00100	    0.00089	    0.00074	    0.00053
                      9	    0.00177	    0.00243	    0.00253	    0.00251	    0.00242	    0.00213	    0.00142
                     15	    0.00324	    0.00307	    0.00335	    0.00310	    0.00357	    0.00335	    0.00319
                     22	    0.00489	    0.00458	    0.00473	    0.00452	    0.00428	    0.00432	    0.00337
                     45	    0.00151	    0.00449	    0.00519	    0.00490	    0.00482	    0.00369	    0.00015
                     60	  -0.00051	  -0.00017	  -0.00006	    0.00139	  -0.00006	  -0.00020	  -0.00075
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              </tableData>
              <tableData breakPoint="10">
                              -10	        -5	        -2	         0	         2	         5	        10
                    -10	  -0.00490	  -0.00577	  -0.00591	  -0.00595	  -0.00585	  -0.00564	  -0.00513
                      3	    0.00259	    0.00270	    0.00264	    0.00263	    0.00244	    0.00209	    0.00184
                      9	    0.00503	    0.00578	    0.00582	    0.00574	    0.00557	    0.00520	    0.00439
                     15	    0.00722	    0.00743	    0.00747	    0.00699	    0.00736	    0.00713	    0.00724
                     22	    0.01061	    0.01007	    0.01018	    0.00968	    0.00930	    0.00926	    0.00755
                     45	    0.00433	    0.00699	    0.00755	    0.00712	    0.00678	    0.00553	    0.00170
                     60	    0.00080	    0.00101	    0.00108	    0.00253	    0.00099	    0.00092	    0.00039
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              </tableData>
              <tableData breakPoint="13">
                              -10	        -5	        -2	         0	         2	         5	        10
                    -10	  -0.00583	  -0.00678	  -0.00693	  -0.00693	  -0.00683	  -0.00663	  -0.00615
                      3	    0.00376	    0.00392	    0.00383	    0.00383	    0.00359	    0.00307	    0.00282
                      9	    0.00708	    0.00792	    0.00789	    0.00777	    0.00759	    0.00717	    0.00630
                     15	    0.00940	    0.01008	    0.00985	    0.00951	    0.00946	    0.00956	    0.00973
                     22	    0.01398	    0.01328	    0.01333	    0.01269	    0.01224	    0.01215	    0.01005
                     45	    0.00585	    0.00842	    0.00884	    0.00832	    0.00787	    0.00655	    0.00259
                     60	    0.00148	    0.00158	    0.00165	    0.00305	    0.00154	    0.00149	    0.00096
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              </tableData>
              <tableData breakPoint="16">
                              -10	        -5	        -2	         0	         2	         5	        10
                    -10	  -0.00657	  -0.00759	  -0.00770	  -0.00769	  -0.00759	  -0.00742	  -0.00698
                      3	    0.00500	    0.00525	    0.00514	    0.00515	    0.00486	    0.00416	    0.00389
                      9	    0.00915	    0.01008	    0.00998	    0.00985	    0.00965	    0.00918	    0.00824
                     15	    0.01210	    0.01272	    0.01250	    0.01186	    0.01190	    0.01185	    0.01222
                     22	    0.01719	    0.01637	    0.01631	    0.01557	    0.01508	    0.01492	    0.01249
                     45	    0.00721	    0.00965	    0.01000	    0.00939	    0.00888	    0.00748	    0.00341
                     60	    0.00201	    0.00206	    0.00212	    0.00352	    0.00200	    0.00197	    0.00141
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              </tableData>
          </table>
       </product>
    </function>
    <function name="aero/c/CFXDED2R">
    <description>DRAG DUE TO ELEVON 2R</description>
    <product>
          <table>
            <independentVar lookup="row">aero/alpha-deg</independentVar>
            <independentVar lookup="column">aero/beta-deg</independentVar>
            <independentVar lookup="table">fcs/elevon-2R-pos-deg</independentVar>
              <tableData breakPoint="-25">
                              -10	        -5	        -2	         0	         2	         5	        10
                    -10	    0.01654	    0.01679	    0.01676	    0.01667	    0.01666	    0.01670	    0.01707
                      3	    0.00022	    0.00184	    0.00229	    0.00281	    0.00288	    0.00218	    0.00243
                      9	  -0.00855	  -0.00733	  -0.00651	  -0.00627	  -0.00605	  -0.00589	  -0.00639
                     15	  -0.01489	  -0.01464	  -0.01423	  -0.01437	  -0.01361	  -0.01349	  -0.01298
                     22	  -0.02230	  -0.02096	  -0.02109	  -0.02109	  -0.02025	  -0.01915	  -0.01646
                     45	  -0.01764	  -0.01243	  -0.01024	  -0.00931	  -0.00827	  -0.00781	  -0.00930
                     60	  -0.01176	  -0.00960	  -0.00943	  -0.00782	  -0.00844	  -0.00970	  -0.00908
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              </tableData>
              <tableData breakPoint="-20">
                              -10	        -5	        -2	         0	         2	         5	        10
                    -10	    0.01324	    0.01331	    0.01322	    0.01313	    0.01314	    0.01325	    0.01363
                      3	  -0.00057	    0.00066	    0.00102	    0.00142	    0.00150	    0.00105	    0.00122
                      9	  -0.00803	  -0.00700	  -0.00631	  -0.00611	  -0.00592	  -0.00581	  -0.00630
                     15	  -0.01307	  -0.01292	  -0.01258	  -0.01273	  -0.01210	  -0.01197	  -0.01153
                     22	  -0.01929	  -0.01832	  -0.01834	  -0.01827	  -0.01763	  -0.01652	  -0.01413
                     45	  -0.01482	  -0.01002	  -0.00808	  -0.00730	  -0.00643	  -0.00642	  -0.00809
                     60	  -0.00988	  -0.00801	  -0.00795	  -0.00631	  -0.00718	  -0.00815	  -0.00760
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              </tableData>
              <tableData breakPoint="-16">
                              -10	        -5	        -2	         0	         2	         5	        10
                    -10	    0.01042	    0.01037	    0.01022	    0.01013	    0.01015	    0.01030	    0.01072
                      3	  -0.00104	  -0.00010	    0.00018	    0.00050	    0.00056	    0.00029	    0.00039
                      9	  -0.00732	  -0.00643	  -0.00584	  -0.00566	  -0.00551	  -0.00544	  -0.00594
                     15	  -0.01126	  -0.01113	  -0.01081	  -0.01106	  -0.01048	  -0.01035	  -0.00997
                     22	  -0.01659	  -0.01538	  -0.01559	  -0.01556	  -0.01499	  -0.01419	  -0.01195
                     45	  -0.01235	  -0.00788	  -0.00610	  -0.00555	  -0.00479	  -0.00497	  -0.00721
                     60	  -0.00837	  -0.00662	  -0.00672	  -0.00508	  -0.00646	  -0.00690	  -0.00643
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              </tableData>
              <tableData breakPoint="-15">
                              -10	        -5	        -2	         0	         2	         5	        10
                    -10	    0.00971	    0.00962	    0.00946	    0.00938	    0.00939	    0.00953	    0.00999
                      3	  -0.00113	  -0.00026	    0.00001	    0.00030	    0.00036	    0.00013	    0.00021
                      9	  -0.00709	  -0.00623	  -0.00567	  -0.00550	  -0.00536	  -0.00530	  -0.00581
                     15	  -0.01073	  -0.01062	  -0.01031	  -0.01059	  -0.01002	  -0.00989	  -0.00953
                     22	  -0.01577	  -0.01459	  -0.01481	  -0.01479	  -0.01427	  -0.01348	  -0.01168
                     45	  -0.01171	  -0.00732	  -0.00559	  -0.00511	  -0.00435	  -0.00456	  -0.00688
                     60	  -0.00796	  -0.00627	  -0.00637	  -0.00478	  -0.00616	  -0.00656	  -0.00610
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              </tableData>
              <tableData breakPoint="-10">
                              -10	        -5	        -2	         0	         2	         5	        10
                    -10	    0.00614	    0.00590	    0.00570	    0.00561	    0.00564	    0.00585	    0.00632
                      3	  -0.00133	  -0.00077	  -0.00059	  -0.00040	  -0.00036	  -0.00044	  -0.00045
                      9	  -0.00565	  -0.00492	  -0.00448	  -0.00436	  -0.00427	  -0.00428	  -0.00482
                     15	  -0.00774	  -0.00769	  -0.00748	  -0.00785	  -0.00733	  -0.00721	  -0.00694
                     22	  -0.01131	  -0.01048	  -0.01072	  -0.01078	  -0.01036	  -0.00957	  -0.00831
                     45	  -0.00835	  -0.00437	  -0.00290	  -0.00261	  -0.00210	  -0.00254	  -0.00522
                     60	  -0.00595	  -0.00462	  -0.00467	  -0.00311	  -0.00451	  -0.00482	  -0.00449
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              </tableData>
              <tableData breakPoint="-5">
                              -10	        -5	        -2	         0	         2	         5	        10
                    -10	    0.00276	    0.00237	    0.00212	    0.00204	    0.00210	    0.00235	    0.00284
                      3	  -0.00107	  -0.00075	  -0.00066	  -0.00054	  -0.00054	  -0.00055	  -0.00064
                      9	  -0.00366	  -0.00301	  -0.00271	  -0.00262	  -0.00259	  -0.00270	  -0.00327
                     15	  -0.00425	  -0.00421	  -0.00412	  -0.00451	  -0.00404	  -0.00396	  -0.00383
                     22	  -0.00626	  -0.00565	  -0.00596	  -0.00601	  -0.00564	  -0.00550	  -0.00490
                     45	  -0.00498	  -0.00142	  -0.00012	  -0.00006	    0.00022	  -0.00044	  -0.00343
                     60	  -0.00396	  -0.00319	  -0.00299	  -0.00147	  -0.00292	  -0.00313	  -0.00304
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              </tableData>
              <tableData breakPoint="0">
                              -10	        -5	        -2	         0	         2	         5	        10
                    -10	  -0.00030	  -0.00082	  -0.00108	  -0.00115	  -0.00108	  -0.00082	  -0.00029
                      3	  -0.00032	  -0.00016	  -0.00013	  -0.00008	  -0.00013	  -0.00016	  -0.00032
                      9	  -0.00116	  -0.00054	  -0.00036	  -0.00031	  -0.00036	  -0.00054	  -0.00116
                     15	  -0.00029	  -0.00021	  -0.00024	  -0.00066	  -0.00024	  -0.00021	  -0.00029
                     22	  -0.00082	  -0.00046	  -0.00074	  -0.00083	  -0.00075	  -0.00045	  -0.00082
                     45	  -0.00168	    0.00168	    0.00258	    0.00247	    0.00261	    0.00168	  -0.00163
                     60	  -0.00212	  -0.00158	  -0.00144	    0.00008	  -0.00144	  -0.00158	  -0.00213
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              </tableData>
              <tableData breakPoint="5">
                              -10	        -5	        -2	         0	         2	         5	        10
                    -10	  -0.00288	  -0.00357	  -0.00378	  -0.00384	  -0.00375	  -0.00351	  -0.00297
                      3	    0.00092	    0.00101	    0.00099	    0.00100	    0.00089	    0.00074	    0.00053
                      9	    0.00177	    0.00243	    0.00253	    0.00251	    0.00242	    0.00213	    0.00142
                     15	    0.00324	    0.00307	    0.00335	    0.00310	    0.00357	    0.00335	    0.00319
                     22	    0.00489	    0.00458	    0.00473	    0.00452	    0.00428	    0.00432	    0.00337
                     45	    0.00151	    0.00449	    0.00519	    0.00490	    0.00482	    0.00369	    0.00015
                     60	  -0.00051	  -0.00017	  -0.00006	    0.00139	  -0.00006	  -0.00020	  -0.00075
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              </tableData>
              <tableData breakPoint="10">
                              -10	        -5	        -2	         0	         2	         5	        10
                    -10	  -0.00490	  -0.00577	  -0.00591	  -0.00595	  -0.00585	  -0.00564	  -0.00513
                      3	    0.00259	    0.00270	    0.00264	    0.00263	    0.00244	    0.00209	    0.00184
                      9	    0.00503	    0.00578	    0.00582	    0.00574	    0.00557	    0.00520	    0.00439
                     15	    0.00722	    0.00743	    0.00747	    0.00699	    0.00736	    0.00713	    0.00724
                     22	    0.01061	    0.01007	    0.01018	    0.00968	    0.00930	    0.00926	    0.00755
                     45	    0.00433	    0.00699	    0.00755	    0.00712	    0.00678	    0.00553	    0.00170
                     60	    0.00080	    0.00101	    0.00108	    0.00253	    0.00099	    0.00092	    0.00039
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              </tableData>
              <tableData breakPoint="13">
                              -10	        -5	        -2	         0	         2	         5	        10
                    -10	  -0.00583	  -0.00678	  -0.00693	  -0.00693	  -0.00683	  -0.00663	  -0.00615
                      3	    0.00376	    0.00392	    0.00383	    0.00383	    0.00359	    0.00307	    0.00282
                      9	    0.00708	    0.00792	    0.00789	    0.00777	    0.00759	    0.00717	    0.00630
                     15	    0.00940	    0.01008	    0.00985	    0.00951	    0.00946	    0.00956	    0.00973
                     22	    0.01398	    0.01328	    0.01333	    0.01269	    0.01224	    0.01215	    0.01005
                     45	    0.00585	    0.00842	    0.00884	    0.00832	    0.00787	    0.00655	    0.00259
                     60	    0.00148	    0.00158	    0.00165	    0.00305	    0.00154	    0.00149	    0.00096
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              </tableData>
              <tableData breakPoint="16">
                              -10	        -5	        -2	         0	         2	         5	        10
                    -10	  -0.00657	  -0.00759	  -0.00770	  -0.00769	  -0.00759	  -0.00742	  -0.00698
                      3	    0.00500	    0.00525	    0.00514	    0.00515	    0.00486	    0.00416	    0.00389
                      9	    0.00915	    0.01008	    0.00998	    0.00985	    0.00965	    0.00918	    0.00824
                     15	    0.01210	    0.01272	    0.01250	    0.01186	    0.01190	    0.01185	    0.01222
                     22	    0.01719	    0.01637	    0.01631	    0.01557	    0.01508	    0.01492	    0.01249
                     45	    0.00721	    0.00965	    0.01000	    0.00939	    0.00888	    0.00748	    0.00341
                     60	    0.00201	    0.00206	    0.00212	    0.00352	    0.00200	    0.00197	    0.00141
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              </tableData>
          </table>
       </product>
    </function>
    <function name="aero/c/CFXDSBL">
    <description>DRAG DUE TO LOWER SPEEDBRAKE DEFLECTION</description>
    <product>
          <table>
            <independentVar lookup="row">aero/alpha-deg</independentVar>
            <independentVar lookup="column">fcs/airbrake-upper</independentVar>
            <tableData>
                                  0	          5	         10	         15	         20	         25	         30	         35	         40	         45	         50	         55
                    -10	    0.00013	    0.00039	    0.00092	    0.00176	    0.00272	    0.00342	    0.00422	    0.00405	    0.00381	    0.00369	    0.00360	    0.00373
                      3	    0.00007	    0.00011	    0.00020	    0.00032	    0.00048	    0.00066	    0.00077	    0.00084	    0.00088	    0.00091	    0.00092	    0.00091
                      9	    0.00005	    0.00013	    0.00026	    0.00043	    0.00063	    0.00084	    0.00102	    0.00114	    0.00122	    0.00127	    0.00129	    0.00126
                     15	    0.00005	    0.00009	    0.00018	    0.00031	    0.00048	    0.00028	    0.00043	    0.00054	    0.00061	    0.00066	    0.00067	    0.00065
                     22	    0.00015	    0.00005	    0.00000	    0.00000	    0.00000	    0.00000	    0.00000	    0.00000	    0.00000	    0.00000	    0.00000	    0.00000
                     45	    0.00055	    0.00023	    0.00000	    0.00000	    0.00000	    0.00000	    0.00000	    0.00000	    0.00000	    0.00000	    0.00000	    0.00000
                     60	    0.00063	    0.00040	    0.00018	    0.00000	    0.00000	    0.00000	    0.00000	    0.00000	    0.00000	    0.00000	    0.00000	    0.00000
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            </tableData>
          </table>
       </product>
    </function>
    <function name="aero/c/CFXDSBU">
    <description>DRAG DUE TO UPPER SPEEDBRAKE DEFLECTION</description>
    <product>
          <table>
            <independentVar lookup="row">aero/alpha-deg</independentVar>
            <independentVar lookup="column">fcs/airbrake-lower</independentVar>
            <tableData>
                                  0	          5	         11	         17	         22	         28	         34	         39	         45	         50	         56	         62	         67
                    -10	    0.00013	    0.00000	    0.00000	    0.00003	    0.00013	    0.00021	    0.00057	    0.00066	    0.00098	    0.00100	    0.00094	    0.00060	    0.00041
                      3	    0.00007	    0.00007	    0.00012	    0.00026	    0.00041	    0.00053	    0.00061	    0.00056	    0.00045	    0.00043	    0.00044	    0.00061	    0.00058
                      9	    0.00004	    0.00000	    0.00000	    0.00009	    0.00021	    0.00027	    0.00027	    0.00027	    0.00028	    0.00028	    0.00028	    0.00027	    0.00027
                     15	    0.00006	    0.00011	    0.00028	    0.00056	    0.00081	    0.00098	    0.00105	    0.00109	    0.00110	    0.00110	    0.00109	    0.00107	    0.00101
                     22	    0.00014	    0.00029	    0.00060	    0.00096	    0.00127	    0.00152	    0.00163	    0.00167	    0.00171	    0.00171	    0.00169	    0.00165	    0.00158
                     45	    0.00046	    0.00077	    0.00114	    0.00148	    0.00171	    0.00189	    0.00197	    0.00203	    0.00207	    0.00208	    0.00206	    0.00200	    0.00191
                     60	    0.00057	    0.00078	    0.00100	    0.00116	    0.00124	    0.00129	    0.00131	    0.00131	    0.00131	    0.00131	    0.00131	    0.00131	    0.00130
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            </tableData>
          </table>
       </product>
    </function>
    <function name="aero/c/CFXDSD1L">
    <description>DRAG DUE TO LE SLAT 1L</description>
    <product>
          <table>
            <independentVar lookup="row">aero/alpha-deg</independentVar>
            <independentVar lookup="column">fcs/slat-1L-pos-deg</independentVar>
            <tableData>
                                -17	        -14	        -10	         -7	         -3	          0	          3	          7	         10	         14	         17
                    -10	    0.00027	    0.00022	    0.00016	    0.00011	    0.00005	    0.00000	    0.00000	    0.00000	    0.00000	    0.00000	    0.00000
                      3	    0.00000	    0.00000	    0.00000	    0.00000	    0.00000	    0.00000	    0.00001	    0.00002	    0.00002	    0.00003	    0.00004
                      9	    0.00000	    0.00000	    0.00000	    0.00000	    0.00000	    0.00000	    0.00004	    0.00009	    0.00013	    0.00018	    0.00021
                     15	    0.00000	    0.00000	    0.00000	    0.00000	    0.00000	    0.00001	    0.00010	    0.00024	    0.00000	    0.00005	    0.00009
                     22	    0.00000	    0.00000	    0.00000	    0.00000	    0.00000	    0.00000	    0.00006	    0.00011	    0.00019	    0.00024	    0.00029
                     45	    0.00042	    0.00033	    0.00023	    0.00015	    0.00005	    0.00000	    0.00000	    0.00000	    0.00000	    0.00000	    0.00000
                     60	    0.00039	    0.00031	    0.00022	    0.00015	    0.00010	    0.00004	    0.00000	    0.00000	    0.00000	    0.00000	    0.00000
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            </tableData>
          </table>
       </product>
    </function>
    <function name="aero/c/CFXDSD1R">
    <description>DRAG DUE TO LE SLAT 1R</description>
    <product>
          <table>
            <independentVar lookup="row">aero/alpha-deg</independentVar>
            <independentVar lookup="column">fcs/slat-1R-pos-deg</independentVar>
            <tableData>
                                -17	        -14	        -10	         -7	         -3	          0	          3	          7	         10	         14	         17
                    -10	    0.00027	    0.00022	    0.00016	    0.00011	    0.00005	    0.00000	    0.00000	    0.00000	    0.00000	    0.00000	    0.00000
                      3	    0.00000	    0.00000	    0.00000	    0.00000	    0.00000	    0.00000	    0.00001	    0.00002	    0.00002	    0.00003	    0.00004
                      9	    0.00000	    0.00000	    0.00000	    0.00000	    0.00000	    0.00000	    0.00004	    0.00009	    0.00013	    0.00018	    0.00021
                     15	    0.00000	    0.00000	    0.00000	    0.00000	    0.00000	    0.00001	    0.00010	    0.00024	    0.00000	    0.00005	    0.00009
                     22	    0.00000	    0.00000	    0.00000	    0.00000	    0.00000	    0.00000	    0.00006	    0.00011	    0.00019	    0.00024	    0.00029
                     45	    0.00042	    0.00033	    0.00023	    0.00015	    0.00005	    0.00000	    0.00000	    0.00000	    0.00000	    0.00000	    0.00000
                     60	    0.00039	    0.00031	    0.00022	    0.00015	    0.00010	    0.00004	    0.00000	    0.00000	    0.00000	    0.00000	    0.00000
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            </tableData>
          </table>
       </product>
    </function>
    <function name="aero/c/CFXDSD2L">
    <description>DRAG DUE TO LE SLAT 2L</description>
    <product>
          <table>
            <independentVar lookup="row">aero/alpha-deg</independentVar>
            <independentVar lookup="column">fcs/slat-2L-pos-deg</independentVar>
            <tableData>
                                -17	        -14	        -10	         -7	         -3	          0	          3	          7	         10	         14	         17
                    -10	    0.00039	    0.00032	    0.00024	    0.00017	    0.00007	    0.00000	    0.00000	    0.00000	    0.00000	    0.00000	    0.00000
                      3	    0.00000	    0.00000	    0.00000	    0.00000	    0.00000	    0.00000	    0.00001	    0.00003	    0.00004	    0.00006	    0.00007
                      9	    0.00000	    0.00000	    0.00000	    0.00000	    0.00000	    0.00000	    0.00006	    0.00014	    0.00020	    0.00028	    0.00033
                     15	    0.00000	    0.00000	    0.00000	    0.00000	    0.00000	    0.00001	    0.00008	    0.00010	    0.00017	    0.00025	    0.00030
                     22	    0.00005	    0.00004	    0.00002	    0.00002	    0.00001	    0.00000	    0.00000	    0.00000	    0.00000	    0.00000	    0.00000
                     45	    0.00012	    0.00009	    0.00006	    0.00004	    0.00001	    0.00000	    0.00000	    0.00000	    0.00000	    0.00000	    0.00000
                     60	    0.00017	    0.00015	    0.00010	    0.00010	    0.00005	    0.00004	    0.00002	    0.00001	    0.00000	    0.00000	    0.00000
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            </tableData>
          </table>
       </product>
    </function>
    <function name="aero/c/CFXDSD2R">
    <description>DRAG DUE TO LE SLAT 2R</description>
    <product>
          <table>
            <independentVar lookup="row">aero/alpha-deg</independentVar>
            <independentVar lookup="column">fcs/slat-2R-pos-deg</independentVar>
            <tableData>
                                -17	        -14	        -10	         -7	         -3	          0	          3	          7	         10	         14	         17
                    -10	    0.00039	    0.00032	    0.00024	    0.00017	    0.00007	    0.00000	    0.00000	    0.00000	    0.00000	    0.00000	    0.00000
                      3	    0.00000	    0.00000	    0.00000	    0.00000	    0.00000	    0.00000	    0.00001	    0.00003	    0.00004	    0.00006	    0.00007
                      9	    0.00000	    0.00000	    0.00000	    0.00000	    0.00000	    0.00000	    0.00006	    0.00014	    0.00020	    0.00028	    0.00033
                     15	    0.00000	    0.00000	    0.00000	    0.00000	    0.00000	    0.00001	    0.00008	    0.00010	    0.00017	    0.00025	    0.00030
                     22	    0.00005	    0.00004	    0.00002	    0.00002	    0.00001	    0.00000	    0.00000	    0.00000	    0.00000	    0.00000	    0.00000
                     45	    0.00012	    0.00009	    0.00006	    0.00004	    0.00001	    0.00000	    0.00000	    0.00000	    0.00000	    0.00000	    0.00000
                     60	    0.00017	    0.00015	    0.00010	    0.00010	    0.00005	    0.00004	    0.00002	    0.00001	    0.00000	    0.00000	    0.00000
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            </tableData>
          </table>
       </product>
    </function>
    <function name="aero/c/CFXGEAR">
    <description>DRAG INCREMENT DUE TO GEAR</description>
    <product>
          <property>gear/gear-pos-norm</property>
          <table>
            <independentVar lookup="row">aero/alpha-deg</independentVar>
            <tableData>
                    -10		    0.00030
                     -5		    0.00023
                      3		    0.00021
                      8		    0.00029
                     13		    0.00070
                     18		    0.00095
                     25		    0.00111
                     35		    0.00167
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            </tableData>
          </table>
       </product>
    </function>
    <function name="aero/c/CFXmn">
    <description>DRAG DUE TO MACH</description>
    <product>
          <table>
            <independentVar lookup="row">velocities/mach</independentVar>
            <independentVar lookup="column">aero/alpha-deg</independentVar>
            <tableData>
                                -10	         -1	       0.01	          1	         10
                    0.2	    0.00000	    0.00000	    0.00000	    0.00000	    0.00000
                    0.8	    0.00954	    0.00010	    0.00000	    0.00008	    0.00869
                   0.99	    0.01151	    0.00020	    0.00000	    0.00038	    0.00734
                    1.3	    0.08030	    0.00290	    0.00256	    0.00716	    0.09587
                    1.6	    0.06962	    0.00317	    0.00180	    0.00524	    0.08834
                    2.2	    0.06405	    0.00183	    0.00148	    0.00434	    0.07651
                    2.5	    0.04747	    0.00152	    0.00109	    0.00315	    0.06203
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            </tableData>
          </table>
       </product>
    </function>
    <function name="aero/c/CFZB">
    <description>BASIC LIFT</description>
    <product>
          <table>
            <independentVar lookup="row">aero/alpha-deg</independentVar>
            <tableData>
                    -10		  -0.56416
                     -5		  -0.25236
                      4		    0.17710
                     10		    0.53971
                     16		    0.92817
                     24		    1.17729
                     50		    1.08918
                     60		    1.00843
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            </tableData>
          </table>
       </product>
    </function>
    <function name="aero/c/CFZDE2L">
    <description>LIFT DUE TO LE SLAT 2L</description>
    <product>
          <table>
            <independentVar lookup="row">aero/alpha-deg</independentVar>
            <independentVar lookup="column">fcs/slat-2L-pos-deg</independentVar>
            <tableData>
                                -17	        -14	        -10	         -7	         -3	          0	          3	          7	         10	         14	         17
                    -10	  -0.00716	  -0.00600	  -0.00436	  -0.00307	  -0.00131	    0.00002	    0.00131	    0.00301	    0.00424	    0.00577	    0.00683
                      3	  -0.00165	  -0.00142	  -0.00107	  -0.00078	  -0.00035	    0.00000	    0.00037	    0.00087	    0.00125	    0.00177	    0.00214
                      9	  -0.00619	  -0.00523	  -0.00385	  -0.00275	  -0.00120	    0.00000	    0.00122	    0.00284	    0.00404	    0.00558	    0.00668
                     15	  -0.00396	  -0.00559	  -0.00406	  -0.00287	  -0.00123	    0.00001	    0.00127	  -0.00075	    0.00020	    0.00140	    0.00222
                     22	  -0.00057	  -0.00048	  -0.00034	  -0.00024	  -0.00010	    0.00000	    0.00008	    0.00022	    0.00025	    0.00045	    0.00051
                     45	  -0.00020	  -0.00015	  -0.00010	  -0.00006	  -0.00001	    0.00003	    0.00007	    0.00009	    0.00012	    0.00014	    0.00016
                     60	  -0.00011	  -0.00008	    0.00001	  -0.00003	    0.00007	    0.00009	    0.00000	    0.00003	    0.00013	    0.00014	    0.00013
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            </tableData>
          </table>
       </product>
    </function>
    <function name="aero/c/CFZDE2R">
    <description>LIFT DUE TO LE SLAT 2R</description>
    <product>
          <table>
            <independentVar lookup="row">aero/alpha-deg</independentVar>
            <independentVar lookup="column">fcs/slat-2R-pos-deg</independentVar>
            <tableData>
                                -17	        -14	        -10	         -7	         -3	          0	          3	          7	         10	         14	         17
                    -10	  -0.00716	  -0.00600	  -0.00436	  -0.00307	  -0.00131	    0.00002	    0.00131	    0.00301	    0.00424	    0.00577	    0.00683
                      3	  -0.00165	  -0.00142	  -0.00107	  -0.00078	  -0.00035	    0.00000	    0.00037	    0.00087	    0.00125	    0.00177	    0.00214
                      9	  -0.00619	  -0.00523	  -0.00385	  -0.00275	  -0.00120	    0.00000	    0.00122	    0.00284	    0.00404	    0.00558	    0.00668
                     15	  -0.00396	  -0.00559	  -0.00406	  -0.00287	  -0.00123	    0.00001	    0.00127	  -0.00075	    0.00020	    0.00140	    0.00222
                     22	  -0.00057	  -0.00048	  -0.00034	  -0.00024	  -0.00010	    0.00000	    0.00008	    0.00022	    0.00025	    0.00045	    0.00051
                     45	  -0.00020	  -0.00015	  -0.00010	  -0.00006	  -0.00001	    0.00003	    0.00007	    0.00009	    0.00012	    0.00014	    0.00016
                     60	  -0.00011	  -0.00008	    0.00001	  -0.00003	    0.00007	    0.00009	    0.00000	    0.00003	    0.00013	    0.00014	    0.00013
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            </tableData>
          </table>
       </product>
    </function>
    <function name="aero/c/CFZDED1L">
    <description>LIFT DUE TO ELEVON 1L</description>
    <product>
          <table>
            <independentVar lookup="row">aero/alpha-deg</independentVar>
            <independentVar lookup="column">aero/beta-deg</independentVar>
            <independentVar lookup="table">fcs/elevon-1L-pos-deg</independentVar>
              <tableData breakPoint="-25">
                              -10	        -5	        -2	         0	         2	         5	        10
                    -10	  -0.11779	  -0.10879	  -0.10260	  -0.09733	  -0.09217	  -0.08531	  -0.07734
                      3	  -0.12326	  -0.12347	  -0.12206	  -0.12197	  -0.12175	  -0.12051	  -0.11736
                      9	  -0.13437	  -0.13017	  -0.12891	  -0.12901	  -0.12851	  -0.12643	  -0.12194
                     15	  -0.11532	  -0.11934	  -0.11244	  -0.10937	  -0.10740	  -0.10417	  -0.09381
                     22	  -0.04736	  -0.04094	  -0.03941	  -0.03929	  -0.03662	  -0.04391	  -0.04503
                     45	  -0.01593	  -0.01407	  -0.01243	  -0.01108	  -0.00955	  -0.00818	  -0.00641
                     60	  -0.00972	  -0.00840	  -0.00827	  -0.00710	  -0.00765	  -0.00683	  -0.00452
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              </tableData>
              <tableData breakPoint="-20">
                              -10	        -5	        -2	         0	         2	         5	        10
                    -10	  -0.10118	  -0.09281	  -0.08770	  -0.08455	  -0.07996	  -0.07353	  -0.06600
                      3	  -0.10272	  -0.10289	  -0.10170	  -0.10160	  -0.10140	  -0.10023	  -0.09762
                      9	  -0.11212	  -0.10856	  -0.10731	  -0.10747	  -0.10703	  -0.10519	  -0.10129
                     15	  -0.09339	  -0.09398	  -0.09126	  -0.08818	  -0.08638	  -0.08356	  -0.07455
                     22	  -0.03675	  -0.03106	  -0.03110	  -0.03042	  -0.02879	  -0.03621	  -0.03576
                     45	  -0.01289	  -0.01136	  -0.01011	  -0.00897	  -0.00769	  -0.00695	  -0.00523
                     60	  -0.00774	  -0.00669	  -0.00647	  -0.00543	  -0.00607	  -0.00566	  -0.00361
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              </tableData>
              <tableData breakPoint="-16">
                              -10	        -5	        -2	         0	         2	         5	        10
                    -10	  -0.08594	  -0.07816	  -0.07363	  -0.07081	  -0.06792	  -0.06278	  -0.05575
                      3	  -0.08434	  -0.08444	  -0.08344	  -0.08335	  -0.08316	  -0.08214	  -0.08000
                      9	  -0.09216	  -0.08916	  -0.08798	  -0.08820	  -0.08779	  -0.08618	  -0.08285
                     15	  -0.07385	  -0.07496	  -0.07237	  -0.06942	  -0.06800	  -0.06663	  -0.05935
                     22	  -0.02676	  -0.02434	  -0.02440	  -0.02385	  -0.02265	  -0.03083	  -0.02848
                     45	  -0.01023	  -0.00903	  -0.00798	  -0.00717	  -0.00611	  -0.00557	  -0.00410
                     60	  -0.00603	  -0.00559	  -0.00516	  -0.00477	  -0.00484	  -0.00427	  -0.00291
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              </tableData>
              <tableData breakPoint="-15">
                              -10	        -5	        -2	         0	         2	         5	        10
                    -10	  -0.08191	  -0.07427	  -0.06989	  -0.06717	  -0.06435	  -0.05993	  -0.05300
                      3	  -0.07947	  -0.07958	  -0.07864	  -0.07855	  -0.07837	  -0.07740	  -0.07539
                      9	  -0.08692	  -0.08406	  -0.08290	  -0.08314	  -0.08270	  -0.08119	  -0.07801
                     15	  -0.06896	  -0.06999	  -0.06745	  -0.06461	  -0.06382	  -0.06254	  -0.05558
                     22	  -0.02482	  -0.02279	  -0.02286	  -0.02229	  -0.02101	  -0.02854	  -0.02673
                     45	  -0.00957	  -0.00846	  -0.00747	  -0.00671	  -0.00571	  -0.00511	  -0.00380
                     60	  -0.00562	  -0.00522	  -0.00481	  -0.00454	  -0.00453	  -0.00394	  -0.00266
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              </tableData>
              <tableData breakPoint="-10">
                              -10	        -5	        -2	         0	         2	         5	        10
                    -10	  -0.05766	  -0.05295	  -0.05008	  -0.04781	  -0.04546	  -0.04221	  -0.03840
                      3	  -0.05411	  -0.05419	  -0.05350	  -0.05344	  -0.05331	  -0.05257	  -0.05127
                      9	  -0.05938	  -0.05726	  -0.05634	  -0.05660	  -0.05620	  -0.05500	  -0.05276
                     15	  -0.04462	  -0.04583	  -0.04137	  -0.03929	  -0.04218	  -0.04163	  -0.03783
                     22	  -0.01565	  -0.01427	  -0.01477	  -0.01404	  -0.01368	  -0.01448	  -0.01810
                     45	  -0.00627	  -0.00556	  -0.00494	  -0.00434	  -0.00374	  -0.00341	  -0.00219
                     60	  -0.00355	  -0.00334	  -0.00320	  -0.00280	  -0.00300	  -0.00257	  -0.00172
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              </tableData>
              <tableData breakPoint="-5">
                              -10	        -5	        -2	         0	         2	         5	        10
                    -10	  -0.02961	  -0.02704	  -0.02574	  -0.02517	  -0.02464	  -0.02249	  -0.01969
                      3	  -0.02735	  -0.02739	  -0.02705	  -0.02700	  -0.02693	  -0.02650	  -0.02590
                      9	  -0.03015	  -0.02901	  -0.02852	  -0.02865	  -0.02822	  -0.02733	  -0.02629
                     15	  -0.02319	  -0.02292	  -0.01944	  -0.01872	  -0.01920	  -0.02179	  -0.01725
                     22	  -0.00698	  -0.00669	  -0.00675	  -0.00638	  -0.00648	  -0.00691	  -0.00899
                     45	  -0.00304	  -0.00267	  -0.00240	  -0.00206	  -0.00181	  -0.00167	  -0.00117
                     60	  -0.00168	  -0.00156	  -0.00157	  -0.00128	  -0.00138	  -0.00132	  -0.00080
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              </tableData>
              <tableData breakPoint="0">
                              -10	        -5	        -2	         0	         2	         5	        10
                    -10	    0.00000	    0.00000	    0.00000	    0.00000	    0.00000	    0.00000	    0.00000
                      3	    0.00000	    0.00000	    0.00000	    0.00000	    0.00003	    0.00000	    0.00000
                      9	    0.00000	    0.00000	    0.00000	    0.00000	    0.00000	    0.00000	    0.00000
                     15	    0.00000	    0.00000	    0.00000	    0.00001	    0.00000	    0.00000	    0.00000
                     22	    0.00000	    0.00000	    0.00000	    0.00000	    0.00000	    0.00000	    0.00000
                     45	    0.00000	    0.00000	    0.00000	    0.00003	    0.00000	    0.00000	    0.00000
                     60	    0.00000	    0.00001	    0.00000	    0.00008	    0.00000	    0.00000	    0.00000
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              </tableData>
              <tableData breakPoint="5">
                              -10	        -5	        -2	         0	         2	         5	        10
                    -10	    0.02871	    0.02944	    0.02764	    0.02589	    0.02482	    0.02446	    0.02073
                      3	    0.02801	    0.02758	    0.02762	    0.02765	    0.02734	    0.02651	    0.02598
                      9	    0.02896	    0.02794	    0.02661	    0.02587	    0.02551	    0.02512	    0.02432
                     15	    0.02208	    0.02695	    0.02267	    0.01901	    0.01721	    0.01693	    0.01432
                     22	    0.00634	    0.00591	    0.00613	    0.00605	    0.00614	    0.00646	    0.00709
                     45	    0.00289	    0.00244	    0.00230	    0.00199	    0.00170	    0.00138	    0.00105
                     60	    0.00148	    0.00134	    0.00126	    0.00118	    0.00101	    0.00053	    0.00041
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              </tableData>
              <tableData breakPoint="10">
                              -10	        -5	        -2	         0	         2	         5	        10
                    -10	    0.05775	    0.05818	    0.05567	    0.05358	    0.05169	    0.04927	    0.04397
                      3	    0.05620	    0.05543	    0.05562	    0.05556	    0.05493	    0.05360	    0.05212
                      9	    0.05629	    0.05350	    0.05146	    0.05048	    0.05020	    0.04939	    0.04634
                     15	    0.04254	    0.04607	    0.04204	    0.03749	    0.03400	    0.03160	    0.02786
                     22	    0.01127	    0.01123	    0.01145	    0.01127	    0.01147	    0.01212	    0.01456
                     45	    0.00530	    0.00457	    0.00425	    0.00367	    0.00319	    0.00283	    0.00211
                     60	    0.00281	    0.00243	    0.00250	    0.00214	    0.00190	    0.00137	    0.00104
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              </tableData>
              <tableData breakPoint="13">
                              -10	        -5	        -2	         0	         2	         5	        10
                    -10	    0.07447	    0.07474	    0.07184	    0.06958	    0.06750	    0.06502	    0.05778
                      3	    0.07261	    0.07185	    0.07215	    0.07196	    0.07107	    0.06950	    0.06731
                      9	    0.07171	    0.06812	    0.06566	    0.06432	    0.06337	    0.06128	    0.05645
                     15	    0.04816	    0.05251	    0.05146	    0.04918	    0.04439	    0.03938	    0.03465
                     22	    0.01313	    0.01403	    0.01441	    0.01401	    0.01437	    0.01492	    0.01949
                     45	    0.00658	    0.00571	    0.00527	    0.00458	    0.00399	    0.00349	    0.00250
                     60	    0.00332	    0.00294	    0.00292	    0.00261	    0.00235	    0.00176	    0.00142
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              </tableData>
              <tableData breakPoint="16">
                              -10	        -5	        -2	         0	         2	         5	        10
                    -10	    0.09044	    0.09059	    0.08735	    0.08492	    0.08268	    0.08013	    0.07245
                      3	    0.08837	    0.08760	    0.08804	    0.08784	    0.08668	    0.08477	    0.08183
                      9	    0.08412	    0.07998	    0.07728	    0.07579	    0.07484	    0.07252	    0.06707
                     15	    0.05574	    0.06121	    0.06125	    0.05716	    0.05145	    0.04660	    0.04013
                     22	    0.01519	    0.01576	    0.01703	    0.01655	    0.01695	    0.01765	    0.02287
                     45	    0.00770	    0.00670	    0.00618	    0.00538	    0.00472	    0.00407	    0.00286
                     60	    0.00379	    0.00338	    0.00332	    0.00317	    0.00271	    0.00222	    0.00167
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              </tableData>
          </table>
       </product>
    </function>
    <function name="aero/c/CFZDED1R">
    <description>LIFT DUE TO ELEVON 1R</description>
    <product>
          <table>
            <independentVar lookup="row">aero/alpha-deg</independentVar>
            <independentVar lookup="column">aero/beta-deg</independentVar>
            <independentVar lookup="table">fcs/elevon-1R-pos-deg</independentVar>
              <tableData breakPoint="-25">
                              -10	        -5	        -2	         0	         2	         5	        10
                    -10	  -0.11779	  -0.10879	  -0.10260	  -0.09733	  -0.09217	  -0.08531	  -0.07734
                      3	  -0.12326	  -0.12347	  -0.12206	  -0.12197	  -0.12175	  -0.12051	  -0.11736
                      9	  -0.13437	  -0.13017	  -0.12891	  -0.12901	  -0.12851	  -0.12643	  -0.12194
                     15	  -0.11532	  -0.11934	  -0.11244	  -0.10937	  -0.10740	  -0.10417	  -0.09381
                     22	  -0.04736	  -0.04094	  -0.03941	  -0.03929	  -0.03662	  -0.04391	  -0.04503
                     45	  -0.01593	  -0.01407	  -0.01243	  -0.01108	  -0.00955	  -0.00818	  -0.00641
                     60	  -0.00972	  -0.00840	  -0.00827	  -0.00710	  -0.00765	  -0.00683	  -0.00452
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              </tableData>
              <tableData breakPoint="-20">
                              -10	        -5	        -2	         0	         2	         5	        10
                    -10	  -0.10118	  -0.09281	  -0.08770	  -0.08455	  -0.07996	  -0.07353	  -0.06600
                      3	  -0.10272	  -0.10289	  -0.10170	  -0.10160	  -0.10140	  -0.10023	  -0.09762
                      9	  -0.11212	  -0.10856	  -0.10731	  -0.10747	  -0.10703	  -0.10519	  -0.10129
                     15	  -0.09339	  -0.09398	  -0.09126	  -0.08818	  -0.08638	  -0.08356	  -0.07455
                     22	  -0.03675	  -0.03106	  -0.03110	  -0.03042	  -0.02879	  -0.03621	  -0.03576
                     45	  -0.01289	  -0.01136	  -0.01011	  -0.00897	  -0.00769	  -0.00695	  -0.00523
                     60	  -0.00774	  -0.00669	  -0.00647	  -0.00543	  -0.00607	  -0.00566	  -0.00361
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              </tableData>
              <tableData breakPoint="-16">
                              -10	        -5	        -2	         0	         2	         5	        10
                    -10	  -0.08594	  -0.07816	  -0.07363	  -0.07081	  -0.06792	  -0.06278	  -0.05575
                      3	  -0.08434	  -0.08444	  -0.08344	  -0.08335	  -0.08316	  -0.08214	  -0.08000
                      9	  -0.09216	  -0.08916	  -0.08798	  -0.08820	  -0.08779	  -0.08618	  -0.08285
                     15	  -0.07385	  -0.07496	  -0.07237	  -0.06942	  -0.06800	  -0.06663	  -0.05935
                     22	  -0.02676	  -0.02434	  -0.02440	  -0.02385	  -0.02265	  -0.03083	  -0.02848
                     45	  -0.01023	  -0.00903	  -0.00798	  -0.00717	  -0.00611	  -0.00557	  -0.00410
                     60	  -0.00603	  -0.00559	  -0.00516	  -0.00477	  -0.00484	  -0.00427	  -0.00291
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              </tableData>
              <tableData breakPoint="-15">
                              -10	        -5	        -2	         0	         2	         5	        10
                    -10	  -0.08191	  -0.07427	  -0.06989	  -0.06717	  -0.06435	  -0.05993	  -0.05300
                      3	  -0.07947	  -0.07958	  -0.07864	  -0.07855	  -0.07837	  -0.07740	  -0.07539
                      9	  -0.08692	  -0.08406	  -0.08290	  -0.08314	  -0.08270	  -0.08119	  -0.07801
                     15	  -0.06896	  -0.06999	  -0.06745	  -0.06461	  -0.06382	  -0.06254	  -0.05558
                     22	  -0.02482	  -0.02279	  -0.02286	  -0.02229	  -0.02101	  -0.02854	  -0.02673
                     45	  -0.00957	  -0.00846	  -0.00747	  -0.00671	  -0.00571	  -0.00511	  -0.00380
                     60	  -0.00562	  -0.00522	  -0.00481	  -0.00454	  -0.00453	  -0.00394	  -0.00266
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              </tableData>
              <tableData breakPoint="-10">
                              -10	        -5	        -2	         0	         2	         5	        10
                    -10	  -0.05766	  -0.05295	  -0.05008	  -0.04781	  -0.04546	  -0.04221	  -0.03840
                      3	  -0.05411	  -0.05419	  -0.05350	  -0.05344	  -0.05331	  -0.05257	  -0.05127
                      9	  -0.05938	  -0.05726	  -0.05634	  -0.05660	  -0.05620	  -0.05500	  -0.05276
                     15	  -0.04462	  -0.04583	  -0.04137	  -0.03929	  -0.04218	  -0.04163	  -0.03783
                     22	  -0.01565	  -0.01427	  -0.01477	  -0.01404	  -0.01368	  -0.01448	  -0.01810
                     45	  -0.00627	  -0.00556	  -0.00494	  -0.00434	  -0.00374	  -0.00341	  -0.00219
                     60	  -0.00355	  -0.00334	  -0.00320	  -0.00280	  -0.00300	  -0.00257	  -0.00172
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              </tableData>
              <tableData breakPoint="-5">
                              -10	        -5	        -2	         0	         2	         5	        10
                    -10	  -0.02961	  -0.02704	  -0.02574	  -0.02517	  -0.02464	  -0.02249	  -0.01969
                      3	  -0.02735	  -0.02739	  -0.02705	  -0.02700	  -0.02693	  -0.02650	  -0.02590
                      9	  -0.03015	  -0.02901	  -0.02852	  -0.02865	  -0.02822	  -0.02733	  -0.02629
                     15	  -0.02319	  -0.02292	  -0.01944	  -0.01872	  -0.01920	  -0.02179	  -0.01725
                     22	  -0.00698	  -0.00669	  -0.00675	  -0.00638	  -0.00648	  -0.00691	  -0.00899
                     45	  -0.00304	  -0.00267	  -0.00240	  -0.00206	  -0.00181	  -0.00167	  -0.00117
                     60	  -0.00168	  -0.00156	  -0.00157	  -0.00128	  -0.00138	  -0.00132	  -0.00080
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              </tableData>
              <tableData breakPoint="0">
                              -10	        -5	        -2	         0	         2	         5	        10
                    -10	    0.00000	    0.00000	    0.00000	    0.00000	    0.00000	    0.00000	    0.00000
                      3	    0.00000	    0.00000	    0.00000	    0.00000	    0.00003	    0.00000	    0.00000
                      9	    0.00000	    0.00000	    0.00000	    0.00000	    0.00000	    0.00000	    0.00000
                     15	    0.00000	    0.00000	    0.00000	    0.00001	    0.00000	    0.00000	    0.00000
                     22	    0.00000	    0.00000	    0.00000	    0.00000	    0.00000	    0.00000	    0.00000
                     45	    0.00000	    0.00000	    0.00000	    0.00003	    0.00000	    0.00000	    0.00000
                     60	    0.00000	    0.00001	    0.00000	    0.00008	    0.00000	    0.00000	    0.00000
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              </tableData>
              <tableData breakPoint="5">
                              -10	        -5	        -2	         0	         2	         5	        10
                    -10	    0.02871	    0.02944	    0.02764	    0.02589	    0.02482	    0.02446	    0.02073
                      3	    0.02801	    0.02758	    0.02762	    0.02765	    0.02734	    0.02651	    0.02598
                      9	    0.02896	    0.02794	    0.02661	    0.02587	    0.02551	    0.02512	    0.02432
                     15	    0.02208	    0.02695	    0.02267	    0.01901	    0.01721	    0.01693	    0.01432
                     22	    0.00634	    0.00591	    0.00613	    0.00605	    0.00614	    0.00646	    0.00709
                     45	    0.00289	    0.00244	    0.00230	    0.00199	    0.00170	    0.00138	    0.00105
                     60	    0.00148	    0.00134	    0.00126	    0.00118	    0.00101	    0.00053	    0.00041
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              </tableData>
              <tableData breakPoint="10">
                              -10	        -5	        -2	         0	         2	         5	        10
                    -10	    0.05775	    0.05818	    0.05567	    0.05358	    0.05169	    0.04927	    0.04397
                      3	    0.05620	    0.05543	    0.05562	    0.05556	    0.05493	    0.05360	    0.05212
                      9	    0.05629	    0.05350	    0.05146	    0.05048	    0.05020	    0.04939	    0.04634
                     15	    0.04254	    0.04607	    0.04204	    0.03749	    0.03400	    0.03160	    0.02786
                     22	    0.01127	    0.01123	    0.01145	    0.01127	    0.01147	    0.01212	    0.01456
                     45	    0.00530	    0.00457	    0.00425	    0.00367	    0.00319	    0.00283	    0.00211
                     60	    0.00281	    0.00243	    0.00250	    0.00214	    0.00190	    0.00137	    0.00104
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              </tableData>
              <tableData breakPoint="13">
                              -10	        -5	        -2	         0	         2	         5	        10
                    -10	    0.07447	    0.07474	    0.07184	    0.06958	    0.06750	    0.06502	    0.05778
                      3	    0.07261	    0.07185	    0.07215	    0.07196	    0.07107	    0.06950	    0.06731
                      9	    0.07171	    0.06812	    0.06566	    0.06432	    0.06337	    0.06128	    0.05645
                     15	    0.04816	    0.05251	    0.05146	    0.04918	    0.04439	    0.03938	    0.03465
                     22	    0.01313	    0.01403	    0.01441	    0.01401	    0.01437	    0.01492	    0.01949
                     45	    0.00658	    0.00571	    0.00527	    0.00458	    0.00399	    0.00349	    0.00250
                     60	    0.00332	    0.00294	    0.00292	    0.00261	    0.00235	    0.00176	    0.00142
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              </tableData>
              <tableData breakPoint="16">
                              -10	        -5	        -2	         0	         2	         5	        10
                    -10	    0.09044	    0.09059	    0.08735	    0.08492	    0.08268	    0.08013	    0.07245
                      3	    0.08837	    0.08760	    0.08804	    0.08784	    0.08668	    0.08477	    0.08183
                      9	    0.08412	    0.07998	    0.07728	    0.07579	    0.07484	    0.07252	    0.06707
                     15	    0.05574	    0.06121	    0.06125	    0.05716	    0.05145	    0.04660	    0.04013
                     22	    0.01519	    0.01576	    0.01703	    0.01655	    0.01695	    0.01765	    0.02287
                     45	    0.00770	    0.00670	    0.00618	    0.00538	    0.00472	    0.00407	    0.00286
                     60	    0.00379	    0.00338	    0.00332	    0.00317	    0.00271	    0.00222	    0.00167
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              </tableData>
          </table>
       </product>
    </function>
    <function name="aero/c/CFZDEL">
    <description>LIFT DUE TO LOWER SPEEDBRAKE DEFLECTION</description>
    <product>
          <table>
            <independentVar lookup="row">aero/alpha-deg</independentVar>
            <independentVar lookup="column">fcs/airbrake-upper</independentVar>
            <tableData>
                                  0	          5	         10	         15	         20	         25	         30	         35	         40	         45	         50	         55
                    -10	  -0.00036	  -0.00182	  -0.00482	  -0.00912	  -0.01369	  -0.01678	  -0.02083	  -0.01844	  -0.01632	  -0.01519	  -0.01455	  -0.01553
                      3	  -0.00007	    0.00011	    0.00026	    0.00017	    0.00025	    0.00040	    0.00103	    0.00176	    0.00227	    0.00256	    0.00262	    0.00249
                      9	  -0.00036	    0.00080	    0.00186	    0.00280	    0.00359	    0.00423	    0.00533	    0.00655	    0.00744	    0.00799	    0.00813	    0.00786
                     15	  -0.00011	    0.00009	    0.00030	    0.00037	    0.00042	    0.00100	    0.00155	    0.00266	    0.00322	    0.00364	    0.00374	    0.00355
                     22	    0.00035	  -0.00002	  -0.00042	  -0.00088	  -0.00134	  -0.00186	  -0.00201	  -0.00168	  -0.00139	  -0.00120	  -0.00115	  -0.00125
                     45	    0.00201	    0.00079	  -0.00043	  -0.00167	  -0.00292	  -0.00412	  -0.00520	  -0.00594	  -0.00650	  -0.00670	  -0.00673	  -0.00667
                     60	    0.00229	    0.00145	    0.00053	  -0.00042	  -0.00137	  -0.00230	  -0.00316	  -0.00390	  -0.00441	  -0.00469	  -0.00476	  -0.00462
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            </tableData>
          </table>
       </product>
    </function>
    <function name="aero/c/CFZDSBU">
    <description>LIFT DUE TO UPPER SPEEDBRAKE DEFLECTION</description>
    <product>
          <table>
            <independentVar lookup="row">aero/alpha-deg</independentVar>
            <independentVar lookup="column">fcs/airbrake-lower</independentVar>
            <tableData>
                                  0	          5	         11	         17	         22	         28	         34	         39	         45	         50	         56	         62	         67
                    -10	  -0.00028	    0.00102	    0.00211	    0.00226	    0.00327	    0.00456	    0.00043	  -0.00028	  -0.00129	  -0.00137	  -0.00116	    0.00016	    0.00327
                      3	  -0.00007	  -0.00029	  -0.00037	  -0.00018	    0.00020	    0.00087	    0.00122	  -0.00012	  -0.00318	  -0.00392	  -0.00324	    0.00124	    0.00129
                      9	  -0.00034	  -0.00152	  -0.00297	  -0.00399	  -0.00474	  -0.00583	  -0.00669	  -0.00717	  -0.00745	  -0.00752	  -0.00730	  -0.00690	  -0.00620
                     15	  -0.00013	  -0.00021	  -0.00010	    0.00024	    0.00049	    0.00025	  -0.00024	  -0.00049	  -0.00078	  -0.00083	  -0.00069	  -0.00035	    0.00005
                     22	    0.00030	    0.00074	    0.00145	    0.00212	    0.00267	    0.00282	    0.00251	    0.00227	    0.00211	    0.00207	    0.00216	    0.00241	    0.00273
                     45	    0.00177	    0.00290	    0.00413	    0.00516	    0.00582	    0.00627	    0.00653	    0.00666	    0.00674	    0.00676	    0.00671	    0.00658	    0.00638
                     60	    0.00210	    0.00285	    0.00357	    0.00409	    0.00434	    0.00449	    0.00455	    0.00456	    0.00455	    0.00455	    0.00455	    0.00456	    0.00452
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            </tableData>
          </table>
       </product>
    </function>
    <function name="aero/c/CFZDSD1L">
    <description>LIFT DUE TO LE SLAT 1L</description>
    <product>
          <table>
            <independentVar lookup="row">aero/alpha-deg</independentVar>
            <independentVar lookup="column">fcs/slat-1L-pos-deg</independentVar>
            <tableData>
                                -17	        -14	        -10	         -7	         -3	          0	          3	          7	         10	         14	         17
                    -10	  -0.00628	  -0.00525	  -0.00379	  -0.00268	  -0.00114	    0.00000	    0.00116	    0.00258	    0.00363	    0.00494	    0.00585
                      3	  -0.00138	  -0.00120	  -0.00091	  -0.00067	  -0.00030	    0.00000	    0.00030	    0.00077	    0.00114	    0.00162	    0.00198
                      9	  -0.00522	  -0.00442	  -0.00329	  -0.00235	  -0.00103	    0.00000	    0.00105	    0.00245	    0.00349	    0.00483	    0.00577
                     15	  -0.01174	  -0.00987	  -0.00719	  -0.00508	  -0.00220	    0.00001	    0.00221	    0.00512	    0.00747	    0.01048	    0.01248
                     22	  -0.00587	  -0.00478	  -0.00347	  -0.00230	  -0.00074	  -0.00003	    0.00063	    0.00138	    0.00207	    0.00275	    0.00327
                     45	    0.00020	    0.00017	    0.00013	    0.00010	    0.00006	    0.00004	    0.00000	  -0.00002	  -0.00004	  -0.00006	  -0.00009
                     60	    0.00023	    0.00018	    0.00012	    0.00007	    0.00004	    0.00009	    0.00005	  -0.00005	  -0.00009	  -0.00011	  -0.00012
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            </tableData>
          </table>
       </product>
    </function>
    <function name="aero/c/CFZDSD1R">
    <description>LIFT DUE TO LE SLAT 1R</description>
    <product>
          <table>
            <independentVar lookup="row">aero/alpha-deg</independentVar>
            <independentVar lookup="column">fcs/slat-1R-pos-deg</independentVar>
            <tableData>
                                -17	        -14	        -10	         -7	         -3	          0	          3	          7	         10	         14	         17
                    -10	  -0.00628	  -0.00525	  -0.00379	  -0.00268	  -0.00114	    0.00000	    0.00116	    0.00258	    0.00363	    0.00494	    0.00585
                      3	  -0.00138	  -0.00120	  -0.00091	  -0.00067	  -0.00030	    0.00000	    0.00030	    0.00077	    0.00114	    0.00162	    0.00198
                      9	  -0.00522	  -0.00442	  -0.00329	  -0.00235	  -0.00103	    0.00000	    0.00105	    0.00245	    0.00349	    0.00483	    0.00577
                     15	  -0.01174	  -0.00987	  -0.00719	  -0.00508	  -0.00220	    0.00001	    0.00221	    0.00512	    0.00747	    0.01048	    0.01248
                     22	  -0.00587	  -0.00478	  -0.00347	  -0.00230	  -0.00074	  -0.00003	    0.00063	    0.00138	    0.00207	    0.00275	    0.00327
                     45	    0.00020	    0.00017	    0.00013	    0.00010	    0.00006	    0.00004	    0.00000	  -0.00002	  -0.00004	  -0.00006	  -0.00009
                     60	    0.00023	    0.00018	    0.00012	    0.00007	    0.00004	    0.00009	    0.00005	  -0.00005	  -0.00009	  -0.00011	  -0.00012
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            </tableData>
          </table>
       </product>
    </function>
    <function name="aero/c/CFZGEAR">
    <description>LIFT INCREMENT DUE TO GEAR</description>
    <product>
          <property>gear/gear-pos-norm</property>
          <table>
            <independentVar lookup="row">aero/alpha-deg</independentVar>
            <tableData>
                    -10		  -0.00039
                     -5		  -0.00034
                      3		    0.00023
                      8		    0.00036
                     13		    0.00238
                     18		    0.00309
                     25		    0.00609
                     35		    0.00871
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            </tableData>
          </table>
       </product>
    </function>
    <function name="aero/c/CFZmn">
    <description>LIFT DUE TO MACH</description>
    <product>
          <table>
            <independentVar lookup="row">velocities/mach</independentVar>
            <independentVar lookup="column">aero/alpha-deg</independentVar>
            <tableData>
                                -10	         -1	       0.01	          1	         10
                    0.2	    0.08424	    0.00264	  -0.00035	  -0.00311	  -0.08422
                    0.8	  -0.04154	  -0.00206	    0.00111	    0.00417	    0.04523
                   0.99	  -0.01588	  -0.00193	    0.00783	    0.01764	    0.03665
                    1.3	    0.09617	    0.01603	    0.02223	    0.02883	  -0.03876
                    1.6	    0.13166	    0.01980	    0.02318	    0.02820	  -0.03990
                    2.2	    0.09319	    0.01567	    0.02364	    0.03146	  -0.02648
                    2.5	    0.15444	    0.01799	    0.01809	    0.01901	  -0.08445
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            </tableData>
          </table>
       </product>
    </function>
    <function name="aero/c/CMM1">
    <description>BASIC PITCHING MOMENT</description>
    <product>
          <table>
            <independentVar lookup="row">aero/alpha-deg</independentVar>
            <tableData>
                    -20		    0.00000
                    -10		  -0.01285
                      3		    0.00434
                      9		    0.01072
                     15		    0.05801
                     22		    0.16677
                     45		    0.37498
                     60		    0.47134
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            </tableData>
          </table>
       </product>
    </function>
    <function name="aero/c/CMMALPHADOT">
    <description>PITCH MOMENT DERIVATIVE FOR ALPHA DOT</description>
    <product>
          <property>aero/alphadot-rad_sec</property>
          <property>aero/ci2vel</property>
          <table>
            <independentVar lookup="row">aero/alpha-deg</independentVar>
            <tableData>
                    -10		    0.16770
                     -5		    0.01671
                      4		    0.07608
                     10		    0.21837
                     16		    0.66256
                     24		    0.85205
                     50		    0.34876
                     60		    0.37945
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            </tableData>
          </table>
       </product>
    </function>
    <function name="aero/c/CMMBETADOT">
    <description>PITCH MOMENT DERIVATIVE FOR BETA DOT</description>
    <product>
          <property>aero/betadot-rad_sec</property>
          <property>aero/ci2vel</property>
          <table>
            <independentVar lookup="row">aero/alpha-deg</independentVar>
            <tableData>
                    -10		    0.02202
                     -5		  -0.03536
                      4		  -0.02310
                     10		  -0.02719
                     16		  -0.00923
                     24		    0.01117
                     50		  -0.05054
                     60		    0.02466
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            </tableData>
          </table>
       </product>
    </function>
    <function name="aero/c/CMMDED1L">
    <description>PITCH MOMENT DUE TO ELEVON 1L</description>
    <product>
          <table>
            <independentVar lookup="row">aero/alpha-deg</independentVar>
            <independentVar lookup="column">aero/beta-deg</independentVar>
            <independentVar lookup="table">fcs/elevon-1L-pos-deg</independentVar>
              <tableData breakPoint="-25">
                              -10	        -5	        -2	         0	         2	         5	        10
                    -10	    0.05434	    0.05095	    0.04879	    0.04660	    0.04431	    0.04109	    0.03563
                      3	    0.05410	    0.05498	    0.05475	    0.05359	    0.05237	    0.05212	    0.04998
                      9	    0.06133	    0.05935	    0.05832	    0.05761	    0.05638	    0.05416	    0.05056
                     15	    0.05756	    0.05159	    0.04722	    0.04396	    0.04191	    0.03968	    0.03540
                     22	    0.03588	    0.02947	    0.02673	    0.02505	    0.02426	    0.01714	    0.02132
                     45	    0.01574	    0.01206	    0.00975	    0.00867	    0.00746	    0.00569	    0.00163
                     60	    0.00792	    0.00677	    0.00546	    0.00574	    0.00462	    0.00412	    0.00221
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              </tableData>
              <tableData breakPoint="-20">
                              -10	        -5	        -2	         0	         2	         5	        10
                    -10	    0.04669	    0.04341	    0.04171	    0.04042	    0.03835	    0.03532	    0.03037
                      3	    0.04523	    0.04596	    0.04581	    0.04484	    0.04381	    0.04350	    0.04171
                      9	    0.05145	    0.04979	    0.04884	    0.04830	    0.04726	    0.04535	    0.04221
                     15	    0.04811	    0.04266	    0.03843	    0.03546	    0.03374	    0.03195	    0.02856
                     22	    0.02926	    0.02435	    0.02191	    0.02079	    0.02006	    0.01312	    0.01663
                     45	    0.01291	    0.00993	    0.00793	    0.00722	    0.00624	    0.00461	    0.00149
                     60	    0.00646	    0.00558	    0.00450	    0.00474	    0.00377	    0.00346	    0.00204
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              </tableData>
              <tableData breakPoint="-16">
                              -10	        -5	        -2	         0	         2	         5	        10
                    -10	    0.03973	    0.03654	    0.03499	    0.03382	    0.03247	    0.03002	    0.02554
                      3	    0.03723	    0.03784	    0.03772	    0.03693	    0.03608	    0.03575	    0.03427
                      9	    0.04249	    0.04110	    0.04026	    0.03986	    0.03898	    0.03735	    0.03467
                     15	    0.03957	    0.03446	    0.03050	    0.02782	    0.02651	    0.02557	    0.02299
                     22	    0.02397	    0.01971	    0.01790	    0.01685	    0.01628	    0.00941	    0.01342
                     45	    0.01042	    0.00808	    0.00673	    0.00595	    0.00495	    0.00342	    0.00130
                     60	    0.00515	    0.00446	    0.00366	    0.00372	    0.00278	    0.00261	    0.00160
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              </tableData>
              <tableData breakPoint="-15">
                              -10	        -5	        -2	         0	         2	         5	        10
                    -10	    0.03788	    0.03472	    0.03320	    0.03207	    0.03076	    0.02861	    0.02426
                      3	    0.03511	    0.03569	    0.03559	    0.03484	    0.03403	    0.03371	    0.03232
                      9	    0.04013	    0.03880	    0.03798	    0.03763	    0.03678	    0.03524	    0.03269
                     15	    0.03731	    0.03230	    0.02841	    0.02587	    0.02488	    0.02404	    0.02168
                     22	    0.02249	    0.01849	    0.01680	    0.01582	    0.01533	    0.00857	    0.01267
                     45	    0.00978	    0.00760	    0.00633	    0.00561	    0.00467	    0.00321	    0.00124
                     60	    0.00483	    0.00421	    0.00345	    0.00349	    0.00262	    0.00255	    0.00147
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              </tableData>
              <tableData breakPoint="-10">
                              -10	        -5	        -2	         0	         2	         5	        10
                    -10	    0.02666	    0.02472	    0.02375	    0.02279	    0.02169	    0.02015	    0.01743
                      3	    0.02399	    0.02441	    0.02434	    0.02384	    0.02329	    0.02299	    0.02204
                      9	    0.02760	    0.02663	    0.02601	    0.02582	    0.02518	    0.02403	    0.02223
                     15	    0.02544	    0.02170	    0.01897	    0.01713	    0.01640	    0.01573	    0.01428
                     22	    0.01502	    0.01249	    0.01122	    0.01067	    0.01029	    0.00916	    0.00792
                     45	    0.00651	    0.00508	    0.00423	    0.00381	    0.00317	    0.00213	    0.00076
                     60	    0.00320	    0.00248	    0.00229	    0.00246	    0.00171	    0.00187	    0.00107
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              </tableData>
              <tableData breakPoint="-5">
                              -10	        -5	        -2	         0	         2	         5	        10
                    -10	    0.01368	    0.01262	    0.01218	    0.01197	    0.01173	    0.01070	    0.00892
                      3	    0.01218	    0.01240	    0.01236	    0.01211	    0.01183	    0.01165	    0.01117
                      9	    0.01412	    0.01361	    0.01328	    0.01319	    0.01273	    0.01198	    0.01111
                     15	    0.01456	    0.01152	    0.00937	    0.00832	    0.00852	    0.00740	    0.00802
                     22	    0.00767	    0.00628	    0.00574	    0.00547	    0.00516	    0.00459	    0.00374
                     45	    0.00316	    0.00251	    0.00211	    0.00197	    0.00155	    0.00108	    0.00046
                     60	    0.00160	    0.00112	    0.00117	    0.00088	    0.00080	    0.00115	    0.00068
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              </tableData>
              <tableData breakPoint="0">
                              -10	        -5	        -2	         0	         2	         5	        10
                    -10	    0.00000	    0.00000	    0.00000	    0.00000	    0.00000	    0.00000	    0.00000
                      3	    0.00000	    0.00000	    0.00000	    0.00000	    0.00000	    0.00000	    0.00000
                      9	    0.00000	    0.00000	    0.00000	    0.00000	    0.00000	    0.00000	    0.00000
                     15	    0.00000	    0.00000	    0.00000	    0.00000	    0.00000	    0.00000	    0.00000
                     22	    0.00000	    0.00000	    0.00000	    0.00000	    0.00000	    0.00000	    0.00000
                     45	    0.00000	    0.00000	    0.00000	    0.00006	    0.00000	    0.00000	    0.00000
                     60	    0.00000	    0.00001	    0.00000	    0.00000	    0.00000	    0.00000	    0.00001
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              </tableData>
              <tableData breakPoint="5">
                              -10	        -5	        -2	         0	         2	         5	        10
                    -10	  -0.01311	  -0.01387	  -0.01312	  -0.01228	  -0.01173	  -0.01153	  -0.00930
                      3	  -0.01254	  -0.01262	  -0.01279	  -0.01256	  -0.01218	  -0.01180	  -0.01135
                      9	  -0.01367	  -0.01324	  -0.01242	  -0.01184	  -0.01143	  -0.01097	  -0.01017
                     15	  -0.01359	  -0.01391	  -0.01213	  -0.00979	  -0.00792	  -0.00789	  -0.00592
                     22	  -0.00738	  -0.00607	  -0.00553	  -0.00533	  -0.00503	  -0.00441	  -0.00379
                     45	  -0.00307	  -0.00235	  -0.00196	  -0.00164	  -0.00147	  -0.00070	  -0.00043
                     60	  -0.00124	  -0.00102	  -0.00088	  -0.00088	  -0.00074	  -0.00118	  -0.00022
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              </tableData>
              <tableData breakPoint="10">
                              -10	        -5	        -2	         0	         2	         5	        10
                    -10	  -0.02645	  -0.02735	  -0.02649	  -0.02557	  -0.02458	  -0.02327	  -0.01980
                      3	  -0.02497	  -0.02521	  -0.02563	  -0.02517	  -0.02447	  -0.02379	  -0.02273
                      9	  -0.02670	  -0.02543	  -0.02417	  -0.02329	  -0.02272	  -0.02178	  -0.01948
                     15	  -0.02484	  -0.02359	  -0.02269	  -0.01990	  -0.01735	  -0.01454	  -0.01150
                     22	  -0.01428	  -0.01163	  -0.01070	  -0.01036	  -0.00979	  -0.00842	  -0.00698
                     45	  -0.00577	  -0.00447	  -0.00377	  -0.00298	  -0.00282	  -0.00167	  -0.00090
                     60	  -0.00179	  -0.00183	  -0.00144	  -0.00156	  -0.00135	  -0.00166	  -0.00046
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              </tableData>
              <tableData breakPoint="13">
                              -10	        -5	        -2	         0	         2	         5	        10
                    -10	  -0.03412	  -0.03511	  -0.03420	  -0.03322	  -0.03217	  -0.03084	  -0.02606
                      3	  -0.03221	  -0.03255	  -0.03317	  -0.03254	  -0.03169	  -0.03083	  -0.02941
                      9	  -0.03413	  -0.03250	  -0.03098	  -0.02982	  -0.02882	  -0.02710	  -0.02359
                     15	  -0.02972	  -0.02865	  -0.02745	  -0.02642	  -0.02300	  -0.01803	  -0.01444
                     22	  -0.01845	  -0.01473	  -0.01354	  -0.01317	  -0.01243	  -0.01089	  -0.00874
                     45	  -0.00723	  -0.00557	  -0.00473	  -0.00383	  -0.00356	  -0.00220	  -0.00093
                     60	  -0.00230	  -0.00225	  -0.00181	  -0.00189	  -0.00165	  -0.00192	  -0.00079
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              </tableData>
              <tableData breakPoint="16">
                              -10	        -5	        -2	         0	         2	         5	        10
                    -10	  -0.04144	  -0.04254	  -0.04159	  -0.04055	  -0.03943	  -0.03807	  -0.03289
                      3	  -0.03919	  -0.03964	  -0.04047	  -0.03973	  -0.03871	  -0.03765	  -0.03586
                      9	  -0.04016	  -0.03829	  -0.03659	  -0.03526	  -0.03416	  -0.03216	  -0.02811
                     15	  -0.03361	  -0.03293	  -0.03211	  -0.03066	  -0.02701	  -0.02272	  -0.01842
                     22	  -0.02203	  -0.01808	  -0.01627	  -0.01577	  -0.01489	  -0.01309	  -0.01025
                     45	  -0.00852	  -0.00659	  -0.00560	  -0.00460	  -0.00424	  -0.00270	  -0.00115
                     60	  -0.00273	  -0.00257	  -0.00212	  -0.00217	  -0.00189	  -0.00215	  -0.00090
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              </tableData>
          </table>
       </product>
    </function>
    <function name="aero/c/CMMDED1R">
    <description>PITCH MOMENT DUE TO ELEVON 1R</description>
    <product>
          <table>
            <independentVar lookup="row">aero/alpha-deg</independentVar>
            <independentVar lookup="column">aero/beta-deg</independentVar>
            <independentVar lookup="table">fcs/elevon-1R-pos-deg</independentVar>
              <tableData breakPoint="-25">
                              -10	        -5	        -2	         0	         2	         5	        10
                    -10	    0.05434	    0.05095	    0.04879	    0.04660	    0.04431	    0.04109	    0.03563
                      3	    0.05410	    0.05498	    0.05475	    0.05359	    0.05237	    0.05212	    0.04998
                      9	    0.06133	    0.05935	    0.05832	    0.05761	    0.05638	    0.05416	    0.05056
                     15	    0.05756	    0.05159	    0.04722	    0.04396	    0.04191	    0.03968	    0.03540
                     22	    0.03588	    0.02947	    0.02673	    0.02505	    0.02426	    0.01714	    0.02132
                     45	    0.01574	    0.01206	    0.00975	    0.00867	    0.00746	    0.00569	    0.00163
                     60	    0.00792	    0.00677	    0.00546	    0.00574	    0.00462	    0.00412	    0.00221
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              </tableData>
              <tableData breakPoint="-20">
                              -10	        -5	        -2	         0	         2	         5	        10
                    -10	    0.04669	    0.04341	    0.04171	    0.04042	    0.03835	    0.03532	    0.03037
                      3	    0.04523	    0.04596	    0.04581	    0.04484	    0.04381	    0.04350	    0.04171
                      9	    0.05145	    0.04979	    0.04884	    0.04830	    0.04726	    0.04535	    0.04221
                     15	    0.04811	    0.04266	    0.03843	    0.03546	    0.03374	    0.03195	    0.02856
                     22	    0.02926	    0.02435	    0.02191	    0.02079	    0.02006	    0.01312	    0.01663
                     45	    0.01291	    0.00993	    0.00793	    0.00722	    0.00624	    0.00461	    0.00149
                     60	    0.00646	    0.00558	    0.00450	    0.00474	    0.00377	    0.00346	    0.00204
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              </tableData>
              <tableData breakPoint="-16">
                              -10	        -5	        -2	         0	         2	         5	        10
                    -10	    0.03973	    0.03654	    0.03499	    0.03382	    0.03247	    0.03002	    0.02554
                      3	    0.03723	    0.03784	    0.03772	    0.03693	    0.03608	    0.03575	    0.03427
                      9	    0.04249	    0.04110	    0.04026	    0.03986	    0.03898	    0.03735	    0.03467
                     15	    0.03957	    0.03446	    0.03050	    0.02782	    0.02651	    0.02557	    0.02299
                     22	    0.02397	    0.01971	    0.01790	    0.01685	    0.01628	    0.00941	    0.01342
                     45	    0.01042	    0.00808	    0.00673	    0.00595	    0.00495	    0.00342	    0.00130
                     60	    0.00515	    0.00446	    0.00366	    0.00372	    0.00278	    0.00261	    0.00160
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              </tableData>
              <tableData breakPoint="-15">
                              -10	        -5	        -2	         0	         2	         5	        10
                    -10	    0.03788	    0.03472	    0.03320	    0.03207	    0.03076	    0.02861	    0.02426
                      3	    0.03511	    0.03569	    0.03559	    0.03484	    0.03403	    0.03371	    0.03232
                      9	    0.04013	    0.03880	    0.03798	    0.03763	    0.03678	    0.03524	    0.03269
                     15	    0.03731	    0.03230	    0.02841	    0.02587	    0.02488	    0.02404	    0.02168
                     22	    0.02249	    0.01849	    0.01680	    0.01582	    0.01533	    0.00857	    0.01267
                     45	    0.00978	    0.00760	    0.00633	    0.00561	    0.00467	    0.00321	    0.00124
                     60	    0.00483	    0.00421	    0.00345	    0.00349	    0.00262	    0.00255	    0.00147
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              </tableData>
              <tableData breakPoint="-10">
                              -10	        -5	        -2	         0	         2	         5	        10
                    -10	    0.02666	    0.02472	    0.02375	    0.02279	    0.02169	    0.02015	    0.01743
                      3	    0.02399	    0.02441	    0.02434	    0.02384	    0.02329	    0.02299	    0.02204
                      9	    0.02760	    0.02663	    0.02601	    0.02582	    0.02518	    0.02403	    0.02223
                     15	    0.02544	    0.02170	    0.01897	    0.01713	    0.01640	    0.01573	    0.01428
                     22	    0.01502	    0.01249	    0.01122	    0.01067	    0.01029	    0.00916	    0.00792
                     45	    0.00651	    0.00508	    0.00423	    0.00381	    0.00317	    0.00213	    0.00076
                     60	    0.00320	    0.00248	    0.00229	    0.00246	    0.00171	    0.00187	    0.00107
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              </tableData>
              <tableData breakPoint="-5">
                              -10	        -5	        -2	         0	         2	         5	        10
                    -10	    0.01368	    0.01262	    0.01218	    0.01197	    0.01173	    0.01070	    0.00892
                      3	    0.01218	    0.01240	    0.01236	    0.01211	    0.01183	    0.01165	    0.01117
                      9	    0.01412	    0.01361	    0.01328	    0.01319	    0.01273	    0.01198	    0.01111
                     15	    0.01456	    0.01152	    0.00937	    0.00832	    0.00852	    0.00740	    0.00802
                     22	    0.00767	    0.00628	    0.00574	    0.00547	    0.00516	    0.00459	    0.00374
                     45	    0.00316	    0.00251	    0.00211	    0.00197	    0.00155	    0.00108	    0.00046
                     60	    0.00160	    0.00112	    0.00117	    0.00088	    0.00080	    0.00115	    0.00068
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              </tableData>
              <tableData breakPoint="0">
                              -10	        -5	        -2	         0	         2	         5	        10
                    -10	    0.00000	    0.00000	    0.00000	    0.00000	    0.00000	    0.00000	    0.00000
                      3	    0.00000	    0.00000	    0.00000	    0.00000	    0.00000	    0.00000	    0.00000
                      9	    0.00000	    0.00000	    0.00000	    0.00000	    0.00000	    0.00000	    0.00000
                     15	    0.00000	    0.00000	    0.00000	    0.00000	    0.00000	    0.00000	    0.00000
                     22	    0.00000	    0.00000	    0.00000	    0.00000	    0.00000	    0.00000	    0.00000
                     45	    0.00000	    0.00000	    0.00000	    0.00006	    0.00000	    0.00000	    0.00000
                     60	    0.00000	    0.00001	    0.00000	    0.00000	    0.00000	    0.00000	    0.00001
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              </tableData>
              <tableData breakPoint="5">
                              -10	        -5	        -2	         0	         2	         5	        10
                    -10	  -0.01311	  -0.01387	  -0.01312	  -0.01228	  -0.01173	  -0.01153	  -0.00930
                      3	  -0.01254	  -0.01262	  -0.01279	  -0.01256	  -0.01218	  -0.01180	  -0.01135
                      9	  -0.01367	  -0.01324	  -0.01242	  -0.01184	  -0.01143	  -0.01097	  -0.01017
                     15	  -0.01359	  -0.01391	  -0.01213	  -0.00979	  -0.00792	  -0.00789	  -0.00592
                     22	  -0.00738	  -0.00607	  -0.00553	  -0.00533	  -0.00503	  -0.00441	  -0.00379
                     45	  -0.00307	  -0.00235	  -0.00196	  -0.00164	  -0.00147	  -0.00070	  -0.00043
                     60	  -0.00124	  -0.00102	  -0.00088	  -0.00088	  -0.00074	  -0.00118	  -0.00022
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              </tableData>
              <tableData breakPoint="10">
                              -10	        -5	        -2	         0	         2	         5	        10
                    -10	  -0.02645	  -0.02735	  -0.02649	  -0.02557	  -0.02458	  -0.02327	  -0.01980
                      3	  -0.02497	  -0.02521	  -0.02563	  -0.02517	  -0.02447	  -0.02379	  -0.02273
                      9	  -0.02670	  -0.02543	  -0.02417	  -0.02329	  -0.02272	  -0.02178	  -0.01948
                     15	  -0.02484	  -0.02359	  -0.02269	  -0.01990	  -0.01735	  -0.01454	  -0.01150
                     22	  -0.01428	  -0.01163	  -0.01070	  -0.01036	  -0.00979	  -0.00842	  -0.00698
                     45	  -0.00577	  -0.00447	  -0.00377	  -0.00298	  -0.00282	  -0.00167	  -0.00090
                     60	  -0.00179	  -0.00183	  -0.00144	  -0.00156	  -0.00135	  -0.00166	  -0.00046
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              </tableData>
              <tableData breakPoint="13">
                              -10	        -5	        -2	         0	         2	         5	        10
                    -10	  -0.03412	  -0.03511	  -0.03420	  -0.03322	  -0.03217	  -0.03084	  -0.02606
                      3	  -0.03221	  -0.03255	  -0.03317	  -0.03254	  -0.03169	  -0.03083	  -0.02941
                      9	  -0.03413	  -0.03250	  -0.03098	  -0.02982	  -0.02882	  -0.02710	  -0.02359
                     15	  -0.02972	  -0.02865	  -0.02745	  -0.02642	  -0.02300	  -0.01803	  -0.01444
                     22	  -0.01845	  -0.01473	  -0.01354	  -0.01317	  -0.01243	  -0.01089	  -0.00874
                     45	  -0.00723	  -0.00557	  -0.00473	  -0.00383	  -0.00356	  -0.00220	  -0.00093
                     60	  -0.00230	  -0.00225	  -0.00181	  -0.00189	  -0.00165	  -0.00192	  -0.00079
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              </tableData>
              <tableData breakPoint="16">
                              -10	        -5	        -2	         0	         2	         5	        10
                    -10	  -0.04144	  -0.04254	  -0.04159	  -0.04055	  -0.03943	  -0.03807	  -0.03289
                      3	  -0.03919	  -0.03964	  -0.04047	  -0.03973	  -0.03871	  -0.03765	  -0.03586
                      9	  -0.04016	  -0.03829	  -0.03659	  -0.03526	  -0.03416	  -0.03216	  -0.02811
                     15	  -0.03361	  -0.03293	  -0.03211	  -0.03066	  -0.02701	  -0.02272	  -0.01842
                     22	  -0.02203	  -0.01808	  -0.01627	  -0.01577	  -0.01489	  -0.01309	  -0.01025
                     45	  -0.00852	  -0.00659	  -0.00560	  -0.00460	  -0.00424	  -0.00270	  -0.00115
                     60	  -0.00273	  -0.00257	  -0.00212	  -0.00217	  -0.00189	  -0.00215	  -0.00090
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              </tableData>
          </table>
       </product>
    </function>
    <function name="aero/c/CMMDED2L">
    <description>PITCH MOMENT DUE TO ELEVON 2L</description>
    <product>
          <table>
            <independentVar lookup="row">aero/alpha-deg</independentVar>
            <independentVar lookup="column">aero/beta-deg</independentVar>
            <independentVar lookup="table">fcs/elevon-2L-pos-deg</independentVar>
              <tableData breakPoint="-25">
                              -10	        -5	        -2	         0	         2	         5	        10
                    -10	    0.04244	    0.03941	    0.03860	    0.03822	    0.03770	    0.03668	    0.03644
                      3	    0.04486	    0.04337	    0.04248	    0.04128	    0.04004	    0.03935	    0.03711
                      9	    0.05086	    0.04849	    0.04745	    0.04713	    0.04607	    0.04408	    0.04086
                     15	    0.05181	    0.04727	    0.04448	    0.04220	    0.04143	    0.04174	    0.04127
                     22	    0.04740	    0.03781	    0.03747	    0.03754	    0.03816	    0.03440	    0.04554
                     45	    0.05917	    0.04956	    0.04478	    0.04287	    0.04055	    0.03866	    0.04008
                     60	    0.03966	    0.03366	    0.03245	    0.03221	    0.03179	    0.03166	    0.03061
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              </tableData>
              <tableData breakPoint="-20">
                              -10	        -5	        -2	         0	         2	         5	        10
                    -10	    0.03540	    0.03239	    0.03163	    0.03132	    0.03102	    0.03023	    0.03017
                      3	    0.03776	    0.03648	    0.03573	    0.03470	    0.03368	    0.03308	    0.03133
                      9	    0.04342	    0.04115	    0.04013	    0.03989	    0.03896	    0.03734	    0.03488
                     15	    0.04498	    0.04058	    0.03789	    0.03578	    0.03549	    0.03595	    0.03618
                     22	    0.04068	    0.03211	    0.03186	    0.03167	    0.03241	    0.02826	    0.04095
                     45	    0.05342	    0.04470	    0.04047	    0.03918	    0.03732	    0.03639	    0.03797
                     60	    0.03642	    0.03095	    0.03001	    0.02989	    0.02946	    0.02978	    0.02960
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              </tableData>
              <tableData breakPoint="-16">
                              -10	        -5	        -2	         0	         2	         5	        10
                    -10	    0.02894	    0.02604	    0.02533	    0.02507	    0.02483	    0.02431	    0.02450
                      3	    0.03140	    0.03027	    0.02963	    0.02880	    0.02797	    0.02748	    0.02614
                      9	    0.03673	    0.03457	    0.03358	    0.03341	    0.03261	    0.03129	    0.02966
                     15	    0.03872	    0.03456	    0.03198	    0.03024	    0.03018	    0.03076	    0.03161
                     22	    0.03515	    0.02691	    0.02669	    0.02647	    0.02706	    0.02329	    0.03524
                     45	    0.04841	    0.04054	    0.03680	    0.03606	    0.03446	    0.03396	    0.03640
                     60	    0.03409	    0.02872	    0.02753	    0.02779	    0.02738	    0.02734	    0.02848
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              </tableData>
              <tableData breakPoint="-15">
                              -10	        -5	        -2	         0	         2	         5	        10
                    -10	    0.02720	    0.02434	    0.02366	    0.02341	    0.02319	    0.02277	    0.02301
                      3	    0.02973	    0.02864	    0.02803	    0.02724	    0.02646	    0.02601	    0.02477
                      9	    0.03497	    0.03283	    0.03186	    0.03170	    0.03094	    0.02969	    0.02831
                     15	    0.03712	    0.03298	    0.03043	    0.02880	    0.02879	    0.02940	    0.03041
                     22	    0.03372	    0.02566	    0.02541	    0.02528	    0.02603	    0.02191	    0.03358
                     45	    0.04710	    0.03947	    0.03588	    0.03513	    0.03371	    0.03335	    0.03593
                     60	    0.03337	    0.02814	    0.02686	    0.02704	    0.02674	    0.02691	    0.02823
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              </tableData>
              <tableData breakPoint="-10">
                              -10	        -5	        -2	         0	         2	         5	        10
                    -10	    0.01801	    0.01545	    0.01487	    0.01467	    0.01453	    0.01462	    0.01512
                      3	    0.02096	    0.02007	    0.01961	    0.01906	    0.01854	    0.01827	    0.01761
                      9	    0.02574	    0.02377	    0.02286	    0.02282	    0.02222	    0.02144	    0.02123
                     15	    0.02872	    0.02471	    0.02245	    0.02128	    0.02148	    0.02225	    0.02406
                     22	    0.02669	    0.01923	    0.01915	    0.01927	    0.01966	    0.01491	    0.02570
                     45	    0.04060	    0.03419	    0.03089	    0.03077	    0.02971	    0.03012	    0.03307
                     60	    0.03023	    0.02507	    0.02417	    0.02448	    0.02410	    0.02474	    0.02698
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              </tableData>
              <tableData breakPoint="-5">
                              -10	        -5	        -2	         0	         2	         5	        10
                    -10	    0.00826	    0.00598	    0.00549	    0.00537	    0.00532	    0.00555	    0.00677
                      3	    0.01172	    0.01103	    0.01072	    0.01042	    0.01018	    0.01012	    0.01004
                      9	    0.01595	    0.01421	    0.01351	    0.01346	    0.01304	    0.01304	    0.01370
                     15	    0.01978	    0.01585	    0.01426	    0.01332	    0.01376	    0.01477	    0.01740
                     22	    0.01901	    0.01238	    0.01257	    0.01257	    0.01290	    0.00799	    0.01887
                     45	    0.03411	    0.02886	    0.02607	    0.02624	    0.02564	    0.02648	    0.03051
                     60	    0.02671	    0.02280	    0.02162	    0.02191	    0.02151	    0.02248	    0.02573
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              </tableData>
              <tableData breakPoint="0">
                              -10	        -5	        -2	         0	         2	         5	        10
                    -10	  -0.00192	  -0.00388	  -0.00421	  -0.00424	  -0.00421	  -0.00389	  -0.00193
                      3	    0.00230	    0.00181	    0.00164	    0.00160	    0.00164	    0.00181	    0.00230
                      9	    0.00592	    0.00443	    0.00395	    0.00393	    0.00395	    0.00443	    0.00593
                     15	    0.01071	    0.00712	    0.00588	    0.00518	    0.00588	    0.00712	    0.01072
                     22	    0.01158	    0.00558	    0.00583	    0.00583	    0.00583	    0.00551	    0.01158
                     45	    0.02788	    0.02316	    0.02151	    0.02203	    0.02153	    0.02317	    0.02790
                     60	    0.02350	    0.02010	    0.01917	    0.01953	    0.01917	    0.02012	    0.02351
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              </tableData>
              <tableData breakPoint="5">
                              -10	        -5	        -2	         0	         2	         5	        10
                    -10	  -0.01184	  -0.01404	  -0.01395	  -0.01391	  -0.01377	  -0.01340	  -0.01044
                      3	  -0.00714	  -0.00744	  -0.00747	  -0.00725	  -0.00694	  -0.00653	  -0.00549
                      9	  -0.00353	  -0.00538	  -0.00561	  -0.00552	  -0.00503	  -0.00423	  -0.00139
                     15	  -0.00297	  -0.00602	  -0.00592	  -0.00464	  -0.00288	  -0.00092	    0.00344
                     22	    0.00376	  -0.00609	  -0.00110	  -0.00111	  -0.00131	  -0.00106	    0.00541
                     45	    0.02220	    0.01824	    0.01731	    0.01793	    0.01786	    0.01980	    0.02528
                     60	    0.02075	    0.01807	    0.01706	    0.01747	    0.01723	    0.01830	    0.02223
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              </tableData>
              <tableData breakPoint="10">
                              -10	        -5	        -2	         0	         2	         5	        10
                    -10	  -0.02161	  -0.02401	  -0.02358	  -0.02340	  -0.02315	  -0.02273	  -0.01924
                      3	  -0.01633	  -0.01647	  -0.01638	  -0.01591	  -0.01534	  -0.01468	  -0.01312
                      9	  -0.01329	  -0.01494	  -0.01491	  -0.01443	  -0.01380	  -0.01270	  -0.00914
                     15	  -0.01580	  -0.01792	  -0.01848	  -0.01695	  -0.01341	  -0.00969	  -0.00446
                     22	  -0.00374	  -0.01339	  -0.00776	  -0.00794	  -0.00808	  -0.00751	    0.00010
                     45	    0.01708	    0.01380	    0.01352	    0.01447	    0.01474	    0.01673	    0.02281
                     60	    0.01849	    0.01619	    0.01533	    0.01584	    0.01483	    0.01670	    0.02131
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              </tableData>
              <tableData breakPoint="13">
                              -10	        -5	        -2	         0	         2	         5	        10
                    -10	  -0.02728	  -0.02940	  -0.02932	  -0.02892	  -0.02861	  -0.02814	  -0.02433
                      3	  -0.02160	  -0.02166	  -0.02151	  -0.02091	  -0.02019	  -0.01933	  -0.01752
                      9	  -0.01890	  -0.02044	  -0.02008	  -0.01948	  -0.01881	  -0.01758	  -0.01364
                     15	  -0.02226	  -0.02401	  -0.02435	  -0.02269	  -0.02039	  -0.01525	  -0.00858
                     22	  -0.00849	  -0.01731	  -0.01208	  -0.01182	  -0.01186	  -0.01111	  -0.00330
                     45	    0.01437	    0.01155	    0.01145	    0.01255	    0.01306	    0.01520	    0.02156
                     60	    0.01700	    0.01526	    0.01454	    0.01499	    0.01403	    0.01596	    0.02078
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              </tableData>
              <tableData breakPoint="16">
                              -10	        -5	        -2	         0	         2	         5	        10
                    -10	  -0.03277	  -0.03494	  -0.03447	  -0.03421	  -0.03386	  -0.03337	  -0.02922
                      3	  -0.02662	  -0.02662	  -0.02642	  -0.02567	  -0.02481	  -0.02379	  -0.02174
                      9	  -0.02425	  -0.02567	  -0.02497	  -0.02429	  -0.02361	  -0.02224	  -0.01796
                     15	  -0.02706	  -0.02851	  -0.02901	  -0.02779	  -0.02566	  -0.02064	  -0.01223
                     22	  -0.01259	  -0.02103	  -0.01564	  -0.01591	  -0.01548	  -0.01448	  -0.00602
                     45	    0.01195	    0.00944	    0.00957	    0.01083	    0.01148	    0.01381	    0.02046
                     60	    0.01610	    0.01450	    0.01384	    0.01431	    0.01339	    0.01534	    0.01997
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              </tableData>
          </table>
       </product>
    </function>
    <function name="aero/c/CMMDED2R">
    <description>PITCH MOMENT DUE TO ELEVON 2R</description>
    <product>
          <table>
            <independentVar lookup="row">aero/alpha-deg</independentVar>
            <independentVar lookup="column">aero/beta-deg</independentVar>
            <independentVar lookup="table">fcs/elevon-2R-pos-deg</independentVar>
              <tableData breakPoint="-25">
                              -10	        -5	        -2	         0	         2	         5	        10
                    -10	    0.04244	    0.03941	    0.03860	    0.03822	    0.03770	    0.03668	    0.03644
                      3	    0.04486	    0.04337	    0.04248	    0.04128	    0.04004	    0.03935	    0.03711
                      9	    0.05086	    0.04849	    0.04745	    0.04713	    0.04607	    0.04408	    0.04086
                     15	    0.05181	    0.04727	    0.04448	    0.04220	    0.04143	    0.04174	    0.04127
                     22	    0.04740	    0.03781	    0.03747	    0.03754	    0.03816	    0.03440	    0.04554
                     45	    0.05917	    0.04956	    0.04478	    0.04287	    0.04055	    0.03866	    0.04008
                     60	    0.03966	    0.03366	    0.03245	    0.03221	    0.03179	    0.03166	    0.03061
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              </tableData>
              <tableData breakPoint="-20">
                              -10	        -5	        -2	         0	         2	         5	        10
                    -10	    0.03540	    0.03239	    0.03163	    0.03132	    0.03102	    0.03023	    0.03017
                      3	    0.03776	    0.03648	    0.03573	    0.03470	    0.03368	    0.03308	    0.03133
                      9	    0.04342	    0.04115	    0.04013	    0.03989	    0.03896	    0.03734	    0.03488
                     15	    0.04498	    0.04058	    0.03789	    0.03578	    0.03549	    0.03595	    0.03618
                     22	    0.04068	    0.03211	    0.03186	    0.03167	    0.03241	    0.02826	    0.04095
                     45	    0.05342	    0.04470	    0.04047	    0.03918	    0.03732	    0.03639	    0.03797
                     60	    0.03642	    0.03095	    0.03001	    0.02989	    0.02946	    0.02978	    0.02960
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              </tableData>
              <tableData breakPoint="-16">
                              -10	        -5	        -2	         0	         2	         5	        10
                    -10	    0.02894	    0.02604	    0.02533	    0.02507	    0.02483	    0.02431	    0.02450
                      3	    0.03140	    0.03027	    0.02963	    0.02880	    0.02797	    0.02748	    0.02614
                      9	    0.03673	    0.03457	    0.03358	    0.03341	    0.03261	    0.03129	    0.02966
                     15	    0.03872	    0.03456	    0.03198	    0.03024	    0.03018	    0.03076	    0.03161
                     22	    0.03515	    0.02691	    0.02669	    0.02647	    0.02706	    0.02329	    0.03524
                     45	    0.04841	    0.04054	    0.03680	    0.03606	    0.03446	    0.03396	    0.03640
                     60	    0.03409	    0.02872	    0.02753	    0.02779	    0.02738	    0.02734	    0.02848
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              </tableData>
              <tableData breakPoint="-15">
                              -10	        -5	        -2	         0	         2	         5	        10
                    -10	    0.02720	    0.02434	    0.02366	    0.02341	    0.02319	    0.02277	    0.02301
                      3	    0.02973	    0.02864	    0.02803	    0.02724	    0.02646	    0.02601	    0.02477
                      9	    0.03497	    0.03283	    0.03186	    0.03170	    0.03094	    0.02969	    0.02831
                     15	    0.03712	    0.03298	    0.03043	    0.02880	    0.02879	    0.02940	    0.03041
                     22	    0.03372	    0.02566	    0.02541	    0.02528	    0.02603	    0.02191	    0.03358
                     45	    0.04710	    0.03947	    0.03588	    0.03513	    0.03371	    0.03335	    0.03593
                     60	    0.03337	    0.02814	    0.02686	    0.02704	    0.02674	    0.02691	    0.02823
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              </tableData>
              <tableData breakPoint="-10">
                              -10	        -5	        -2	         0	         2	         5	        10
                    -10	    0.01801	    0.01545	    0.01487	    0.01467	    0.01453	    0.01462	    0.01512
                      3	    0.02096	    0.02007	    0.01961	    0.01906	    0.01854	    0.01827	    0.01761
                      9	    0.02574	    0.02377	    0.02286	    0.02282	    0.02222	    0.02144	    0.02123
                     15	    0.02872	    0.02471	    0.02245	    0.02128	    0.02148	    0.02225	    0.02406
                     22	    0.02669	    0.01923	    0.01915	    0.01927	    0.01966	    0.01491	    0.02570
                     45	    0.04060	    0.03419	    0.03089	    0.03077	    0.02971	    0.03012	    0.03307
                     60	    0.03023	    0.02507	    0.02417	    0.02448	    0.02410	    0.02474	    0.02698
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              </tableData>
              <tableData breakPoint="-5">
                              -10	        -5	        -2	         0	         2	         5	        10
                    -10	    0.00826	    0.00598	    0.00549	    0.00537	    0.00532	    0.00555	    0.00677
                      3	    0.01172	    0.01103	    0.01072	    0.01042	    0.01018	    0.01012	    0.01004
                      9	    0.01595	    0.01421	    0.01351	    0.01346	    0.01304	    0.01304	    0.01370
                     15	    0.01978	    0.01585	    0.01426	    0.01332	    0.01376	    0.01477	    0.01740
                     22	    0.01901	    0.01238	    0.01257	    0.01257	    0.01290	    0.00799	    0.01887
                     45	    0.03411	    0.02886	    0.02607	    0.02624	    0.02564	    0.02648	    0.03051
                     60	    0.02671	    0.02280	    0.02162	    0.02191	    0.02151	    0.02248	    0.02573
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              </tableData>
              <tableData breakPoint="0">
                              -10	        -5	        -2	         0	         2	         5	        10
                    -10	  -0.00192	  -0.00388	  -0.00421	  -0.00424	  -0.00421	  -0.00389	  -0.00193
                      3	    0.00230	    0.00181	    0.00164	    0.00160	    0.00164	    0.00181	    0.00230
                      9	    0.00592	    0.00443	    0.00395	    0.00393	    0.00395	    0.00443	    0.00593
                     15	    0.01071	    0.00712	    0.00588	    0.00518	    0.00588	    0.00712	    0.01072
                     22	    0.01158	    0.00558	    0.00583	    0.00583	    0.00583	    0.00551	    0.01158
                     45	    0.02788	    0.02316	    0.02151	    0.02203	    0.02153	    0.02317	    0.02790
                     60	    0.02350	    0.02010	    0.01917	    0.01953	    0.01917	    0.02012	    0.02351
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              </tableData>
              <tableData breakPoint="5">
                              -10	        -5	        -2	         0	         2	         5	        10
                    -10	  -0.01184	  -0.01404	  -0.01395	  -0.01391	  -0.01377	  -0.01340	  -0.01044
                      3	  -0.00714	  -0.00744	  -0.00747	  -0.00725	  -0.00694	  -0.00653	  -0.00549
                      9	  -0.00353	  -0.00538	  -0.00561	  -0.00552	  -0.00503	  -0.00423	  -0.00139
                     15	  -0.00297	  -0.00602	  -0.00592	  -0.00464	  -0.00288	  -0.00092	    0.00344
                     22	    0.00376	  -0.00609	  -0.00110	  -0.00111	  -0.00131	  -0.00106	    0.00541
                     45	    0.02220	    0.01824	    0.01731	    0.01793	    0.01786	    0.01980	    0.02528
                     60	    0.02075	    0.01807	    0.01706	    0.01747	    0.01723	    0.01830	    0.02223
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              </tableData>
              <tableData breakPoint="10">
                              -10	        -5	        -2	         0	         2	         5	        10
                    -10	  -0.02161	  -0.02401	  -0.02358	  -0.02340	  -0.02315	  -0.02273	  -0.01924
                      3	  -0.01633	  -0.01647	  -0.01638	  -0.01591	  -0.01534	  -0.01468	  -0.01312
                      9	  -0.01329	  -0.01494	  -0.01491	  -0.01443	  -0.01380	  -0.01270	  -0.00914
                     15	  -0.01580	  -0.01792	  -0.01848	  -0.01695	  -0.01341	  -0.00969	  -0.00446
                     22	  -0.00374	  -0.01339	  -0.00776	  -0.00794	  -0.00808	  -0.00751	    0.00010
                     45	    0.01708	    0.01380	    0.01352	    0.01447	    0.01474	    0.01673	    0.02281
                     60	    0.01849	    0.01619	    0.01533	    0.01584	    0.01483	    0.01670	    0.02131
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              </tableData>
              <tableData breakPoint="13">
                              -10	        -5	        -2	         0	         2	         5	        10
                    -10	  -0.02728	  -0.02940	  -0.02932	  -0.02892	  -0.02861	  -0.02814	  -0.02433
                      3	  -0.02160	  -0.02166	  -0.02151	  -0.02091	  -0.02019	  -0.01933	  -0.01752
                      9	  -0.01890	  -0.02044	  -0.02008	  -0.01948	  -0.01881	  -0.01758	  -0.01364
                     15	  -0.02226	  -0.02401	  -0.02435	  -0.02269	  -0.02039	  -0.01525	  -0.00858
                     22	  -0.00849	  -0.01731	  -0.01208	  -0.01182	  -0.01186	  -0.01111	  -0.00330
                     45	    0.01437	    0.01155	    0.01145	    0.01255	    0.01306	    0.01520	    0.02156
                     60	    0.01700	    0.01526	    0.01454	    0.01499	    0.01403	    0.01596	    0.02078
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              </tableData>
              <tableData breakPoint="16">
                              -10	        -5	        -2	         0	         2	         5	        10
                    -10	  -0.03277	  -0.03494	  -0.03447	  -0.03421	  -0.03386	  -0.03337	  -0.02922
                      3	  -0.02662	  -0.02662	  -0.02642	  -0.02567	  -0.02481	  -0.02379	  -0.02174
                      9	  -0.02425	  -0.02567	  -0.02497	  -0.02429	  -0.02361	  -0.02224	  -0.01796
                     15	  -0.02706	  -0.02851	  -0.02901	  -0.02779	  -0.02566	  -0.02064	  -0.01223
                     22	  -0.01259	  -0.02103	  -0.01564	  -0.01591	  -0.01548	  -0.01448	  -0.00602
                     45	    0.01195	    0.00944	    0.00957	    0.01083	    0.01148	    0.01381	    0.02046
                     60	    0.01610	    0.01450	    0.01384	    0.01431	    0.01339	    0.01534	    0.01997
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              </tableData>
          </table>
       </product>
    </function>
    <function name="aero/c/CMMDSBL">
    <description>PITCH MOMENT DUE TO LOWER SPEEDBRAKE DEFLECTION</description>
    <product>
          <table>
            <independentVar lookup="row">aero/alpha-deg</independentVar>
            <independentVar lookup="column">fcs/airbrake-upper</independentVar>
            <tableData>
                                  0	          5	         10	         15	         20	         25	         30	         35	         40	         45	         50	         55
                    -10	    0.00021	    0.00118	    0.00264	    0.00454	    0.00600	    0.00704	    0.00897	    0.00894	    0.00785	    0.00721	    0.00691	    0.00737
                      3	    0.00003	  -0.00018	  -0.00040	  -0.00052	  -0.00070	  -0.00083	  -0.00089	  -0.00093	  -0.00098	  -0.00099	  -0.00100	  -0.00099
                      9	  -0.00004	    0.00008	    0.00024	    0.00039	    0.00057	    0.00069	    0.00084	    0.00098	    0.00108	    0.00114	    0.00116	    0.00113
                     15	  -0.00001	    0.00002	    0.00006	    0.00015	    0.00024	  -0.00034	  -0.00031	  -0.00044	  -0.00036	  -0.00035	  -0.00034	  -0.00036
                     22	  -0.00011	    0.00008	    0.00024	    0.00039	    0.00055	    0.00072	    0.00087	    0.00097	    0.00107	    0.00115	    0.00117	    0.00112
                     45	    0.00036	    0.00018	  -0.00002	  -0.00023	  -0.00043	  -0.00062	  -0.00072	  -0.00085	  -0.00095	  -0.00101	  -0.00099	  -0.00100
                     60	    0.00026	    0.00015	    0.00003	  -0.00010	  -0.00023	  -0.00036	  -0.00047	  -0.00057	  -0.00064	  -0.00068	  -0.00069	  -0.00067
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            </tableData>
          </table>
       </product>
    </function>
    <function name="aero/c/CMMDSBU">
    <description>PITCH MOMENT DUE TO UPPER SPEEDBRAKE DEFLECTION</description>
    <product>
          <table>
            <independentVar lookup="row">aero/alpha-deg</independentVar>
            <independentVar lookup="column">fcs/airbrake-lower</independentVar>
            <tableData>
                                  0	          5	         11	         17	         22	         28	         34	         39	         45	         50	         56	         62	         67
                    -10	    0.00018	  -0.00039	  -0.00050	  -0.00100	  -0.00110	  -0.00132	  -0.00151	  -0.00163	  -0.00081	  -0.00078	  -0.00084	  -0.00160	  -0.00134
                      3	    0.00003	    0.00024	    0.00063	    0.00093	    0.00102	    0.00075	    0.00039	    0.00119	    0.00253	    0.00286	    0.00257	    0.00055	    0.00055
                      9	  -0.00003	  -0.00012	  -0.00018	  -0.00025	  -0.00029	  -0.00020	  -0.00003	    0.00007	    0.00011	    0.00013	    0.00009	    0.00001	  -0.00013
                     15	  -0.00001	  -0.00005	  -0.00015	  -0.00025	  -0.00035	  -0.00048	  -0.00059	  -0.00065	  -0.00070	  -0.00071	  -0.00068	  -0.00061	  -0.00053
                     22	  -0.00009	  -0.00030	  -0.00052	  -0.00075	  -0.00092	  -0.00111	  -0.00131	  -0.00142	  -0.00149	  -0.00151	  -0.00147	  -0.00136	  -0.00119
                     45	    0.00032	    0.00047	    0.00063	    0.00075	    0.00082	    0.00088	    0.00090	    0.00091	    0.00092	    0.00093	    0.00092	    0.00090	    0.00088
                     60	    0.00023	    0.00032	    0.00041	    0.00046	    0.00049	    0.00051	    0.00052	    0.00052	    0.00052	    0.00052	    0.00052	    0.00052	    0.00052
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            </tableData>
          </table>
       </product>
    </function>
    <function name="aero/c/CMMDSD1L">
    <description>PITCH MOMENT DUE TO LE SLAT 1L</description>
    <product>
          <table>
            <independentVar lookup="row">aero/alpha-deg</independentVar>
            <independentVar lookup="column">fcs/slat-1L-pos-deg</independentVar>
            <tableData>
                                -17	        -14	        -10	         -7	         -3	          0	          3	          7	         10	         14	         17
                    -10	  -0.00379	  -0.00319	  -0.00231	  -0.00164	  -0.00071	    0.00000	    0.00070	    0.00165	    0.00233	    0.00319	    0.00379
                      3	  -0.00196	  -0.00166	  -0.00122	  -0.00087	  -0.00039	    0.00000	    0.00038	    0.00089	    0.00127	    0.00176	    0.00211
                      9	  -0.00322	  -0.00271	  -0.00198	  -0.00140	  -0.00061	    0.00000	    0.00061	    0.00141	    0.00201	    0.00276	    0.00330
                     15	  -0.00576	  -0.00483	  -0.00351	  -0.00247	  -0.00106	    0.00000	    0.00106	    0.00243	    0.00298	    0.00393	    0.00465
                     22	  -0.00682	  -0.00565	  -0.00401	  -0.00278	  -0.00112	    0.00001	    0.00107	    0.00237	    0.00327	    0.00438	    0.00515
                     45	  -0.00401	  -0.00322	  -0.00221	  -0.00148	  -0.00057	    0.00008	    0.00063	    0.00131	    0.00175	    0.00222	    0.00251
                     60	  -0.00355	  -0.00285	  -0.00195	  -0.00133	  -0.00059	    0.00002	    0.00044	    0.00078	    0.00106	    0.00131	    0.00142
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            </tableData>
          </table>
       </product>
    </function>
    <function name="aero/c/CMMDSD1R">
    <description>PITCH MOMENT DUE TO LE SLAT 1R</description>
    <product>
          <table>
            <independentVar lookup="row">aero/alpha-deg</independentVar>
            <independentVar lookup="column">fcs/slat-1R-pos-deg</independentVar>
            <tableData>
                                -17	        -14	        -10	         -7	         -3	          0	          3	          7	         10	         14	         17
                    -10	  -0.00379	  -0.00319	  -0.00231	  -0.00164	  -0.00071	    0.00000	    0.00070	    0.00165	    0.00233	    0.00319	    0.00379
                      3	  -0.00196	  -0.00166	  -0.00122	  -0.00087	  -0.00039	    0.00000	    0.00038	    0.00089	    0.00127	    0.00176	    0.00211
                      9	  -0.00322	  -0.00271	  -0.00198	  -0.00140	  -0.00061	    0.00000	    0.00061	    0.00141	    0.00201	    0.00276	    0.00330
                     15	  -0.00576	  -0.00483	  -0.00351	  -0.00247	  -0.00106	    0.00000	    0.00106	    0.00243	    0.00298	    0.00393	    0.00465
                     22	  -0.00682	  -0.00565	  -0.00401	  -0.00278	  -0.00112	    0.00001	    0.00107	    0.00237	    0.00327	    0.00438	    0.00515
                     45	  -0.00401	  -0.00322	  -0.00221	  -0.00148	  -0.00057	    0.00008	    0.00063	    0.00131	    0.00175	    0.00222	    0.00251
                     60	  -0.00355	  -0.00285	  -0.00195	  -0.00133	  -0.00059	    0.00002	    0.00044	    0.00078	    0.00106	    0.00131	    0.00142
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            </tableData>
          </table>
       </product>
    </function>
    <function name="aero/c/CMMDSD2L">
    <description>PITCH MOMENT DUE TO LE SLAT 2L</description>
    <product>
          <table>
            <independentVar lookup="row">aero/alpha-deg</independentVar>
            <independentVar lookup="column">fcs/slat-2L-pos-deg</independentVar>
            <tableData>
                                -17	        -14	        -10	         -7	         -3	          0	          3	          7	         10	         14	         17
                    -10	    0.00010	    0.00009	    0.00005	    0.00003	    0.00001	    0.00000	  -0.00001	  -0.00001	    0.00000	    0.00000	    0.00002
                      3	  -0.00059	  -0.00049	  -0.00035	  -0.00024	  -0.00011	  -0.00001	    0.00009	    0.00022	    0.00030	    0.00041	    0.00048
                      9	    0.00027	    0.00024	    0.00018	    0.00013	    0.00006	    0.00000	  -0.00007	  -0.00017	  -0.00024	  -0.00034	  -0.00042
                     15	  -0.00088	  -0.00049	  -0.00035	  -0.00024	  -0.00010	    0.00000	    0.00009	    0.00006	    0.00013	    0.00022	    0.00030
                     22	  -0.00090	  -0.00075	  -0.00053	  -0.00037	  -0.00015	    0.00000	    0.00016	    0.00034	    0.00048	    0.00065	    0.00075
                     45	    0.00009	    0.00008	    0.00008	    0.00007	    0.00006	    0.00006	    0.00007	    0.00005	    0.00005	    0.00003	    0.00003
                     60	  -0.00005	  -0.00007	    0.00005	  -0.00010	    0.00004	    0.00002	  -0.00010	  -0.00011	  -0.00001	  -0.00002	  -0.00004
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            </tableData>
          </table>
       </product>
    </function>
    <function name="aero/c/CMMDSD2R">
    <description>PITCH MOMENT DUE TO LE SLAT 2R</description>
    <product>
          <table>
            <independentVar lookup="row">aero/alpha-deg</independentVar>
            <independentVar lookup="column">fcs/slat-2R-pos-deg</independentVar>
            <tableData>
                                -17	        -14	        -10	         -7	         -3	          0	          3	          7	         10	         14	         17
                    -10	    0.00010	    0.00009	    0.00005	    0.00003	    0.00001	    0.00000	  -0.00001	  -0.00001	    0.00000	    0.00000	    0.00002
                      3	  -0.00059	  -0.00049	  -0.00035	  -0.00024	  -0.00011	  -0.00001	    0.00009	    0.00022	    0.00030	    0.00041	    0.00048
                      9	    0.00027	    0.00024	    0.00018	    0.00013	    0.00006	    0.00000	  -0.00007	  -0.00017	  -0.00024	  -0.00034	  -0.00042
                     15	  -0.00088	  -0.00049	  -0.00035	  -0.00024	  -0.00010	    0.00000	    0.00009	    0.00006	    0.00013	    0.00022	    0.00030
                     22	  -0.00090	  -0.00075	  -0.00053	  -0.00037	  -0.00015	    0.00000	    0.00016	    0.00034	    0.00048	    0.00065	    0.00075
                     45	    0.00009	    0.00008	    0.00008	    0.00007	    0.00006	    0.00006	    0.00007	    0.00005	    0.00005	    0.00003	    0.00003
                     60	  -0.00005	  -0.00007	    0.00005	  -0.00010	    0.00004	    0.00002	  -0.00010	  -0.00011	  -0.00001	  -0.00002	  -0.00004
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            </tableData>
          </table>
       </product>
    </function>
    <function name="aero/c/CMMGEAR">
    <description>PITCHING MOMENT INCREMENT DUE TO GEAR</description>
    <product>
          <property>gear/gear-pos-norm</property>
          <table>
            <independentVar lookup="row">aero/alpha-deg</independentVar>
            <tableData>
                    -10		  -0.00050
                     -5		  -0.00022
                      3		    0.00015
                      8		    0.00039
                     13		  -0.00063
                     18		    0.00051
                     25		    0.00149
                     35		    0.00208
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            </tableData>
          </table>
       </product>
    </function>
    <function name="aero/c/CMMmnw">
    <description>PITCH DUE TO MACH</description>
    <product>
          <table>
            <independentVar lookup="row">velocities/mach</independentVar>
            <independentVar lookup="column">aero/alpha-deg</independentVar>
            <tableData>
                                -10	         -1	       0.01	          1	         10
                    0.2	  -0.00613	  -0.00085	  -0.00034	    0.00020	    0.00748
                    0.8	    0.00761	    0.00077	  -0.00003	  -0.00083	  -0.00797
                   0.99	    0.03932	    0.00106	  -0.00327	  -0.00741	  -0.04246
                    1.3	    0.00944	    0.00458	    0.00219	  -0.00100	  -0.02990
                    1.6	    0.03570	    0.00471	    0.00014	  -0.00390	  -0.05174
                    2.2	    0.03534	    0.00602	    0.00084	  -0.00452	  -0.05718
                    2.5	    0.03550	    0.00407	  -0.00066	  -0.00523	  -0.05973
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            </tableData>
          </table>
       </product>
    </function>
    <function name="aero/c/CMMQ">
    <description>PITCH DAMPING DERIVATIVE</description>
    <product>
          <property>aero/qb</property>
          <table>
            <independentVar lookup="row">aero/alpha-deg</independentVar>
            <tableData>
                    -10		  -1.47118
                     -5		  -1.25398
                      4		  -1.14184
                     10		  -1.31762
                     16		  -1.47588
                     24		  -1.09193
                     50		  -1.13775
                     60		  -1.13990
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            </tableData>
          </table>
       </product>
    </function>
    <function name="aero/c/CML1">
    <description>BASIC ROLLING MOMENT</description>
    <product>
          <table>
            <independentVar lookup="row">aero/alpha-deg</independentVar>
            <independentVar lookup="column">aero/beta-deg</independentVar>
            <tableData>
                                -10	         -5	         -2	          0	          2	          5	         10
                    -10	  -0.01946	  -0.01049	  -0.00432	    0.00000	    0.00433	    0.01049	    0.01946
                      3	    0.01193	    0.00498	    0.00188	    0.00000	  -0.00188	  -0.00498	  -0.01193
                      9	    0.02094	    0.01005	    0.00404	    0.00000	  -0.00404	  -0.01005	  -0.02093
                     15	    0.02084	    0.00972	    0.00365	    0.00000	  -0.00365	  -0.00972	  -0.02084
                     22	    0.00637	    0.00460	    0.00145	    0.00000	  -0.00145	  -0.00460	  -0.00637
                     45	  -0.02702	  -0.01482	  -0.00600	    0.00000	    0.00599	    0.01479	    0.02698
                     60	  -0.05472	  -0.02805	  -0.01051	    0.00000	    0.01049	    0.02802	    0.05469
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            </tableData>
          </table>
       </product>
    </function>
    <function name="aero/c/CMLBETADOT">
    <description>ROLL MOMENT DERIVATIVE FOR BETA DOT</description>
    <product>
          <property>aero/betadot-rad_sec</property>
          <property>aero/bi2vel</property>
          <table>
            <independentVar lookup="row">aero/alpha-deg</independentVar>
            <tableData>
                    -10		    0.12017
                     -5		    0.06848
                      4		  -0.06752
                     10		  -0.10710
                     16		  -0.08594
                     24		  -0.02190
                     50		    0.26584
                     60		    0.31906
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            </tableData>
          </table>
       </product>
    </function>
    <function name="aero/c/CMLDED1L">
    <description>ROLLING MOMENT DUE TO ELEVON 1L DEFLECTION</description>
    <product>
          <table>
            <independentVar lookup="row">aero/alpha-deg</independentVar>
            <independentVar lookup="column">aero/beta-deg</independentVar>
            <independentVar lookup="table">fcs/elevon-1L-pos-deg</independentVar>
              <tableData breakPoint="-25">
                              -10	        -5	        -2	         0	         2	         5	        10
                    -10	  -0.02455	  -0.02106	  -0.01982	  -0.01850	  -0.01693	  -0.01456	  -0.01201
                      3	  -0.02456	  -0.02658	  -0.02740	  -0.02808	  -0.02852	  -0.02909	  -0.02961
                      9	  -0.02858	  -0.02855	  -0.02845	  -0.02840	  -0.02847	  -0.02828	  -0.02802
                     15	  -0.02457	  -0.02244	  -0.02055	  -0.01917	  -0.01784	  -0.01613	  -0.01243
                     22	  -0.00438	  -0.00123	  -0.00097	  -0.00054	  -0.00008	  -0.00054	  -0.00012
                     45	    0.00060	    0.00008	  -0.00016	  -0.00008	  -0.00001	    0.00019	    0.00044
                     60	  -0.00035	  -0.00036	    0.00000	  -0.00020	  -0.00036	  -0.00023	  -0.00022
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              </tableData>
              <tableData breakPoint="-20">
                              -10	        -5	        -2	         0	         2	         5	        10
                    -10	  -0.02150	  -0.01819	  -0.01717	  -0.01656	  -0.01512	  -0.01287	  -0.01045
                      3	  -0.02045	  -0.02213	  -0.02281	  -0.02337	  -0.02374	  -0.02414	  -0.02458
                      9	  -0.02411	  -0.02393	  -0.02385	  -0.02377	  -0.02380	  -0.02358	  -0.02325
                     15	  -0.02012	  -0.01677	  -0.01614	  -0.01479	  -0.01353	  -0.01192	  -0.00851
                     22	  -0.00320	  -0.00054	  -0.00072	  -0.00056	    0.00016	  -0.00052	  -0.00009
                     45	    0.00048	    0.00005	  -0.00019	  -0.00006	    0.00000	    0.00013	    0.00037
                     60	  -0.00026	  -0.00035	    0.00012	  -0.00014	  -0.00035	  -0.00017	  -0.00017
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              </tableData>
              <tableData breakPoint="-16">
                              -10	        -5	        -2	         0	         2	         5	        10
                    -10	  -0.01876	  -0.01560	  -0.01462	  -0.01403	  -0.01320	  -0.01134	  -0.00904
                      3	  -0.01677	  -0.01816	  -0.01870	  -0.01916	  -0.01946	  -0.01975	  -0.02011
                      9	  -0.01999	  -0.01974	  -0.01970	  -0.01959	  -0.01959	  -0.01934	  -0.01900
                     15	  -0.01610	  -0.01281	  -0.01218	  -0.01089	  -0.00980	  -0.00880	  -0.00651
                     22	  -0.00186	  -0.00033	  -0.00049	  -0.00035	    0.00017	  -0.00059	  -0.00006
                     45	    0.00035	    0.00003	  -0.00004	  -0.00008	  -0.00003	    0.00011	    0.00030
                     60	  -0.00022	  -0.00028	    0.00019	  -0.00015	  -0.00032	  -0.00008	  -0.00017
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              </tableData>
              <tableData breakPoint="-15">
                              -10	        -5	        -2	         0	         2	         5	        10
                    -10	  -0.01804	  -0.01491	  -0.01395	  -0.01337	  -0.01255	  -0.01094	  -0.00866
                      3	  -0.01581	  -0.01711	  -0.01762	  -0.01806	  -0.01833	  -0.01860	  -0.01895
                      9	  -0.01888	  -0.01863	  -0.01861	  -0.01849	  -0.01847	  -0.01822	  -0.01788
                     15	  -0.01503	  -0.01177	  -0.01114	  -0.00994	  -0.00912	  -0.00815	  -0.00593
                     22	  -0.00172	  -0.00030	  -0.00046	  -0.00033	    0.00020	  -0.00051	  -0.00006
                     45	    0.00033	    0.00002	  -0.00003	  -0.00008	  -0.00003	    0.00011	    0.00029
                     60	  -0.00020	  -0.00026	    0.00021	  -0.00016	  -0.00029	  -0.00013	  -0.00015
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              </tableData>
              <tableData breakPoint="-10">
                              -10	        -5	        -2	         0	         2	         5	        10
                    -10	  -0.01294	  -0.01101	  -0.01040	  -0.00985	  -0.00911	  -0.00784	  -0.00669
                      3	  -0.01075	  -0.01165	  -0.01198	  -0.01228	  -0.01247	  -0.01261	  -0.01287
                      9	  -0.01302	  -0.01279	  -0.01280	  -0.01267	  -0.01259	  -0.01232	  -0.01205
                     15	  -0.00942	  -0.00714	  -0.00605	  -0.00523	  -0.00559	  -0.00518	  -0.00389
                     22	  -0.00102	  -0.00008	  -0.00024	  -0.00018	    0.00014	    0.00023	    0.00006
                     45	    0.00021	    0.00000	  -0.00003	  -0.00007	  -0.00001	    0.00009	    0.00017
                     60	  -0.00010	  -0.00021	    0.00022	  -0.00016	  -0.00025	    0.00002	  -0.00012
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              </tableData>
              <tableData breakPoint="-5">
                              -10	        -5	        -2	         0	         2	         5	        10
                    -10	  -0.00665	  -0.00560	  -0.00534	  -0.00532	  -0.00525	  -0.00433	  -0.00343
                      3	  -0.00544	  -0.00589	  -0.00605	  -0.00620	  -0.00630	  -0.00634	  -0.00649
                      9	  -0.00668	  -0.00653	  -0.00653	  -0.00647	  -0.00631	  -0.00603	  -0.00592
                     15	  -0.00501	  -0.00330	  -0.00250	  -0.00226	  -0.00202	  -0.00313	  -0.00115
                     22	  -0.00034	    0.00006	    0.00002	    0.00001	    0.00008	    0.00013	  -0.00003
                     45	    0.00009	    0.00000	  -0.00001	  -0.00003	  -0.00002	    0.00007	    0.00010
                     60	    0.00000	  -0.00014	    0.00030	  -0.00009	  -0.00011	    0.00001	  -0.00005
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              </tableData>
              <tableData breakPoint="0">
                              -10	        -5	        -2	         0	         2	         5	        10
                    -10	    0.00000	    0.00000	    0.00000	    0.00000	    0.00000	    0.00000	    0.00000
                      3	    0.00000	    0.00000	    0.00000	    0.00000	    0.00000	    0.00000	    0.00000
                      9	    0.00000	    0.00000	    0.00000	    0.00000	    0.00000	    0.00000	    0.00000
                     15	    0.00000	    0.00000	    0.00000	    0.00000	    0.00000	    0.00000	    0.00000
                     22	    0.00000	    0.00000	    0.00000	    0.00000	    0.00000	    0.00000	    0.00000
                     45	    0.00000	    0.00000	    0.00000	    0.00000	    0.00000	    0.00000	    0.00000
                     60	    0.00000	    0.00000	    0.00000	    0.00001	    0.00000	    0.00000	    0.00000
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              </tableData>
              <tableData breakPoint="5">
                              -10	        -5	        -2	         0	         2	         5	        10
                    -10	    0.00609	    0.00660	    0.00609	    0.00554	    0.00519	    0.00506	    0.00482
                      3	    0.00571	    0.00599	    0.00631	    0.00649	    0.00648	    0.00636	    0.00654
                      9	    0.00621	    0.00610	    0.00567	    0.00518	    0.00506	    0.00503	    0.00501
                     15	    0.00401	    0.00367	    0.00287	    0.00229	    0.00164	    0.00102	    0.00078
                     22	    0.00035	  -0.00011	  -0.00004	  -0.00003	  -0.00010	  -0.00013	    0.00007
                     45	  -0.00009	    0.00000	    0.00001	    0.00001	    0.00004	    0.00031	  -0.00007
                     60	    0.00010	    0.00005	    0.00012	    0.00011	  -0.00007	    0.00067	    0.00008
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              </tableData>
              <tableData breakPoint="10">
                              -10	        -5	        -2	         0	         2	         5	        10
                    -10	    0.01242	    0.01291	    0.01243	    0.01196	    0.01136	    0.01033	    0.00969
                      3	    0.01161	    0.01220	    0.01287	    0.01320	    0.01318	    0.01306	    0.01322
                      9	    0.01191	    0.01134	    0.01079	    0.01027	    0.01003	    0.00995	    0.00925
                     15	    0.00786	    0.00574	    0.00461	    0.00422	    0.00325	    0.00192	    0.00150
                     22	    0.00042	  -0.00020	  -0.00011	  -0.00007	  -0.00021	  -0.00025	    0.00003
                     45	  -0.00016	    0.00000	    0.00004	    0.00017	    0.00007	    0.00034	  -0.00027
                     60	    0.00046	    0.00015	    0.00123	    0.00016	    0.00002	    0.00076	    0.00012
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              </tableData>
              <tableData breakPoint="13">
                              -10	        -5	        -2	         0	         2	         5	        10
                    -10	    0.01600	    0.01650	    0.01605	    0.01563	    0.01506	    0.01402	    0.01266
                      3	    0.01509	    0.01592	    0.01681	    0.01719	    0.01716	    0.01704	    0.01715
                      9	    0.01510	    0.01437	    0.01375	    0.01311	    0.01249	    0.01191	    0.01168
                     15	    0.00999	    0.00787	    0.00551	    0.00503	    0.00421	    0.00253	    0.00185
                     22	    0.00027	  -0.00029	  -0.00013	  -0.00011	  -0.00027	  -0.00035	    0.00011
                     45	  -0.00020	    0.00004	    0.00005	    0.00019	    0.00008	    0.00035	    0.00012
                     60	    0.00049	    0.00020	    0.00124	    0.00020	    0.00007	    0.00081	    0.00016
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              </tableData>
              <tableData breakPoint="16">
                              -10	        -5	        -2	         0	         2	         5	        10
                    -10	    0.01939	    0.01990	    0.01949	    0.01911	    0.01857	    0.01753	    0.01620
                      3	    0.01846	    0.01952	    0.02064	    0.02111	    0.02105	    0.02090	    0.02094
                      9	    0.01715	    0.01637	    0.01575	    0.01508	    0.01439	    0.01378	    0.01346
                     15	    0.01098	    0.00894	    0.00655	    0.00559	    0.00458	    0.00275	    0.00197
                     22	    0.00025	  -0.00053	  -0.00016	  -0.00014	  -0.00034	  -0.00043	    0.00007
                     45	  -0.00023	    0.00004	    0.00007	    0.00020	    0.00009	    0.00036	    0.00008
                     60	    0.00052	    0.00025	    0.00127	    0.00024	    0.00011	    0.00086	    0.00019
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              </tableData>
          </table>
       </product>
    </function>
    <function name="aero/c/CMLDED1R">
    <description>ROLLING MOMENT DUE TO ELEVON 1R DEFLECTION</description>
    <product>
          <table>
            <independentVar lookup="row">aero/alpha-deg</independentVar>
            <independentVar lookup="column">aero/beta-deg</independentVar>
            <independentVar lookup="table">fcs/elevon-1R-pos-deg</independentVar>
              <tableData breakPoint="-25">
                              -10	        -5	        -2	         0	         2	         5	        10
                    -10	    0.02455	    0.02106	    0.01982	    0.01850	    0.01693	    0.01456	    0.01201
                      3	    0.02456	    0.02658	    0.02740	    0.02808	    0.02852	    0.02909	    0.02961
                      9	    0.02858	    0.02855	    0.02845	    0.02840	    0.02847	    0.02828	    0.02802
                     15	    0.02457	    0.02244	    0.02055	    0.01917	    0.01784	    0.01613	    0.01243
                     22	    0.00438	    0.00123	    0.00097	    0.00054	    0.00008	    0.00054	    0.00012
                     45	  -0.00060	  -0.00008	    0.00016	    0.00008	    0.00001	  -0.00019	  -0.00044
                     60	    0.00035	    0.00036	    0.00000	    0.00020	    0.00036	    0.00023	    0.00022
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              </tableData>
              <tableData breakPoint="-20">
                              -10	        -5	        -2	         0	         2	         5	        10
                    -10	    0.02150	    0.01819	    0.01717	    0.01656	    0.01512	    0.01287	    0.01045
                      3	    0.02045	    0.02213	    0.02281	    0.02337	    0.02374	    0.02414	    0.02458
                      9	    0.02411	    0.02393	    0.02385	    0.02377	    0.02380	    0.02358	    0.02325
                     15	    0.02012	    0.01677	    0.01614	    0.01479	    0.01353	    0.01192	    0.00851
                     22	    0.00320	    0.00054	    0.00072	    0.00056	  -0.00016	    0.00052	    0.00009
                     45	  -0.00048	  -0.00005	    0.00019	    0.00006	    0.00000	  -0.00013	  -0.00037
                     60	    0.00026	    0.00035	  -0.00012	    0.00014	    0.00035	    0.00017	    0.00017
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              </tableData>
              <tableData breakPoint="-16">
                              -10	        -5	        -2	         0	         2	         5	        10
                    -10	    0.01876	    0.01560	    0.01462	    0.01403	    0.01320	    0.01134	    0.00904
                      3	    0.01677	    0.01816	    0.01870	    0.01916	    0.01946	    0.01975	    0.02011
                      9	    0.01999	    0.01974	    0.01970	    0.01959	    0.01959	    0.01934	    0.01900
                     15	    0.01610	    0.01281	    0.01218	    0.01089	    0.00980	    0.00880	    0.00651
                     22	    0.00186	    0.00033	    0.00049	    0.00035	  -0.00017	    0.00059	    0.00006
                     45	  -0.00035	  -0.00003	    0.00004	    0.00008	    0.00003	  -0.00011	  -0.00030
                     60	    0.00022	    0.00028	  -0.00019	    0.00015	    0.00032	    0.00008	    0.00017
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              </tableData>
              <tableData breakPoint="-15">
                              -10	        -5	        -2	         0	         2	         5	        10
                    -10	    0.01804	    0.01491	    0.01395	    0.01337	    0.01255	    0.01094	    0.00866
                      3	    0.01581	    0.01711	    0.01762	    0.01806	    0.01833	    0.01860	    0.01895
                      9	    0.01888	    0.01863	    0.01861	    0.01849	    0.01847	    0.01822	    0.01788
                     15	    0.01503	    0.01177	    0.01114	    0.00994	    0.00912	    0.00815	    0.00593
                     22	    0.00172	    0.00030	    0.00046	    0.00033	  -0.00020	    0.00051	    0.00006
                     45	  -0.00033	  -0.00002	    0.00003	    0.00008	    0.00003	  -0.00011	  -0.00029
                     60	    0.00020	    0.00026	  -0.00021	    0.00016	    0.00029	    0.00013	    0.00015
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              </tableData>
              <tableData breakPoint="-10">
                              -10	        -5	        -2	         0	         2	         5	        10
                    -10	    0.01294	    0.01101	    0.01040	    0.00985	    0.00911	    0.00784	    0.00669
                      3	    0.01075	    0.01165	    0.01198	    0.01228	    0.01247	    0.01261	    0.01287
                      9	    0.01302	    0.01279	    0.01280	    0.01267	    0.01259	    0.01232	    0.01205
                     15	    0.00942	    0.00714	    0.00605	    0.00523	    0.00559	    0.00518	    0.00389
                     22	    0.00102	    0.00008	    0.00024	    0.00018	  -0.00014	  -0.00023	  -0.00006
                     45	  -0.00021	    0.00000	    0.00003	    0.00007	    0.00001	  -0.00009	  -0.00017
                     60	    0.00010	    0.00021	  -0.00022	    0.00016	    0.00025	  -0.00002	    0.00012
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              </tableData>
              <tableData breakPoint="-5">
                              -10	        -5	        -2	         0	         2	         5	        10
                    -10	    0.00665	    0.00560	    0.00534	    0.00532	    0.00525	    0.00433	    0.00343
                      3	    0.00544	    0.00589	    0.00605	    0.00620	    0.00630	    0.00634	    0.00649
                      9	    0.00668	    0.00653	    0.00653	    0.00647	    0.00631	    0.00603	    0.00592
                     15	    0.00501	    0.00330	    0.00250	    0.00226	    0.00202	    0.00313	    0.00115
                     22	    0.00034	  -0.00006	  -0.00002	  -0.00001	  -0.00008	  -0.00013	    0.00003
                     45	  -0.00009	    0.00000	    0.00001	    0.00003	    0.00002	  -0.00007	  -0.00010
                     60	    0.00000	    0.00014	  -0.00030	    0.00009	    0.00011	  -0.00001	    0.00005
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              </tableData>
              <tableData breakPoint="0">
                              -10	        -5	        -2	         0	         2	         5	        10
                    -10	    0.00000	    0.00000	    0.00000	    0.00000	    0.00000	    0.00000	    0.00000
                      3	    0.00000	    0.00000	    0.00000	    0.00000	    0.00000	    0.00000	    0.00000
                      9	    0.00000	    0.00000	    0.00000	    0.00000	    0.00000	    0.00000	    0.00000
                     15	    0.00000	    0.00000	    0.00000	    0.00000	    0.00000	    0.00000	    0.00000
                     22	    0.00000	    0.00000	    0.00000	    0.00000	    0.00000	    0.00000	    0.00000
                     45	    0.00000	    0.00000	    0.00000	    0.00000	    0.00000	    0.00000	    0.00000
                     60	    0.00000	    0.00000	    0.00000	  -0.00001	    0.00000	    0.00000	    0.00000
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              </tableData>
              <tableData breakPoint="5">
                              -10	        -5	        -2	         0	         2	         5	        10
                    -10	  -0.00609	  -0.00660	  -0.00609	  -0.00554	  -0.00519	  -0.00506	  -0.00482
                      3	  -0.00571	  -0.00599	  -0.00631	  -0.00649	  -0.00648	  -0.00636	  -0.00654
                      9	  -0.00621	  -0.00610	  -0.00567	  -0.00518	  -0.00506	  -0.00503	  -0.00501
                     15	  -0.00401	  -0.00367	  -0.00287	  -0.00229	  -0.00164	  -0.00102	  -0.00078
                     22	  -0.00035	    0.00011	    0.00004	    0.00003	    0.00010	    0.00013	  -0.00007
                     45	    0.00009	    0.00000	  -0.00001	  -0.00001	  -0.00004	  -0.00031	    0.00007
                     60	  -0.00010	  -0.00005	  -0.00012	  -0.00011	    0.00007	  -0.00067	  -0.00008
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              </tableData>
              <tableData breakPoint="10">
                              -10	        -5	        -2	         0	         2	         5	        10
                    -10	  -0.01242	  -0.01291	  -0.01243	  -0.01196	  -0.01136	  -0.01033	  -0.00969
                      3	  -0.01161	  -0.01220	  -0.01287	  -0.01320	  -0.01318	  -0.01306	  -0.01322
                      9	  -0.01191	  -0.01134	  -0.01079	  -0.01027	  -0.01003	  -0.00995	  -0.00925
                     15	  -0.00786	  -0.00574	  -0.00461	  -0.00422	  -0.00325	  -0.00192	  -0.00150
                     22	  -0.00042	    0.00020	    0.00011	    0.00007	    0.00021	    0.00025	  -0.00003
                     45	    0.00016	    0.00000	  -0.00004	  -0.00017	  -0.00007	  -0.00034	    0.00027
                     60	  -0.00046	  -0.00015	  -0.00123	  -0.00016	  -0.00002	  -0.00076	  -0.00012
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              </tableData>
              <tableData breakPoint="13">
                              -10	        -5	        -2	         0	         2	         5	        10
                    -10	  -0.01600	  -0.01650	  -0.01605	  -0.01563	  -0.01506	  -0.01402	  -0.01266
                      3	  -0.01509	  -0.01592	  -0.01681	  -0.01719	  -0.01716	  -0.01704	  -0.01715
                      9	  -0.01510	  -0.01437	  -0.01375	  -0.01311	  -0.01249	  -0.01191	  -0.01168
                     15	  -0.00999	  -0.00787	  -0.00551	  -0.00503	  -0.00421	  -0.00253	  -0.00185
                     22	  -0.00027	    0.00029	    0.00013	    0.00011	    0.00027	    0.00035	  -0.00011
                     45	    0.00020	  -0.00004	  -0.00005	  -0.00019	  -0.00008	  -0.00035	  -0.00012
                     60	  -0.00049	  -0.00020	  -0.00124	  -0.00020	  -0.00007	  -0.00081	  -0.00016
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              </tableData>
              <tableData breakPoint="16">
                              -10	        -5	        -2	         0	         2	         5	        10
                    -10	  -0.01939	  -0.01990	  -0.01949	  -0.01911	  -0.01857	  -0.01753	  -0.01620
                      3	  -0.01846	  -0.01952	  -0.02064	  -0.02111	  -0.02105	  -0.02090	  -0.02094
                      9	  -0.01715	  -0.01637	  -0.01575	  -0.01508	  -0.01439	  -0.01378	  -0.01346
                     15	  -0.01098	  -0.00894	  -0.00655	  -0.00559	  -0.00458	  -0.00275	  -0.00197
                     22	  -0.00025	    0.00053	    0.00016	    0.00014	    0.00034	    0.00043	  -0.00007
                     45	    0.00023	  -0.00004	  -0.00007	  -0.00020	  -0.00009	  -0.00036	  -0.00008
                     60	  -0.00052	  -0.00025	  -0.00127	  -0.00024	  -0.00011	  -0.00086	  -0.00019
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              </tableData>
          </table>
       </product>
    </function>
    <function name="aero/c/CMLDED2L">
    <description>ROLLING MOMENT DUE TO ELEVON 2L DEFLECTION</description>
    <product>
          <table>
            <independentVar lookup="row">aero/alpha-deg</independentVar>
            <independentVar lookup="column">aero/beta-deg</independentVar>
            <independentVar lookup="table">fcs/elevon-2L-pos-deg</independentVar>
              <tableData breakPoint="-25">
                              -10	        -5	        -2	         0	         2	         5	        10
                    -10	  -0.01449	  -0.01183	  -0.01124	  -0.01097	  -0.01011	  -0.00792	  -0.00402
                      3	  -0.00984	  -0.01005	  -0.00997	  -0.00985	  -0.00942	  -0.00856	  -0.00739
                      9	  -0.01440	  -0.01312	  -0.01225	  -0.01141	  -0.01040	  -0.00856	  -0.00533
                     15	  -0.01457	  -0.01182	  -0.01011	  -0.00863	  -0.00711	  -0.00615	  -0.00187
                     22	  -0.01063	  -0.00629	  -0.00515	  -0.00428	  -0.00347	  -0.00333	    0.00157
                     45	    0.00192	    0.00090	    0.00101	    0.00080	    0.00093	    0.00106	    0.00083
                     60	  -0.00004	  -0.00050	    0.00079	  -0.00009	  -0.00148	  -0.00048	  -0.00170
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              </tableData>
              <tableData breakPoint="-20">
                              -10	        -5	        -2	         0	         2	         5	        10
                    -10	  -0.01303	  -0.01025	  -0.00952	  -0.00916	  -0.00842	  -0.00636	  -0.00253
                      3	  -0.00880	  -0.00869	  -0.00844	  -0.00821	  -0.00774	  -0.00685	  -0.00560
                      9	  -0.01297	  -0.01143	  -0.01047	  -0.00954	  -0.00846	  -0.00659	  -0.00335
                     15	  -0.01317	  -0.01022	  -0.00839	  -0.00689	  -0.00576	  -0.00495	  -0.00075
                     22	  -0.00911	  -0.00460	  -0.00418	  -0.00345	  -0.00253	  -0.00261	    0.00206
                     45	    0.00158	    0.00067	    0.00081	    0.00064	    0.00076	    0.00120	    0.00044
                     60	  -0.00004	  -0.00051	    0.00076	    0.00002	  -0.00181	  -0.00037	  -0.00148
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              </tableData>
              <tableData breakPoint="-16">
                              -10	        -5	        -2	         0	         2	         5	        10
                    -10	  -0.01167	  -0.00882	  -0.00796	  -0.00752	  -0.00677	  -0.00490	  -0.00119
                      3	  -0.00787	  -0.00747	  -0.00706	  -0.00675	  -0.00623	  -0.00530	  -0.00397
                      9	  -0.01168	  -0.00990	  -0.00887	  -0.00785	  -0.00671	  -0.00481	  -0.00172
                     15	  -0.01091	  -0.00877	  -0.00686	  -0.00557	  -0.00454	  -0.00387	    0.00026
                     22	  -0.00775	  -0.00345	  -0.00340	  -0.00267	  -0.00175	  -0.00172	    0.00220
                     45	    0.00132	    0.00047	    0.00065	    0.00061	    0.00063	    0.00105	    0.00065
                     60	    0.00024	  -0.00047	    0.00069	  -0.00002	  -0.00065	  -0.00037	  -0.00150
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              </tableData>
              <tableData breakPoint="-15">
                              -10	        -5	        -2	         0	         2	         5	        10
                    -10	  -0.01128	  -0.00845	  -0.00755	  -0.00709	  -0.00633	  -0.00460	  -0.00084
                      3	  -0.00763	  -0.00715	  -0.00670	  -0.00636	  -0.00583	  -0.00490	  -0.00354
                      9	  -0.01133	  -0.00949	  -0.00845	  -0.00740	  -0.00625	  -0.00434	  -0.00131
                     15	  -0.01054	  -0.00839	  -0.00645	  -0.00525	  -0.00422	  -0.00358	    0.00053
                     22	  -0.00739	  -0.00314	  -0.00324	  -0.00256	  -0.00178	  -0.00150	    0.00239
                     45	    0.00124	    0.00042	    0.00061	    0.00057	    0.00060	    0.00101	    0.00060
                     60	    0.00023	  -0.00046	    0.00069	  -0.00006	  -0.00068	  -0.00035	  -0.00146
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              </tableData>
              <tableData breakPoint="-10">
                              -10	        -5	        -2	         0	         2	         5	        10
                    -10	  -0.00925	  -0.00650	  -0.00541	  -0.00482	  -0.00403	  -0.00264	    0.00103
                      3	  -0.00634	  -0.00547	  -0.00480	  -0.00434	  -0.00374	  -0.00275	  -0.00129
                      9	  -0.00952	  -0.00736	  -0.00621	  -0.00506	  -0.00382	  -0.00193	    0.00087
                     15	  -0.00859	  -0.00640	  -0.00456	  -0.00358	  -0.00254	  -0.00208	    0.00193
                     22	  -0.00525	  -0.00211	  -0.00221	  -0.00174	  -0.00080	  -0.00059	    0.00266
                     45	    0.00088	    0.00020	    0.00039	    0.00038	    0.00039	    0.00081	    0.00031
                     60	    0.00022	  -0.00067	    0.00070	  -0.00002	  -0.00062	  -0.00023	  -0.00139
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              </tableData>
              <tableData breakPoint="-5">
                              -10	        -5	        -2	         0	         2	         5	        10
                    -10	  -0.00713	  -0.00445	  -0.00315	  -0.00244	  -0.00160	  -0.00016	    0.00300
                      3	  -0.00498	  -0.00369	  -0.00280	  -0.00220	  -0.00152	  -0.00047	    0.00111
                      9	  -0.00756	  -0.00507	  -0.00373	  -0.00257	  -0.00124	    0.00037	    0.00318
                     15	  -0.00648	  -0.00331	  -0.00283	  -0.00182	  -0.00078	  -0.00041	    0.00327
                     22	  -0.00433	  -0.00133	  -0.00128	  -0.00080	    0.00008	  -0.00029	    0.00308
                     45	    0.00052	  -0.00004	    0.00015	    0.00018	    0.00020	    0.00058	    0.00005
                     60	    0.00022	    0.00009	    0.00073	  -0.00002	  -0.00068	  -0.00014	  -0.00153
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              </tableData>
              <tableData breakPoint="0">
                              -10	        -5	        -2	         0	         2	         5	        10
                    -10	  -0.00513	  -0.00232	  -0.00087	    0.00000	    0.00088	    0.00231	    0.00514
                      3	  -0.00358	  -0.00187	  -0.00076	    0.00000	    0.00076	    0.00187	    0.00358
                      9	  -0.00555	  -0.00272	  -0.00119	    0.00000	    0.00118	    0.00272	    0.00556
                     15	  -0.00432	  -0.00137	  -0.00104	    0.00000	    0.00104	    0.00137	    0.00432
                     22	  -0.00343	  -0.00066	  -0.00048	    0.00000	    0.00048	    0.00067	    0.00343
                     45	    0.00018	  -0.00041	  -0.00004	    0.00000	    0.00004	    0.00039	  -0.00021
                     60	    0.00022	    0.00013	    0.00073	    0.00000	  -0.00074	  -0.00015	  -0.00023
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              </tableData>
              <tableData breakPoint="5">
                              -10	        -5	        -2	         0	         2	         5	        10
                    -10	  -0.00290	  -0.00001	    0.00138	    0.00241	    0.00334	    0.00474	    0.00706
                      3	  -0.00216	  -0.00002	    0.00130	    0.00221	    0.00305	    0.00422	    0.00608
                      9	  -0.00403	  -0.00035	    0.00140	    0.00249	    0.00351	    0.00512	    0.00847
                     15	  -0.00120	    0.00123	    0.00233	    0.00225	    0.00313	    0.00268	    0.00517
                     22	  -0.00299	    0.00038	  -0.00004	    0.00041	    0.00069	    0.00089	    0.00383
                     45	  -0.00008	  -0.00062	  -0.00021	  -0.00016	  -0.00014	    0.00020	  -0.00042
                     60	    0.00023	    0.00019	    0.00077	  -0.00008	  -0.00070	  -0.00011	  -0.00011
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              </tableData>
              <tableData breakPoint="10">
                              -10	        -5	        -2	         0	         2	         5	        10
                    -10	  -0.00091	    0.00222	    0.00362	    0.00474	    0.00573	    0.00711	    0.00947
                      3	  -0.00072	    0.00184	    0.00332	    0.00437	    0.00531	    0.00656	    0.00860
                      9	  -0.00206	    0.00198	    0.00394	    0.00470	    0.00581	    0.00747	    0.01087
                     15	    0.00223	    0.00412	    0.00540	    0.00508	    0.00545	    0.00403	    0.00610
                     22	  -0.00268	    0.00047	    0.00033	    0.00059	    0.00087	    0.00105	    0.00431
                     45	  -0.00035	  -0.00081	  -0.00035	  -0.00030	  -0.00016	    0.00003	  -0.00062
                     60	    0.00024	    0.00023	    0.00080	  -0.00005	  -0.00071	  -0.00006	  -0.00006
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              </tableData>
              <tableData breakPoint="13">
                              -10	        -5	        -2	         0	         2	         5	        10
                    -10	    0.00020	    0.00316	    0.00504	    0.00609	    0.00712	    0.00847	    0.01086
                      3	    0.00012	    0.00291	    0.00450	    0.00563	    0.00662	    0.00794	    0.01007
                      9	  -0.00092	    0.00333	    0.00525	    0.00604	    0.00714	    0.00882	    0.01225
                     15	    0.00393	    0.00605	    0.00683	    0.00629	    0.00643	    0.00500	    0.00664
                     22	  -0.00271	    0.00056	    0.00040	    0.00067	    0.00097	    0.00114	    0.00446
                     45	  -0.00049	  -0.00090	  -0.00042	  -0.00037	  -0.00023	  -0.00005	  -0.00072
                     60	    0.00024	    0.00025	    0.00082	  -0.00010	  -0.00072	  -0.00002	  -0.00002
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              </tableData>
              <tableData breakPoint="16">
                              -10	        -5	        -2	         0	         2	         5	        10
                    -10	    0.00118	    0.00438	    0.00605	    0.00737	    0.00844	    0.00977	    0.01219
                      3	    0.00094	    0.00395	    0.00564	    0.00684	    0.00788	    0.00926	    0.01149
                      9	    0.00017	    0.00462	    0.00648	    0.00732	    0.00841	    0.01012	    0.01358
                     15	    0.00542	    0.00750	    0.00792	    0.00834	    0.00764	    0.00621	    0.00725
                     22	  -0.00261	    0.00063	    0.00057	    0.00058	    0.00103	    0.00122	    0.00473
                     45	  -0.00061	  -0.00099	  -0.00049	  -0.00042	  -0.00029	  -0.00011	  -0.00082
                     60	    0.00025	    0.00027	    0.00084	  -0.00008	  -0.00071	    0.00000	  -0.00001
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              </tableData>
          </table>
       </product>
    </function>
    <function name="aero/c/CMLDED2R">
    <description>ROLLING MOMENT DUE TO ELEVON 2R DEFLECTION</description>
    <product>
          <table>
            <independentVar lookup="row">aero/alpha-deg</independentVar>
            <independentVar lookup="column">aero/beta-deg</independentVar>
            <independentVar lookup="table">fcs/elevon-2R-pos-deg</independentVar>
              <tableData breakPoint="-25">
                              -10	        -5	        -2	         0	         2	         5	        10
                    -10	    0.01449	    0.01183	    0.01124	    0.01097	    0.01011	    0.00792	    0.00402
                      3	    0.00984	    0.01005	    0.00997	    0.00985	    0.00942	    0.00856	    0.00739
                      9	    0.01440	    0.01312	    0.01225	    0.01141	    0.01040	    0.00856	    0.00533
                     15	    0.01457	    0.01182	    0.01011	    0.00863	    0.00711	    0.00615	    0.00187
                     22	    0.01063	    0.00629	    0.00515	    0.00428	    0.00347	    0.00333	  -0.00157
                     45	  -0.00192	  -0.00090	  -0.00101	  -0.00080	  -0.00093	  -0.00106	  -0.00083
                     60	    0.00004	    0.00050	  -0.00079	    0.00009	    0.00148	    0.00048	    0.00170
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              </tableData>
              <tableData breakPoint="-20">
                              -10	        -5	        -2	         0	         2	         5	        10
                    -10	    0.01303	    0.01025	    0.00952	    0.00916	    0.00842	    0.00636	    0.00253
                      3	    0.00880	    0.00869	    0.00844	    0.00821	    0.00774	    0.00685	    0.00560
                      9	    0.01297	    0.01143	    0.01047	    0.00954	    0.00846	    0.00659	    0.00335
                     15	    0.01317	    0.01022	    0.00839	    0.00689	    0.00576	    0.00495	    0.00075
                     22	    0.00911	    0.00460	    0.00418	    0.00345	    0.00253	    0.00261	  -0.00206
                     45	  -0.00158	  -0.00067	  -0.00081	  -0.00064	  -0.00076	  -0.00120	  -0.00044
                     60	    0.00004	    0.00051	  -0.00076	  -0.00002	    0.00181	    0.00037	    0.00148
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              </tableData>
              <tableData breakPoint="-16">
                              -10	        -5	        -2	         0	         2	         5	        10
                    -10	    0.01167	    0.00882	    0.00796	    0.00752	    0.00677	    0.00490	    0.00119
                      3	    0.00787	    0.00747	    0.00706	    0.00675	    0.00623	    0.00530	    0.00397
                      9	    0.01168	    0.00990	    0.00887	    0.00785	    0.00671	    0.00481	    0.00172
                     15	    0.01091	    0.00877	    0.00686	    0.00557	    0.00454	    0.00387	  -0.00026
                     22	    0.00775	    0.00345	    0.00340	    0.00267	    0.00175	    0.00172	  -0.00220
                     45	  -0.00132	  -0.00047	  -0.00065	  -0.00061	  -0.00063	  -0.00105	  -0.00065
                     60	  -0.00024	    0.00047	  -0.00069	    0.00002	    0.00065	    0.00037	    0.00150
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              </tableData>
              <tableData breakPoint="-15">
                              -10	        -5	        -2	         0	         2	         5	        10
                    -10	    0.01128	    0.00845	    0.00755	    0.00709	    0.00633	    0.00460	    0.00084
                      3	    0.00763	    0.00715	    0.00670	    0.00636	    0.00583	    0.00490	    0.00354
                      9	    0.01133	    0.00949	    0.00845	    0.00740	    0.00625	    0.00434	    0.00131
                     15	    0.01054	    0.00839	    0.00645	    0.00525	    0.00422	    0.00358	  -0.00053
                     22	    0.00739	    0.00314	    0.00324	    0.00256	    0.00178	    0.00150	  -0.00239
                     45	  -0.00124	  -0.00042	  -0.00061	  -0.00057	  -0.00060	  -0.00101	  -0.00060
                     60	  -0.00023	    0.00046	  -0.00069	    0.00006	    0.00068	    0.00035	    0.00146
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              </tableData>
              <tableData breakPoint="-10">
                              -10	        -5	        -2	         0	         2	         5	        10
                    -10	    0.00925	    0.00650	    0.00541	    0.00482	    0.00403	    0.00264	  -0.00103
                      3	    0.00634	    0.00547	    0.00480	    0.00434	    0.00374	    0.00275	    0.00129
                      9	    0.00952	    0.00736	    0.00621	    0.00506	    0.00382	    0.00193	  -0.00087
                     15	    0.00859	    0.00640	    0.00456	    0.00358	    0.00254	    0.00208	  -0.00193
                     22	    0.00525	    0.00211	    0.00221	    0.00174	    0.00080	    0.00059	  -0.00266
                     45	  -0.00088	  -0.00020	  -0.00039	  -0.00038	  -0.00039	  -0.00081	  -0.00031
                     60	  -0.00022	    0.00067	  -0.00070	    0.00002	    0.00062	    0.00023	    0.00139
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              </tableData>
              <tableData breakPoint="-5">
                              -10	        -5	        -2	         0	         2	         5	        10
                    -10	    0.00713	    0.00445	    0.00315	    0.00244	    0.00160	    0.00016	  -0.00300
                      3	    0.00498	    0.00369	    0.00280	    0.00220	    0.00152	    0.00047	  -0.00111
                      9	    0.00756	    0.00507	    0.00373	    0.00257	    0.00124	  -0.00037	  -0.00318
                     15	    0.00648	    0.00331	    0.00283	    0.00182	    0.00078	    0.00041	  -0.00327
                     22	    0.00433	    0.00133	    0.00128	    0.00080	  -0.00008	    0.00029	  -0.00308
                     45	  -0.00052	    0.00004	  -0.00015	  -0.00018	  -0.00020	  -0.00058	  -0.00005
                     60	  -0.00022	  -0.00009	  -0.00073	    0.00002	    0.00068	    0.00014	    0.00153
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              </tableData>
              <tableData breakPoint="0">
                              -10	        -5	        -2	         0	         2	         5	        10
                    -10	    0.00513	    0.00232	    0.00087	    0.00000	  -0.00088	  -0.00231	  -0.00514
                      3	    0.00358	    0.00187	    0.00076	    0.00000	  -0.00076	  -0.00187	  -0.00358
                      9	    0.00555	    0.00272	    0.00119	    0.00000	  -0.00118	  -0.00272	  -0.00556
                     15	    0.00432	    0.00137	    0.00104	    0.00000	  -0.00104	  -0.00137	  -0.00432
                     22	    0.00343	    0.00066	    0.00048	    0.00000	  -0.00048	  -0.00067	  -0.00343
                     45	  -0.00018	    0.00041	    0.00004	    0.00000	  -0.00004	  -0.00039	    0.00021
                     60	  -0.00022	  -0.00013	  -0.00073	    0.00000	    0.00074	    0.00015	    0.00023
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              </tableData>
              <tableData breakPoint="5">
                              -10	        -5	        -2	         0	         2	         5	        10
                    -10	    0.00290	    0.00001	  -0.00138	  -0.00241	  -0.00334	  -0.00474	  -0.00706
                      3	    0.00216	    0.00002	  -0.00130	  -0.00221	  -0.00305	  -0.00422	  -0.00608
                      9	    0.00403	    0.00035	  -0.00140	  -0.00249	  -0.00351	  -0.00512	  -0.00847
                     15	    0.00120	  -0.00123	  -0.00233	  -0.00225	  -0.00313	  -0.00268	  -0.00517
                     22	    0.00299	  -0.00038	    0.00004	  -0.00041	  -0.00069	  -0.00089	  -0.00383
                     45	    0.00008	    0.00062	    0.00021	    0.00016	    0.00014	  -0.00020	    0.00042
                     60	  -0.00023	  -0.00019	  -0.00077	    0.00008	    0.00070	    0.00011	    0.00011
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              </tableData>
              <tableData breakPoint="10">
                              -10	        -5	        -2	         0	         2	         5	        10
                    -10	    0.00091	  -0.00222	  -0.00362	  -0.00474	  -0.00573	  -0.00711	  -0.00947
                      3	    0.00072	  -0.00184	  -0.00332	  -0.00437	  -0.00531	  -0.00656	  -0.00860
                      9	    0.00206	  -0.00198	  -0.00394	  -0.00470	  -0.00581	  -0.00747	  -0.01087
                     15	  -0.00223	  -0.00412	  -0.00540	  -0.00508	  -0.00545	  -0.00403	  -0.00610
                     22	    0.00268	  -0.00047	  -0.00033	  -0.00059	  -0.00087	  -0.00105	  -0.00431
                     45	    0.00035	    0.00081	    0.00035	    0.00030	    0.00016	  -0.00003	    0.00062
                     60	  -0.00024	  -0.00023	  -0.00080	    0.00005	    0.00071	    0.00006	    0.00006
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              </tableData>
              <tableData breakPoint="13">
                              -10	        -5	        -2	         0	         2	         5	        10
                    -10	  -0.00020	  -0.00316	  -0.00504	  -0.00609	  -0.00712	  -0.00847	  -0.01086
                      3	  -0.00012	  -0.00291	  -0.00450	  -0.00563	  -0.00662	  -0.00794	  -0.01007
                      9	    0.00092	  -0.00333	  -0.00525	  -0.00604	  -0.00714	  -0.00882	  -0.01225
                     15	  -0.00393	  -0.00605	  -0.00683	  -0.00629	  -0.00643	  -0.00500	  -0.00664
                     22	    0.00271	  -0.00056	  -0.00040	  -0.00067	  -0.00097	  -0.00114	  -0.00446
                     45	    0.00049	    0.00090	    0.00042	    0.00037	    0.00023	    0.00005	    0.00072
                     60	  -0.00024	  -0.00025	  -0.00082	    0.00010	    0.00072	    0.00002	    0.00002
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              </tableData>
              <tableData breakPoint="16">
                              -10	        -5	        -2	         0	         2	         5	        10
                    -10	  -0.00118	  -0.00438	  -0.00605	  -0.00737	  -0.00844	  -0.00977	  -0.01219
                      3	  -0.00094	  -0.00395	  -0.00564	  -0.00684	  -0.00788	  -0.00926	  -0.01149
                      9	  -0.00017	  -0.00462	  -0.00648	  -0.00732	  -0.00841	  -0.01012	  -0.01358
                     15	  -0.00542	  -0.00750	  -0.00792	  -0.00834	  -0.00764	  -0.00621	  -0.00725
                     22	    0.00261	  -0.00063	  -0.00057	  -0.00058	  -0.00103	  -0.00122	  -0.00473
                     45	    0.00061	    0.00099	    0.00049	    0.00042	    0.00029	    0.00011	    0.00082
                     60	  -0.00025	  -0.00027	  -0.00084	    0.00008	    0.00071	    0.00000	    0.00001
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              </tableData>
          </table>
       </product>
    </function>
    <function name="aero/c/CMLDRD">
    <description>ROLLING MOMENT DUE TO RUDDER DEFLECTION</description>
    <product>
          <table>
            <independentVar lookup="row">aero/alpha-deg</independentVar>
            <independentVar lookup="column">aero/beta-deg</independentVar>
            <independentVar lookup="table">fcs/rudder-pos-deg</independentVar>
              <tableData breakPoint="-25">
                              -10	        -5	        -2	         0	         2	         5	        10
                    -10	    0.01055	    0.00990	    0.00944	    0.00906	    0.00886	    0.00903	    0.00993
                      3	    0.00884	    0.00819	    0.00751	    0.00733	    0.00717	    0.00756	    0.00838
                      9	    0.00675	    0.00598	    0.00531	    0.00500	    0.00489	    0.00517	    0.00617
                     15	    0.00602	    0.00497	    0.00430	    0.00390	    0.00363	    0.00418	    0.00515
                     22	    0.00431	    0.00446	    0.00448	    0.00388	    0.00419	    0.00514	    0.00269
                     45	    0.00181	    0.00156	    0.00147	    0.00144	    0.00148	    0.00163	    0.00213
                     60	    0.00009	    0.00016	    0.00020	    0.00022	    0.00025	    0.00029	    0.00035
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              </tableData>
              <tableData breakPoint="-15">
                              -10	        -5	        -2	         0	         2	         5	        10
                    -10	    0.00725	    0.00622	    0.00599	    0.00578	    0.00571	    0.00586	    0.00647
                      3	    0.00576	    0.00517	    0.00479	    0.00470	    0.00462	    0.00491	    0.00548
                      9	    0.00428	    0.00373	    0.00336	    0.00319	    0.00316	    0.00339	    0.00408
                     15	    0.00390	    0.00305	    0.00278	    0.00250	    0.00235	    0.00280	    0.00341
                     22	    0.00229	    0.00263	    0.00269	    0.00250	    0.00270	    0.00331	    0.00175
                     45	    0.00123	    0.00102	    0.00095	    0.00093	    0.00095	    0.00105	    0.00135
                     60	    0.00009	    0.00012	    0.00014	    0.00014	    0.00016	    0.00017	    0.00019
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              </tableData>
              <tableData breakPoint="-5">
                              -10	        -5	        -2	         0	         2	         5	        10
                    -10	    0.00230	    0.00208	    0.00201	    0.00197	    0.00197	    0.00204	    0.00226
                      3	    0.00197	    0.00174	    0.00162	    0.00160	    0.00160	    0.00171	    0.00192
                      9	    0.00150	    0.00124	    0.00113	    0.00108	    0.00109	    0.00119	    0.00145
                     15	    0.00124	    0.00100	    0.00105	    0.00085	    0.00082	    0.00091	    0.00121
                     22	    0.00074	    0.00118	    0.00094	    0.00092	    0.00091	    0.00112	    0.00071
                     45	    0.00043	    0.00036	    0.00033	    0.00032	    0.00033	    0.00036	    0.00046
                     60	    0.00004	    0.00005	    0.00005	    0.00005	    0.00005	    0.00005	    0.00005
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              </tableData>
              <tableData breakPoint="0">
                              -10	        -5	        -2	         0	         2	         5	        10
                    -10	    0.00000	    0.00000	    0.00000	    0.00000	    0.00000	    0.00000	    0.00000
                      3	    0.00000	    0.00000	    0.00000	    0.00000	    0.00000	    0.00000	    0.00000
                      9	    0.00000	    0.00000	    0.00000	    0.00000	    0.00000	    0.00000	    0.00000
                     15	    0.00000	    0.00000	    0.00000	    0.00000	    0.00000	    0.00000	    0.00000
                     22	    0.00000	    0.00000	    0.00000	    0.00000	    0.00000	    0.00000	    0.00000
                     45	    0.00000	    0.00000	    0.00000	    0.00000	    0.00000	    0.00000	    0.00000
                     60	    0.00000	    0.00000	    0.00000	  -0.00001	    0.00000	    0.00000	    0.00000
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              </tableData>
              <tableData breakPoint="5">
                              -10	        -5	        -2	         0	         2	         5	        10
                    -10	  -0.00226	  -0.00204	  -0.00197	  -0.00196	  -0.00202	  -0.00207	  -0.00230
                      3	  -0.00192	  -0.00171	  -0.00159	  -0.00160	  -0.00162	  -0.00173	  -0.00196
                      9	  -0.00145	  -0.00119	  -0.00109	  -0.00109	  -0.00112	  -0.00124	  -0.00150
                     15	  -0.00121	  -0.00091	  -0.00082	  -0.00084	  -0.00105	  -0.00100	  -0.00124
                     22	  -0.00071	  -0.00112	  -0.00091	  -0.00092	  -0.00094	  -0.00118	  -0.00074
                     45	  -0.00045	  -0.00036	  -0.00033	  -0.00032	  -0.00033	  -0.00036	  -0.00042
                     60	  -0.00006	  -0.00005	  -0.00005	  -0.00005	  -0.00005	  -0.00005	  -0.00005
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              </tableData>
              <tableData breakPoint="15">
                              -10	        -5	        -2	         0	         2	         5	        10
                    -10	  -0.00647	  -0.00586	  -0.00571	  -0.00578	  -0.00600	  -0.00622	  -0.00670
                      3	  -0.00548	  -0.00491	  -0.00462	  -0.00470	  -0.00479	  -0.00517	  -0.00576
                      9	  -0.00408	  -0.00339	  -0.00315	  -0.00319	  -0.00336	  -0.00374	  -0.00428
                     15	  -0.00341	  -0.00280	  -0.00235	  -0.00249	  -0.00278	  -0.00305	  -0.00390
                     22	  -0.00175	  -0.00330	  -0.00270	  -0.00250	  -0.00269	  -0.00263	  -0.00229
                     45	  -0.00134	  -0.00104	  -0.00095	  -0.00093	  -0.00095	  -0.00102	  -0.00122
                     60	  -0.00020	  -0.00017	  -0.00015	  -0.00015	  -0.00013	  -0.00013	  -0.00010
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              </tableData>
              <tableData breakPoint="25">
                              -10	        -5	        -2	         0	         2	         5	        10
                    -10	  -0.00994	  -0.00903	  -0.00886	  -0.00906	  -0.00944	  -0.00990	  -0.01055
                      3	  -0.00838	  -0.00756	  -0.00717	  -0.00733	  -0.00751	  -0.00819	  -0.00883
                      9	  -0.00618	  -0.00517	  -0.00489	  -0.00501	  -0.00531	  -0.00598	  -0.00676
                     15	  -0.00515	  -0.00418	  -0.00363	  -0.00390	  -0.00430	  -0.00497	  -0.00602
                     22	  -0.00269	  -0.00514	  -0.00419	  -0.00388	  -0.00448	  -0.00446	  -0.00432
                     45	  -0.00212	  -0.00162	  -0.00148	  -0.00144	  -0.00148	  -0.00156	  -0.00180
                     60	  -0.00035	  -0.00029	  -0.00025	  -0.00023	  -0.00020	  -0.00017	  -0.00010
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              </tableData>
          </table>
       </product>
    </function>
    <function name="aero/c/CMLDSBL">
    <description>ROLLING MOMENT DUE TO LOWER SPEEDBRAKE DEFLECTION</description>
    <product>
          <table>
            <independentVar lookup="row">aero/alpha-deg</independentVar>
            <independentVar lookup="column">fcs/airbrake-upper</independentVar>
            <tableData>
                                  0	          5	         10	         15	         20	         25	         30	         35	         40	         45	         50	         55
                    -10	    0.00006	    0.00029	    0.00068	    0.00137	    0.00195	    0.00245	    0.00306	    0.00310	    0.00287	    0.00273	    0.00266	    0.00277
                      3	    0.00001	  -0.00003	  -0.00006	  -0.00008	  -0.00011	  -0.00014	  -0.00026	  -0.00038	  -0.00046	  -0.00052	  -0.00053	  -0.00050
                      9	    0.00006	  -0.00015	  -0.00035	  -0.00053	  -0.00070	  -0.00085	  -0.00106	  -0.00128	  -0.00144	  -0.00154	  -0.00156	  -0.00151
                     15	  -0.00002	    0.00001	    0.00004	    0.00008	    0.00011	  -0.00007	  -0.00012	  -0.00024	  -0.00030	  -0.00036	  -0.00038	  -0.00035
                     22	  -0.00012	    0.00002	    0.00016	    0.00030	    0.00044	    0.00058	    0.00064	    0.00065	    0.00064	    0.00063	    0.00063	    0.00063
                     45	  -0.00033	  -0.00014	    0.00006	    0.00026	    0.00045	    0.00063	    0.00079	    0.00091	    0.00100	    0.00103	    0.00104	    0.00103
                     60	  -0.00030	  -0.00018	  -0.00007	    0.00006	    0.00018	    0.00029	    0.00039	    0.00048	    0.00054	    0.00058	    0.00058	    0.00057
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            </tableData>
          </table>
       </product>
    </function>
    <function name="aero/c/CMLDSBU">
    <description>ROLLING MOMENT DUE TO UPPER SPEEDBRAKE DEFLECTION</description>
    <product>
          <table>
            <independentVar lookup="row">aero/alpha-deg</independentVar>
            <independentVar lookup="column">fcs/airbrake-lower</independentVar>
            <tableData>
                                  0	          5	         11	         17	         22	         28	         34	         39	         45	         50	         56	         62	         67
                    -10	    0.00005	  -0.00016	  -0.00037	  -0.00037	  -0.00053	  -0.00070	    0.00006	    0.00021	    0.00036	    0.00038	    0.00034	    0.00012	  -0.00054
                      3	    0.00001	    0.00004	    0.00002	  -0.00006	  -0.00020	  -0.00034	  -0.00051	  -0.00026	    0.00020	    0.00032	    0.00021	  -0.00046	  -0.00044
                      9	    0.00006	    0.00025	    0.00048	    0.00063	    0.00073	    0.00087	    0.00098	    0.00103	    0.00107	    0.00108	    0.00106	    0.00100	    0.00092
                     15	  -0.00002	  -0.00008	  -0.00020	  -0.00034	  -0.00045	  -0.00048	  -0.00045	  -0.00045	  -0.00042	  -0.00042	  -0.00043	  -0.00045	  -0.00047
                     22	  -0.00011	  -0.00026	  -0.00046	  -0.00064	  -0.00078	  -0.00086	  -0.00084	  -0.00082	  -0.00081	  -0.00081	  -0.00081	  -0.00084	  -0.00086
                     45	  -0.00030	  -0.00049	  -0.00069	  -0.00087	  -0.00098	  -0.00106	  -0.00114	  -0.00116	  -0.00118	  -0.00118	  -0.00118	  -0.00115	  -0.00111
                     60	  -0.00027	  -0.00037	  -0.00047	  -0.00054	  -0.00057	  -0.00059	  -0.00060	  -0.00060	  -0.00060	  -0.00060	  -0.00060	  -0.00060	  -0.00059
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            </tableData>
          </table>
       </product>
    </function>
    <function name="aero/c/CMLDSD1L">
    <description>ROLLING MOMENT DUE TO LE SLAT 1L DEFLECTION</description>
    <product>
          <table>
            <independentVar lookup="row">aero/alpha-deg</independentVar>
            <independentVar lookup="column">fcs/slat-1L-pos-deg</independentVar>
            <tableData>
                                -17	        -14	        -10	         -7	         -3	          0	          3	          7	         10	         14	         17
                    -10	  -0.00122	  -0.00102	  -0.00074	  -0.00052	  -0.00022	    0.00000	    0.00022	    0.00050	    0.00070	    0.00095	    0.00113
                      3	  -0.00019	  -0.00017	  -0.00013	  -0.00010	  -0.00005	    0.00000	    0.00005	    0.00012	    0.00018	    0.00026	    0.00032
                      9	  -0.00104	  -0.00088	  -0.00065	  -0.00046	  -0.00020	    0.00000	    0.00021	    0.00050	    0.00070	    0.00097	    0.00117
                     15	  -0.00266	  -0.00224	  -0.00163	  -0.00115	  -0.00050	    0.00000	    0.00050	    0.00116	    0.00171	    0.00240	    0.00284
                     22	  -0.00179	  -0.00147	  -0.00103	  -0.00069	  -0.00024	    0.00000	    0.00021	    0.00047	    0.00065	    0.00087	    0.00101
                     45	  -0.00135	  -0.00109	  -0.00075	  -0.00051	  -0.00021	    0.00000	    0.00019	    0.00041	    0.00056	    0.00071	    0.00081
                     60	  -0.00133	  -0.00106	  -0.00071	  -0.00047	  -0.00018	    0.00001	    0.00017	    0.00034	    0.00044	    0.00054	    0.00058
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            </tableData>
          </table>
       </product>
    </function>
    <function name="aero/c/CMLDSD1R">
    <description>ROLLING MOMENT DUE TO LE SLAT 1R DEFLECTION</description>
    <product>
          <table>
            <independentVar lookup="row">aero/alpha-deg</independentVar>
            <independentVar lookup="column">fcs/slat-1R-pos-deg</independentVar>
            <tableData>
                                -17	        -14	        -10	         -7	         -3	          0	          3	          7	         10	         14	         17
                    -10	    0.00122	    0.00102	    0.00074	    0.00052	    0.00022	    0.00000	  -0.00022	  -0.00050	  -0.00070	  -0.00095	  -0.00113
                      3	    0.00019	    0.00017	    0.00013	    0.00010	    0.00005	    0.00000	  -0.00005	  -0.00012	  -0.00018	  -0.00026	  -0.00032
                      9	    0.00104	    0.00088	    0.00065	    0.00046	    0.00020	    0.00000	  -0.00021	  -0.00050	  -0.00070	  -0.00097	  -0.00117
                     15	    0.00266	    0.00224	    0.00163	    0.00115	    0.00050	    0.00000	  -0.00050	  -0.00116	  -0.00171	  -0.00240	  -0.00284
                     22	    0.00179	    0.00147	    0.00103	    0.00069	    0.00024	    0.00000	  -0.00021	  -0.00047	  -0.00065	  -0.00087	  -0.00101
                     45	    0.00135	    0.00109	    0.00075	    0.00051	    0.00021	    0.00000	  -0.00019	  -0.00041	  -0.00056	  -0.00071	  -0.00081
                     60	    0.00133	    0.00106	    0.00071	    0.00047	    0.00018	  -0.00001	  -0.00017	  -0.00034	  -0.00044	  -0.00054	  -0.00058
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            </tableData>
          </table>
       </product>
    </function>
    <function name="aero/c/CMLDSD2L">
    <description>ROLLING MOMENT DUE TO LE SLAT 2L DEFLECTION</description>
    <product>
          <table>
            <independentVar lookup="row">aero/alpha-deg</independentVar>
            <independentVar lookup="column">fcs/slat-2L-pos-deg</independentVar>
            <tableData>
                                -17	        -14	        -10	         -7	         -3	          0	          3	          7	         10	         14	         17
                    -10	  -0.00245	  -0.00205	  -0.00149	  -0.00105	  -0.00045	    0.00000	    0.00044	    0.00101	    0.00143	    0.00194	    0.00229
                      3	  -0.00038	  -0.00033	  -0.00025	  -0.00019	  -0.00009	    0.00000	    0.00009	    0.00022	    0.00032	    0.00046	    0.00057
                      9	  -0.00211	  -0.00178	  -0.00132	  -0.00094	  -0.00041	    0.00000	    0.00042	    0.00098	    0.00140	    0.00193	    0.00230
                     15	  -0.00134	  -0.00195	  -0.00142	  -0.00100	  -0.00043	    0.00000	    0.00043	  -0.00015	    0.00019	    0.00061	    0.00090
                     22	  -0.00067	  -0.00055	  -0.00039	  -0.00027	  -0.00011	    0.00000	    0.00011	    0.00025	    0.00034	    0.00046	    0.00054
                     45	  -0.00116	  -0.00094	  -0.00065	  -0.00044	  -0.00018	    0.00000	    0.00017	    0.00036	    0.00049	    0.00063	    0.00071
                     60	  -0.00107	  -0.00085	  -0.00058	  -0.00038	  -0.00015	    0.00001	    0.00014	    0.00028	    0.00037	    0.00046	    0.00050
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            </tableData>
          </table>
       </product>
    </function>
    <function name="aero/c/CMLDSD2R">
    <description>ROLLING MOMENT DUE TO LE SLAT 2R DEFLECTION</description>
    <product>
          <table>
            <independentVar lookup="row">aero/alpha-deg</independentVar>
            <independentVar lookup="column">fcs/slat-2R-pos-deg</independentVar>
            <tableData>
                                -17	        -14	        -10	         -7	         -3	          0	          3	          7	         10	         14	         17
                    -10	    0.00245	    0.00205	    0.00149	    0.00105	    0.00045	    0.00000	  -0.00044	  -0.00101	  -0.00143	  -0.00194	  -0.00229
                      3	    0.00038	    0.00033	    0.00025	    0.00019	    0.00009	    0.00000	  -0.00009	  -0.00022	  -0.00032	  -0.00046	  -0.00057
                      9	    0.00211	    0.00178	    0.00132	    0.00094	    0.00041	    0.00000	  -0.00042	  -0.00098	  -0.00140	  -0.00193	  -0.00230
                     15	    0.00134	    0.00195	    0.00142	    0.00100	    0.00043	    0.00000	  -0.00043	    0.00015	  -0.00019	  -0.00061	  -0.00090
                     22	    0.00067	    0.00055	    0.00039	    0.00027	    0.00011	    0.00000	  -0.00011	  -0.00025	  -0.00034	  -0.00046	  -0.00054
                     45	    0.00116	    0.00094	    0.00065	    0.00044	    0.00018	    0.00000	  -0.00017	  -0.00036	  -0.00049	  -0.00063	  -0.00071
                     60	    0.00107	    0.00085	    0.00058	    0.00038	    0.00015	  -0.00001	  -0.00014	  -0.00028	  -0.00037	  -0.00046	  -0.00050
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            </tableData>
          </table>
       </product>
    </function>
    <function name="aero/c/CMLGEAR">
    <description>ROLLING MOMENT INCREMENT DUE TO GEAR</description>
    <product>
          <property>gear/gear-pos-norm</property>
          <table>
            <independentVar lookup="row">aero/alpha-deg</independentVar>
            <tableData>
                    -10		    0.00000
                     -5		    0.00000
                      3		    0.00000
                      8		    0.00001
                     13		    0.00002
                     18		  -0.00005
                     25		  -0.00006
                     35		   0.00000
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            </tableData>
          </table>
       </product>
    </function>
    <function name="aero/c/CMLmnw">
    <description>ROLL DUE TO MACH</description>
    <product>
          <table>
            <independentVar lookup="row">velocities/mach</independentVar>
            <independentVar lookup="column">aero/alpha-deg</independentVar>
            <tableData>
                                -10	         -1	       0.01	          1	         10
                    0.2	    0.00000	    0.00000	    0.00000	    0.00000	    0.00000
                    0.8	    0.00000	    0.00000	    0.00000	    0.00000	    0.00000
                   0.99	    0.00000	    0.00000	    0.00000	    0.00000	    0.00000
                    1.3	  -0.00030	  -0.00010	  -0.00009	    0.00010	    0.00409
                    1.6	    0.00000	    0.00002	  -0.00011	    0.00000	    0.00000
                    2.2	  -0.00041	  -0.00001	    0.00001	  -0.00003	    0.00040
                    2.5	    0.00039	    0.00000	    0.00008	    0.00003	    0.00005
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            </tableData>
          </table>
       </product>
    </function>
    <function name="aero/c/CMLP">
    <description>ROLL DAMPING DERIVATIVE</description>
    <product>
          <property>aero/pb</property>
          <table>
            <independentVar lookup="row">aero/alpha-deg</independentVar>
            <tableData>
                    -10		  -0.35082
                     -5		  -0.27238
                      4		  -0.25393
                     10		  -0.33985
                     16		  -0.14121
                     24		  -0.02485
                     50		  -0.02862
                     60		  -0.02864
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            </tableData>
          </table>
       </product>
    </function>
    <function name="aero/c/CMLR">
    <description>ROLLING MOMENT DUE TO YAW RATE</description>
    <product>
          <property>aero/rb</property>
          <table>
            <independentVar lookup="row">aero/alpha-deg</independentVar>
            <tableData>
                    -10		  -0.04429
                     -5		  -0.00921
                      4		    0.07498
                     10		    0.10812
                     16		    0.07040
                     24		    0.04438
                     50		    0.02853
                     60		    0.02897
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            </tableData>
          </table>
       </product>
    </function>
    <function name="aero/c/CFYB">
    <description>BASIC SIDE FORCE</description>
    <product>
          <table>
            <independentVar lookup="row">aero/alpha-deg</independentVar>
            <independentVar lookup="column">aero/beta-deg</independentVar>
            <tableData>
                                -10	         -5	         -2	          0	          2	          5	         10
                    -10	  -0.04493	  -0.01760	  -0.00603	    0.00000	    0.00603	    0.01761	    0.04493
                      3	  -0.05518	  -0.02597	  -0.00956	    0.00000	    0.00956	    0.02598	    0.05518
                      9	  -0.04792	  -0.02170	  -0.00781	  -0.00001	    0.00781	    0.02170	    0.04792
                     15	  -0.03958	  -0.01168	  -0.00368	    0.00001	    0.00368	    0.01168	    0.03958
                     22	  -0.06752	  -0.01928	  -0.00546	    0.00000	    0.00546	    0.01929	    0.06753
                     45	    0.02061	    0.01238	    0.00588	    0.00003	  -0.00585	  -0.01231	  -0.02069
                     60	    0.09196	    0.04677	    0.01793	    0.00003	  -0.01790	  -0.04671	  -0.09188
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            </tableData>
          </table>
       </product>
    </function>
    <function name="aero/c/CFYDED1L">
    <description>SIDE FORCE DUE TO ELEVON 1L DEFLECTION</description>
    <product>
          <table>
            <independentVar lookup="row">aero/alpha-deg</independentVar>
            <independentVar lookup="column">aero/beta-deg</independentVar>
            <independentVar lookup="table">fcs/elevon-1L-pos-deg</independentVar>
              <tableData breakPoint="-25">
                              -10	        -5	        -2	         0	         2	         5	        10
                    -10	  -0.03675	  -0.03729	  -0.03559	  -0.03377	  -0.03341	  -0.03224	  -0.03031
                      3	  -0.00840	  -0.00613	  -0.00581	  -0.00717	  -0.00627	  -0.00807	  -0.01003
                      9	    0.00168	    0.00398	    0.00408	    0.00354	    0.00268	    0.00095	  -0.00336
                     15	    0.00824	    0.01849	    0.01959	    0.02110	    0.02032	    0.01768	    0.01615
                     22	    0.03510	    0.03761	    0.03656	    0.03641	    0.03454	    0.02901	    0.02474
                     45	    0.01352	    0.01208	    0.01116	    0.01075	    0.01022	    0.00957	    0.00762
                     60	    0.01137	    0.01009	    0.00904	    0.00844	    0.00939	    0.00913	    0.00737
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              </tableData>
              <tableData breakPoint="-20">
                              -10	        -5	        -2	         0	         2	         5	        10
                    -10	  -0.03036	  -0.03115	  -0.02981	  -0.02841	  -0.02805	  -0.02730	  -0.02576
                      3	  -0.00653	  -0.00480	  -0.00451	  -0.00574	  -0.00508	  -0.00649	  -0.00833
                      9	    0.00173	    0.00362	    0.00359	    0.00309	    0.00230	    0.00083	  -0.00272
                     15	    0.00630	    0.01639	    0.01713	    0.01859	    0.01808	    0.01589	    0.01492
                     22	    0.02833	    0.03018	    0.02936	    0.02918	    0.02776	    0.02316	    0.01974
                     45	    0.01059	    0.00971	    0.00909	    0.00869	    0.00821	    0.00771	    0.00615
                     60	    0.00903	    0.00808	    0.00725	    0.00658	    0.00747	    0.00749	    0.00587
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              </tableData>
              <tableData breakPoint="-16">
                              -10	        -5	        -2	         0	         2	         5	        10
                    -10	  -0.02459	  -0.02554	  -0.02452	  -0.02341	  -0.02318	  -0.02267	  -0.02147
                      3	  -0.00502	  -0.00372	  -0.00345	  -0.00453	  -0.00407	  -0.00515	  -0.00682
                      9	    0.00166	    0.00319	    0.00306	    0.00263	    0.00195	    0.00073	  -0.00217
                     15	    0.00447	    0.01424	    0.01488	    0.01627	    0.01592	    0.01365	    0.01173
                     22	    0.02279	    0.02410	    0.02355	    0.02350	    0.02223	    0.01816	    0.01550
                     45	    0.00858	    0.00780	    0.00717	    0.00696	    0.00635	    0.00618	    0.00475
                     60	    0.00701	    0.00637	    0.00582	    0.00523	    0.00598	    0.00562	    0.00467
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              </tableData>
              <tableData breakPoint="-15">
                              -10	        -5	        -2	         0	         2	         5	        10
                    -10	  -0.02306	  -0.02406	  -0.02311	  -0.02209	  -0.02188	  -0.02142	  -0.02032
                      3	  -0.00465	  -0.00345	  -0.00318	  -0.00423	  -0.00381	  -0.00481	  -0.00642
                      9	    0.00163	    0.00306	    0.00291	    0.00250	    0.00184	    0.00070	  -0.00202
                     15	    0.00416	    0.01366	    0.01426	    0.01557	    0.01508	    0.01292	    0.01114
                     22	    0.02130	    0.02248	    0.02200	    0.02197	    0.02086	    0.01714	    0.01443
                     45	    0.00806	    0.00728	    0.00670	    0.00652	    0.00593	    0.00563	    0.00439
                     60	    0.00652	    0.00593	    0.00544	    0.00496	    0.00560	    0.00520	    0.00430
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              </tableData>
              <tableData breakPoint="-10">
                              -10	        -5	        -2	         0	         2	         5	        10
                    -10	  -0.01502	  -0.01621	  -0.01565	  -0.01503	  -0.01495	  -0.01476	  -0.01403
                      3	  -0.00287	  -0.00216	  -0.00194	  -0.00272	  -0.00249	  -0.00311	  -0.00435
                      9	    0.00134	    0.00228	    0.00207	    0.00177	    0.00133	    0.00057	  -0.00129
                     15	    0.00336	    0.00991	    0.01011	    0.01114	    0.01080	    0.00819	    0.00739
                     22	    0.01394	    0.01478	    0.01443	    0.01437	    0.01360	    0.01140	    0.00917
                     45	    0.00533	    0.00478	    0.00436	    0.00419	    0.00388	    0.00374	    0.00267
                     60	    0.00408	    0.00394	    0.00370	    0.00307	    0.00365	    0.00335	    0.00274
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              </tableData>
              <tableData breakPoint="-5">
                              -10	        -5	        -2	         0	         2	         5	        10
                    -10	  -0.00734	  -0.00799	  -0.00779	  -0.00753	  -0.00748	  -0.00750	  -0.00724
                      3	  -0.00129	  -0.00099	  -0.00086	  -0.00129	  -0.00121	  -0.00148	  -0.00219
                      9	    0.00079	    0.00125	    0.00111	    0.00092	    0.00075	    0.00044	  -0.00054
                     15	    0.00126	    0.00520	    0.00519	    0.00577	    0.00581	    0.00436	    0.00357
                     22	    0.00680	    0.00718	    0.00710	    0.00706	    0.00669	    0.00555	    0.00441
                     45	    0.00256	    0.00232	    0.00210	    0.00197	    0.00186	    0.00183	    0.00115
                     60	    0.00187	    0.00183	    0.00190	    0.00146	    0.00159	    0.00172	    0.00125
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              </tableData>
              <tableData breakPoint="0">
                              -10	        -5	        -2	         0	         2	         5	        10
                    -10	    0.00000	    0.00000	    0.00000	    0.00000	    0.00000	    0.00000	    0.00000
                      3	    0.00000	    0.00000	    0.00000	    0.00000	    0.00000	    0.00001	    0.00000
                      9	    0.00000	    0.00000	    0.00000	    0.00000	    0.00000	    0.00000	    0.00000
                     15	    0.00000	    0.00000	    0.00000	    0.00001	    0.00000	    0.00000	    0.00000
                     22	    0.00000	    0.00000	    0.00000	    0.00000	    0.00000	    0.00000	    0.00000
                     45	    0.00000	    0.00000	    0.00000	    0.00005	    0.00000	    0.00000	    0.00000
                     60	    0.00000	    0.00000	    0.00000	    0.00004	    0.00000	    0.00000	    0.00000
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              </tableData>
              <tableData breakPoint="5">
                              -10	        -5	        -2	         0	         2	         5	        10
                    -10	    0.00715	    0.00739	    0.00737	    0.00728	    0.00725	    0.00731	    0.00715
                      3	    0.00087	    0.00078	    0.00062	    0.00112	    0.00111	    0.00132	    0.00217
                      9	  -0.00107	  -0.00185	  -0.00191	  -0.00178	  -0.00149	  -0.00097	  -0.00008
                     15	  -0.00290	  -0.00937	  -0.00735	  -0.00570	  -0.00450	  -0.00315	  -0.00451
                     22	  -0.00612	  -0.00657	  -0.00657	  -0.00656	  -0.00605	  -0.00521	  -0.00351
                     45	  -0.00232	  -0.00213	  -0.00188	  -0.00181	  -0.00173	  -0.00161	  -0.00123
                     60	  -0.00175	  -0.00157	  -0.00139	  -0.00126	  -0.00119	  -0.00140	  -0.00119
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              </tableData>
              <tableData breakPoint="10">
                              -10	        -5	        -2	         0	         2	         5	        10
                    -10	    0.01393	    0.01441	    0.01416	    0.01373	    0.01383	    0.01407	    0.01377
                      3	    0.00125	    0.00127	    0.00095	    0.00204	    0.00211	    0.00252	    0.00436
                      9	  -0.00319	  -0.00415	  -0.00402	  -0.00378	  -0.00321	  -0.00214	  -0.00044
                     15	  -0.00605	  -0.01739	  -0.01572	  -0.01275	  -0.01189	  -0.00787	  -0.00756
                     22	  -0.01180	  -0.01237	  -0.01247	  -0.01243	  -0.01155	  -0.00979	  -0.00677
                     45	  -0.00439	  -0.00398	  -0.00362	  -0.00349	  -0.00323	  -0.00291	  -0.00260
                     60	  -0.00334	  -0.00284	  -0.00273	  -0.00228	  -0.00222	  -0.00248	  -0.00215
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              </tableData>
              <tableData breakPoint="13">
                              -10	        -5	        -2	         0	         2	         5	        10
                    -10	    0.01774	    0.01836	    0.01802	    0.01740	    0.01751	    0.01772	    0.01760
                      3	    0.00128	    0.00144	    0.00101	    0.00249	    0.00264	    0.00316	    0.00563
                      9	  -0.00463	  -0.00567	  -0.00540	  -0.00501	  -0.00435	  -0.00310	  -0.00078
                     15	  -0.00724	  -0.01938	  -0.01842	  -0.01804	  -0.01469	  -0.01011	  -0.00943
                     22	  -0.01493	  -0.01550	  -0.01560	  -0.01561	  -0.01451	  -0.01232	  -0.00857
                     45	  -0.00560	  -0.00498	  -0.00452	  -0.00433	  -0.00403	  -0.00361	  -0.00305
                     60	  -0.00403	  -0.00345	  -0.00321	  -0.00278	  -0.00271	  -0.00300	  -0.00268
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              </tableData>
              <tableData breakPoint="16">
                              -10	        -5	        -2	         0	         2	         5	        10
                    -10	    0.02131	    0.02207	    0.02165	    0.02089	    0.02101	    0.02121	    0.02091
                      3	    0.00120	    0.00153	    0.00099	    0.00287	    0.00311	    0.00371	    0.00684
                      9	  -0.00631	  -0.00736	  -0.00694	  -0.00638	  -0.00555	  -0.00399	  -0.00102
                     15	  -0.00901	  -0.02163	  -0.02382	  -0.02085	  -0.01970	  -0.01343	  -0.01082
                     22	  -0.01763	  -0.01854	  -0.01847	  -0.01849	  -0.01719	  -0.01458	  -0.01008
                     45	  -0.00656	  -0.00583	  -0.00532	  -0.00508	  -0.00478	  -0.00423	  -0.00345
                     60	  -0.00459	  -0.00396	  -0.00365	  -0.00336	  -0.00312	  -0.00353	  -0.00307
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              </tableData>
          </table>
       </product>
    </function>
    <function name="aero/c/CFYDED1R">
    <description>SIDE FORCE DUE TO ELEVON 1R DEFLECTION</description>
    <product>
          <table>
            <independentVar lookup="row">aero/alpha-deg</independentVar>
            <independentVar lookup="column">aero/beta-deg</independentVar>
            <independentVar lookup="table">fcs/elevon-1R-pos-deg</independentVar>
              <tableData breakPoint="-25">
                              -10	        -5	        -2	         0	         2	         5	        10
                    -10	    0.03675	    0.03729	    0.03559	    0.03377	    0.03341	    0.03224	    0.03031
                      3	    0.00840	    0.00613	    0.00581	    0.00717	    0.00627	    0.00807	    0.01003
                      9	  -0.00168	  -0.00398	  -0.00408	  -0.00354	  -0.00268	  -0.00095	    0.00336
                     15	  -0.00824	  -0.01849	  -0.01959	  -0.02110	  -0.02032	  -0.01768	  -0.01615
                     22	  -0.03510	  -0.03761	  -0.03656	  -0.03641	  -0.03454	  -0.02901	  -0.02474
                     45	  -0.01352	  -0.01208	  -0.01116	  -0.01075	  -0.01022	  -0.00957	  -0.00762
                     60	  -0.01137	  -0.01009	  -0.00904	  -0.00844	  -0.00939	  -0.00913	  -0.00737
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              </tableData>
              <tableData breakPoint="-20">
                              -10	        -5	        -2	         0	         2	         5	        10
                    -10	    0.03036	    0.03115	    0.02981	    0.02841	    0.02805	    0.02730	    0.02576
                      3	    0.00653	    0.00480	    0.00451	    0.00574	    0.00508	    0.00649	    0.00833
                      9	  -0.00173	  -0.00362	  -0.00359	  -0.00309	  -0.00230	  -0.00083	    0.00272
                     15	  -0.00630	  -0.01639	  -0.01713	  -0.01859	  -0.01808	  -0.01589	  -0.01492
                     22	  -0.02833	  -0.03018	  -0.02936	  -0.02918	  -0.02776	  -0.02316	  -0.01974
                     45	  -0.01059	  -0.00971	  -0.00909	  -0.00869	  -0.00821	  -0.00771	  -0.00615
                     60	  -0.00903	  -0.00808	  -0.00725	  -0.00658	  -0.00747	  -0.00749	  -0.00587
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              </tableData>
              <tableData breakPoint="-16">
                              -10	        -5	        -2	         0	         2	         5	        10
                    -10	    0.02459	    0.02554	    0.02452	    0.02341	    0.02318	    0.02267	    0.02147
                      3	    0.00502	    0.00372	    0.00345	    0.00453	    0.00407	    0.00515	    0.00682
                      9	  -0.00166	  -0.00319	  -0.00306	  -0.00263	  -0.00195	  -0.00073	    0.00217
                     15	  -0.00447	  -0.01424	  -0.01488	  -0.01627	  -0.01592	  -0.01365	  -0.01173
                     22	  -0.02279	  -0.02410	  -0.02355	  -0.02350	  -0.02223	  -0.01816	  -0.01550
                     45	  -0.00858	  -0.00780	  -0.00717	  -0.00696	  -0.00635	  -0.00618	  -0.00475
                     60	  -0.00701	  -0.00637	  -0.00582	  -0.00523	  -0.00598	  -0.00562	  -0.00467
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              </tableData>
              <tableData breakPoint="-15">
                              -10	        -5	        -2	         0	         2	         5	        10
                    -10	    0.02306	    0.02406	    0.02311	    0.02209	    0.02188	    0.02142	    0.02032
                      3	    0.00465	    0.00345	    0.00318	    0.00423	    0.00381	    0.00481	    0.00642
                      9	  -0.00163	  -0.00306	  -0.00291	  -0.00250	  -0.00184	  -0.00070	    0.00202
                     15	  -0.00416	  -0.01366	  -0.01426	  -0.01557	  -0.01508	  -0.01292	  -0.01114
                     22	  -0.02130	  -0.02248	  -0.02200	  -0.02197	  -0.02086	  -0.01714	  -0.01443
                     45	  -0.00806	  -0.00728	  -0.00670	  -0.00652	  -0.00593	  -0.00563	  -0.00439
                     60	  -0.00652	  -0.00593	  -0.00544	  -0.00496	  -0.00560	  -0.00520	  -0.00430
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              </tableData>
              <tableData breakPoint="-10">
                              -10	        -5	        -2	         0	         2	         5	        10
                    -10	    0.01502	    0.01621	    0.01565	    0.01503	    0.01495	    0.01476	    0.01403
                      3	    0.00287	    0.00216	    0.00194	    0.00272	    0.00249	    0.00311	    0.00435
                      9	  -0.00134	  -0.00228	  -0.00207	  -0.00177	  -0.00133	  -0.00057	    0.00129
                     15	  -0.00336	  -0.00991	  -0.01011	  -0.01114	  -0.01080	  -0.00819	  -0.00739
                     22	  -0.01394	  -0.01478	  -0.01443	  -0.01437	  -0.01360	  -0.01140	  -0.00917
                     45	  -0.00533	  -0.00478	  -0.00436	  -0.00419	  -0.00388	  -0.00374	  -0.00267
                     60	  -0.00408	  -0.00394	  -0.00370	  -0.00307	  -0.00365	  -0.00335	  -0.00274
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              </tableData>
              <tableData breakPoint="-5">
                              -10	        -5	        -2	         0	         2	         5	        10
                    -10	    0.00734	    0.00799	    0.00779	    0.00753	    0.00748	    0.00750	    0.00724
                      3	    0.00129	    0.00099	    0.00086	    0.00129	    0.00121	    0.00148	    0.00219
                      9	  -0.00079	  -0.00125	  -0.00111	  -0.00092	  -0.00075	  -0.00044	    0.00054
                     15	  -0.00126	  -0.00520	  -0.00519	  -0.00577	  -0.00581	  -0.00436	  -0.00357
                     22	  -0.00680	  -0.00718	  -0.00710	  -0.00706	  -0.00669	  -0.00555	  -0.00441
                     45	  -0.00256	  -0.00232	  -0.00210	  -0.00197	  -0.00186	  -0.00183	  -0.00115
                     60	  -0.00187	  -0.00183	  -0.00190	  -0.00146	  -0.00159	  -0.00172	  -0.00125
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              </tableData>
              <tableData breakPoint="0">
                              -10	        -5	        -2	         0	         2	         5	        10
                    -10	    0.00000	    0.00000	    0.00000	    0.00000	    0.00000	    0.00000	    0.00000
                      3	    0.00000	    0.00000	    0.00000	    0.00000	    0.00000	  -0.00001	    0.00000
                      9	    0.00000	    0.00000	    0.00000	    0.00000	    0.00000	    0.00000	    0.00000
                     15	    0.00000	    0.00000	    0.00000	  -0.00001	    0.00000	    0.00000	    0.00000
                     22	    0.00000	    0.00000	    0.00000	    0.00000	    0.00000	    0.00000	    0.00000
                     45	    0.00000	    0.00000	    0.00000	  -0.00005	    0.00000	    0.00000	    0.00000
                     60	    0.00000	    0.00000	    0.00000	  -0.00004	    0.00000	    0.00000	    0.00000
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              </tableData>
              <tableData breakPoint="5">
                              -10	        -5	        -2	         0	         2	         5	        10
                    -10	  -0.00715	  -0.00739	  -0.00737	  -0.00728	  -0.00725	  -0.00731	  -0.00715
                      3	  -0.00087	  -0.00078	  -0.00062	  -0.00112	  -0.00111	  -0.00132	  -0.00217
                      9	    0.00107	    0.00185	    0.00191	    0.00178	    0.00149	    0.00097	    0.00008
                     15	    0.00290	    0.00937	    0.00735	    0.00570	    0.00450	    0.00315	    0.00451
                     22	    0.00612	    0.00657	    0.00657	    0.00656	    0.00605	    0.00521	    0.00351
                     45	    0.00232	    0.00213	    0.00188	    0.00181	    0.00173	    0.00161	    0.00123
                     60	    0.00175	    0.00157	    0.00139	    0.00126	    0.00119	    0.00140	    0.00119
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              </tableData>
              <tableData breakPoint="10">
                              -10	        -5	        -2	         0	         2	         5	        10
                    -10	  -0.01393	  -0.01441	  -0.01416	  -0.01373	  -0.01383	  -0.01407	  -0.01377
                      3	  -0.00125	  -0.00127	  -0.00095	  -0.00204	  -0.00211	  -0.00252	  -0.00436
                      9	    0.00319	    0.00415	    0.00402	    0.00378	    0.00321	    0.00214	    0.00044
                     15	    0.00605	    0.01739	    0.01572	    0.01275	    0.01189	    0.00787	    0.00756
                     22	    0.01180	    0.01237	    0.01247	    0.01243	    0.01155	    0.00979	    0.00677
                     45	    0.00439	    0.00398	    0.00362	    0.00349	    0.00323	    0.00291	    0.00260
                     60	    0.00334	    0.00284	    0.00273	    0.00228	    0.00222	    0.00248	    0.00215
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              </tableData>
              <tableData breakPoint="13">
                              -10	        -5	        -2	         0	         2	         5	        10
                    -10	  -0.01774	  -0.01836	  -0.01802	  -0.01740	  -0.01751	  -0.01772	  -0.01760
                      3	  -0.00128	  -0.00144	  -0.00101	  -0.00249	  -0.00264	  -0.00316	  -0.00563
                      9	    0.00463	    0.00567	    0.00540	    0.00501	    0.00435	    0.00310	    0.00078
                     15	    0.00724	    0.01938	    0.01842	    0.01804	    0.01469	    0.01011	    0.00943
                     22	    0.01493	    0.01550	    0.01560	    0.01561	    0.01451	    0.01232	    0.00857
                     45	    0.00560	    0.00498	    0.00452	    0.00433	    0.00403	    0.00361	    0.00305
                     60	    0.00403	    0.00345	    0.00321	    0.00278	    0.00271	    0.00300	    0.00268
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              </tableData>
              <tableData breakPoint="16">
                              -10	        -5	        -2	         0	         2	         5	        10
                    -10	  -0.02131	  -0.02207	  -0.02165	  -0.02089	  -0.02101	  -0.02121	  -0.02091
                      3	  -0.00120	  -0.00153	  -0.00099	  -0.00287	  -0.00311	  -0.00371	  -0.00684
                      9	    0.00631	    0.00736	    0.00694	    0.00638	    0.00555	    0.00399	    0.00102
                     15	    0.00901	    0.02163	    0.02382	    0.02085	    0.01970	    0.01343	    0.01082
                     22	    0.01763	    0.01854	    0.01847	    0.01849	    0.01719	    0.01458	    0.01008
                     45	    0.00656	    0.00583	    0.00532	    0.00508	    0.00478	    0.00423	    0.00345
                     60	    0.00459	    0.00396	    0.00365	    0.00336	    0.00312	    0.00353	    0.00307
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              </tableData>
          </table>
       </product>
    </function>
    <function name="aero/c/CFYDED2L">
    <description>SIDE FORCE DUE TO ELEVON 2L DEFLECTION</description>
    <product>
          <table>
            <independentVar lookup="row">aero/alpha-deg</independentVar>
            <independentVar lookup="column">aero/beta-deg</independentVar>
            <independentVar lookup="table">fcs/elevon-2L-pos-deg</independentVar>
              <tableData breakPoint="-25">
                              -10	        -5	        -2	         0	         2	         5	        10
                    -10	  -0.02570	  -0.02058	  -0.01689	  -0.01419	  -0.01403	  -0.01275	  -0.00939
                      3	  -0.00985	  -0.00687	  -0.00511	  -0.00594	  -0.00400	  -0.00296	  -0.00161
                      9	  -0.00629	  -0.00398	  -0.00307	  -0.00260	  -0.00196	  -0.00063	  -0.00042
                     15	  -0.01247	  -0.00119	    0.00091	    0.00344	    0.00322	    0.00213	    0.00398
                     22	  -0.01716	  -0.00062	    0.00575	    0.00828	    0.00842	    0.00679	    0.01429
                     45	    0.00493	    0.00657	    0.00854	    0.01011	    0.01165	    0.01398	    0.01322
                     60	    0.01332	    0.01260	    0.01119	    0.01294	    0.01460	    0.01550	    0.01732
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              </tableData>
              <tableData breakPoint="-20">
                              -10	        -5	        -2	         0	         2	         5	        10
                    -10	  -0.02236	  -0.01759	  -0.01428	  -0.01188	  -0.01161	  -0.01028	  -0.00699
                      3	  -0.00846	  -0.00579	  -0.00424	  -0.00493	  -0.00326	  -0.00233	  -0.00106
                      9	  -0.00555	  -0.00347	  -0.00262	  -0.00211	  -0.00147	  -0.00020	    0.00011
                     15	  -0.01210	  -0.00122	    0.00070	    0.00310	    0.00297	    0.00209	    0.00426
                     22	  -0.01599	  -0.00083	    0.00422	    0.00698	    0.00694	    0.00623	    0.01532
                     45	    0.00250	    0.00436	    0.00651	    0.00793	    0.00940	    0.01176	    0.01137
                     60	    0.01028	    0.00986	    0.00871	    0.00979	    0.01164	    0.01256	    0.01423
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              </tableData>
              <tableData breakPoint="-16">
                              -10	        -5	        -2	         0	         2	         5	        10
                    -10	  -0.01936	  -0.01491	  -0.01191	  -0.00980	  -0.00946	  -0.00806	  -0.00480
                      3	  -0.00727	  -0.00486	  -0.00350	  -0.00401	  -0.00259	  -0.00174	  -0.00054
                      9	  -0.00491	  -0.00306	  -0.00224	  -0.00170	  -0.00105	    0.00020	    0.00053
                     15	  -0.01142	  -0.00130	    0.00052	    0.00262	    0.00270	    0.00201	    0.00451
                     22	  -0.01569	  -0.00085	    0.00311	    0.00568	    0.00619	    0.00592	    0.01488
                     45	    0.00082	    0.00251	    0.00480	    0.00615	    0.00754	    0.01010	    0.01032
                     60	    0.00758	    0.00759	    0.00657	    0.00750	    0.00924	    0.00992	    0.01184
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              </tableData>
              <tableData breakPoint="-15">
                              -10	        -5	        -2	         0	         2	         5	        10
                    -10	  -0.01860	  -0.01418	  -0.01128	  -0.00925	  -0.00889	  -0.00758	  -0.00421
                      3	  -0.00696	  -0.00463	  -0.00331	  -0.00378	  -0.00242	  -0.00158	  -0.00039
                      9	  -0.00474	  -0.00295	  -0.00215	  -0.00159	  -0.00094	    0.00030	    0.00063
                     15	  -0.01132	  -0.00132	    0.00046	    0.00247	    0.00262	    0.00198	    0.00457
                     22	  -0.01531	  -0.00083	    0.00279	    0.00520	    0.00572	    0.00583	    0.01497
                     45	    0.00034	    0.00205	    0.00439	    0.00574	    0.00709	    0.00971	    0.01003
                     60	    0.00696	    0.00701	    0.00607	    0.00689	    0.00853	    0.00931	    0.01122
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              </tableData>
              <tableData breakPoint="-10">
                              -10	        -5	        -2	         0	         2	         5	        10
                    -10	  -0.01454	  -0.01042	  -0.00798	  -0.00634	  -0.00587	  -0.00441	  -0.00114
                      3	  -0.00542	  -0.00343	  -0.00234	  -0.00255	  -0.00152	  -0.00074	    0.00042
                      9	  -0.00391	  -0.00245	  -0.00166	  -0.00105	  -0.00038	    0.00080	    0.00114
                     15	  -0.01058	  -0.00141	    0.00003	    0.00171	    0.00221	    0.00182	    0.00489
                     22	  -0.01374	  -0.00152	    0.00133	    0.00335	    0.00436	    0.00538	    0.01366
                     45	  -0.00203	  -0.00016	    0.00238	    0.00364	    0.00484	    0.00775	    0.00848
                     60	    0.00385	    0.00413	    0.00356	    0.00433	    0.00571	    0.00635	    0.00814
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              </tableData>
              <tableData breakPoint="-5">
                              -10	        -5	        -2	         0	         2	         5	        10
                    -10	  -0.01019	  -0.00640	  -0.00444	  -0.00323	  -0.00262	  -0.00117	    0.00219
                      3	  -0.00389	  -0.00224	  -0.00137	  -0.00127	  -0.00056	    0.00017	    0.00137
                      9	  -0.00319	  -0.00212	  -0.00113	  -0.00051	    0.00020	    0.00117	    0.00169
                     15	  -0.00778	  -0.00127	  -0.00060	    0.00087	    0.00175	    0.00167	    0.00507
                     22	  -0.01310	  -0.00217	    0.00012	    0.00174	    0.00313	    0.00356	    0.01289
                     45	  -0.00422	  -0.00225	    0.00044	    0.00174	    0.00296	    0.00575	    0.00726
                     60	    0.00104	    0.00132	    0.00119	    0.00207	    0.00336	    0.00368	    0.00543
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              </tableData>
              <tableData breakPoint="0">
                              -10	        -5	        -2	         0	         2	         5	        10
                    -10	  -0.00561	  -0.00229	  -0.00077	    0.00000	    0.00077	    0.00231	    0.00560
                      3	  -0.00243	  -0.00112	  -0.00043	    0.00000	    0.00043	    0.00113	    0.00243
                      9	  -0.00240	  -0.00170	  -0.00063	  -0.00001	    0.00063	    0.00170	    0.00240
                     15	  -0.00497	  -0.00153	  -0.00124	    0.00000	    0.00124	    0.00153	    0.00497
                     22	  -0.01255	  -0.00288	  -0.00117	  -0.00002	    0.00117	    0.00288	    0.01254
                     45	  -0.00623	  -0.00412	  -0.00137	    0.00004	    0.00135	    0.00418	    0.00613
                     60	  -0.00151	  -0.00116	  -0.00102	    0.00001	    0.00102	    0.00119	    0.00152
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              </tableData>
              <tableData breakPoint="5">
                              -10	        -5	        -2	         0	         2	         5	        10
                    -10	  -0.00099	    0.00168	    0.00293	    0.00326	    0.00421	    0.00588	    0.00910
                      3	  -0.00109	  -0.00010	    0.00045	    0.00124	    0.00143	    0.00213	    0.00358
                      9	  -0.00170	  -0.00133	  -0.00017	    0.00041	    0.00115	    0.00209	    0.00305
                     15	  -0.00117	  -0.00390	  -0.00323	  -0.00066	    0.00153	    0.00036	    0.00412
                     22	  -0.01226	  -0.00311	  -0.00275	  -0.00211	  -0.00083	    0.00150	    0.01185
                     45	  -0.00819	  -0.00587	  -0.00291	  -0.00152	  -0.00008	    0.00284	    0.00528
                     60	  -0.00367	  -0.00328	  -0.00287	  -0.00166	  -0.00080	  -0.00089	  -0.00052
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              </tableData>
              <tableData breakPoint="10">
                              -10	        -5	        -2	         0	         2	         5	        10
                    -10	    0.00346	    0.00557	    0.00651	    0.00649	    0.00762	    0.00944	    0.01246
                      3	    0.00007	    0.00079	    0.00125	    0.00242	    0.00240	    0.00313	    0.00482
                      9	  -0.00107	  -0.00104	    0.00008	    0.00083	    0.00151	    0.00247	    0.00368
                     15	    0.00137	  -0.00590	  -0.00587	  -0.00466	  -0.00147	    0.00160	    0.00424
                     22	  -0.01212	  -0.00415	  -0.00424	  -0.00429	  -0.00271	    0.00021	    0.01150
                     45	  -0.00980	  -0.00733	  -0.00429	  -0.00280	  -0.00130	    0.00179	    0.00462
                     60	  -0.00537	  -0.00494	  -0.00440	  -0.00308	  -0.00218	  -0.00280	  -0.00214
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              </tableData>
              <tableData breakPoint="13">
                              -10	        -5	        -2	         0	         2	         5	        10
                    -10	    0.00606	    0.00783	    0.00850	    0.00835	    0.00959	    0.01152	    0.01443
                      3	    0.00068	    0.00126	    0.00168	    0.00308	    0.00295	    0.00374	    0.00559
                      9	  -0.00074	  -0.00088	    0.00020	    0.00101	    0.00169	    0.00269	    0.00405
                     15	    0.00216	  -0.00759	  -0.00913	  -0.00485	  -0.00442	    0.00033	    0.00385
                     22	  -0.01233	  -0.00468	  -0.00524	  -0.00553	  -0.00375	  -0.00050	    0.01151
                     45	  -0.01060	  -0.00813	  -0.00502	  -0.00346	  -0.00190	    0.00122	    0.00421
                     60	  -0.00612	  -0.00573	  -0.00510	  -0.00378	  -0.00285	  -0.00356	  -0.00292
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              </tableData>
              <tableData breakPoint="16">
                              -10	        -5	        -2	         0	         2	         5	        10
                    -10	    0.00858	    0.00998	    0.01046	    0.01015	    0.01150	    0.01353	    0.01632
                      3	    0.00121	    0.00168	    0.00207	    0.00371	    0.00348	    0.00432	    0.00636
                      9	  -0.00044	  -0.00076	    0.00028	    0.00117	    0.00186	    0.00291	    0.00442
                     15	    0.00400	  -0.00603	  -0.00877	  -0.00725	  -0.00466	  -0.00179	    0.00349
                     22	  -0.01224	  -0.00511	  -0.00602	  -0.00688	  -0.00476	  -0.00114	    0.01150
                     45	  -0.01130	  -0.00881	  -0.00567	  -0.00409	  -0.00240	    0.00073	    0.00383
                     60	  -0.00681	  -0.00639	  -0.00571	  -0.00435	  -0.00340	  -0.00419	  -0.00362
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              </tableData>
          </table>
       </product>
    </function>
    <function name="aero/c/CFYDED2R">
    <description>SIDE FORCE DUE TO ELEVON 2R DEFLECTION</description>
    <product>
          <table>
            <independentVar lookup="row">aero/alpha-deg</independentVar>
            <independentVar lookup="column">aero/beta-deg</independentVar>
            <independentVar lookup="table">fcs/elevon-2R-pos-deg</independentVar>
              <tableData breakPoint="-25">
                              -10	        -5	        -2	         0	         2	         5	        10
                    -10	    0.02570	    0.02058	    0.01689	    0.01419	    0.01403	    0.01275	    0.00939
                      3	    0.00985	    0.00687	    0.00511	    0.00594	    0.00400	    0.00296	    0.00161
                      9	    0.00629	    0.00398	    0.00307	    0.00260	    0.00196	    0.00063	    0.00042
                     15	    0.01247	    0.00119	  -0.00091	  -0.00344	  -0.00322	  -0.00213	  -0.00398
                     22	    0.01716	    0.00062	  -0.00575	  -0.00828	  -0.00842	  -0.00679	  -0.01429
                     45	  -0.00493	  -0.00657	  -0.00854	  -0.01011	  -0.01165	  -0.01398	  -0.01322
                     60	  -0.01332	  -0.01260	  -0.01119	  -0.01294	  -0.01460	  -0.01550	  -0.01732
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              </tableData>
              <tableData breakPoint="-20">
                              -10	        -5	        -2	         0	         2	         5	        10
                    -10	    0.02236	    0.01759	    0.01428	    0.01188	    0.01161	    0.01028	    0.00699
                      3	    0.00846	    0.00579	    0.00424	    0.00493	    0.00326	    0.00233	    0.00106
                      9	    0.00555	    0.00347	    0.00262	    0.00211	    0.00147	    0.00020	  -0.00011
                     15	    0.01210	    0.00122	  -0.00070	  -0.00310	  -0.00297	  -0.00209	  -0.00426
                     22	    0.01599	    0.00083	  -0.00422	  -0.00698	  -0.00694	  -0.00623	  -0.01532
                     45	  -0.00250	  -0.00436	  -0.00651	  -0.00793	  -0.00940	  -0.01176	  -0.01137
                     60	  -0.01028	  -0.00986	  -0.00871	  -0.00979	  -0.01164	  -0.01256	  -0.01423
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              </tableData>
              <tableData breakPoint="-16">
                              -10	        -5	        -2	         0	         2	         5	        10
                    -10	    0.01936	    0.01491	    0.01191	    0.00980	    0.00946	    0.00806	    0.00480
                      3	    0.00727	    0.00486	    0.00350	    0.00401	    0.00259	    0.00174	    0.00054
                      9	    0.00491	    0.00306	    0.00224	    0.00170	    0.00105	  -0.00020	  -0.00053
                     15	    0.01142	    0.00130	  -0.00052	  -0.00262	  -0.00270	  -0.00201	  -0.00451
                     22	    0.01569	    0.00085	  -0.00311	  -0.00568	  -0.00619	  -0.00592	  -0.01488
                     45	  -0.00082	  -0.00251	  -0.00480	  -0.00615	  -0.00754	  -0.01010	  -0.01032
                     60	  -0.00758	  -0.00759	  -0.00657	  -0.00750	  -0.00924	  -0.00992	  -0.01184
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              </tableData>
              <tableData breakPoint="-15">
                              -10	        -5	        -2	         0	         2	         5	        10
                    -10	    0.01860	    0.01418	    0.01128	    0.00925	    0.00889	    0.00758	    0.00421
                      3	    0.00696	    0.00463	    0.00331	    0.00378	    0.00242	    0.00158	    0.00039
                      9	    0.00474	    0.00295	    0.00215	    0.00159	    0.00094	  -0.00030	  -0.00063
                     15	    0.01132	    0.00132	  -0.00046	  -0.00247	  -0.00262	  -0.00198	  -0.00457
                     22	    0.01531	    0.00083	  -0.00279	  -0.00520	  -0.00572	  -0.00583	  -0.01497
                     45	  -0.00034	  -0.00205	  -0.00439	  -0.00574	  -0.00709	  -0.00971	  -0.01003
                     60	  -0.00696	  -0.00701	  -0.00607	  -0.00689	  -0.00853	  -0.00931	  -0.01122
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              </tableData>
              <tableData breakPoint="-10">
                              -10	        -5	        -2	         0	         2	         5	        10
                    -10	    0.01454	    0.01042	    0.00798	    0.00634	    0.00587	    0.00441	    0.00114
                      3	    0.00542	    0.00343	    0.00234	    0.00255	    0.00152	    0.00074	  -0.00042
                      9	    0.00391	    0.00245	    0.00166	    0.00105	    0.00038	  -0.00080	  -0.00114
                     15	    0.01058	    0.00141	  -0.00003	  -0.00171	  -0.00221	  -0.00182	  -0.00489
                     22	    0.01374	    0.00152	  -0.00133	  -0.00335	  -0.00436	  -0.00538	  -0.01366
                     45	    0.00203	    0.00016	  -0.00238	  -0.00364	  -0.00484	  -0.00775	  -0.00848
                     60	  -0.00385	  -0.00413	  -0.00356	  -0.00433	  -0.00571	  -0.00635	  -0.00814
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              </tableData>
              <tableData breakPoint="-5">
                              -10	        -5	        -2	         0	         2	         5	        10
                    -10	    0.01019	    0.00640	    0.00444	    0.00323	    0.00262	    0.00117	  -0.00219
                      3	    0.00389	    0.00224	    0.00137	    0.00127	    0.00056	  -0.00017	  -0.00137
                      9	    0.00319	    0.00212	    0.00113	    0.00051	  -0.00020	  -0.00117	  -0.00169
                     15	    0.00778	    0.00127	    0.00060	  -0.00087	  -0.00175	  -0.00167	  -0.00507
                     22	    0.01310	    0.00217	  -0.00012	  -0.00174	  -0.00313	  -0.00356	  -0.01289
                     45	    0.00422	    0.00225	  -0.00044	  -0.00174	  -0.00296	  -0.00575	  -0.00726
                     60	  -0.00104	  -0.00132	  -0.00119	  -0.00207	  -0.00336	  -0.00368	  -0.00543
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              </tableData>
              <tableData breakPoint="0">
                              -10	        -5	        -2	         0	         2	         5	        10
                    -10	    0.00561	    0.00229	    0.00077	    0.00000	  -0.00077	  -0.00231	  -0.00560
                      3	    0.00243	    0.00112	    0.00043	    0.00000	  -0.00043	  -0.00113	  -0.00243
                      9	    0.00240	    0.00170	    0.00063	    0.00001	  -0.00063	  -0.00170	  -0.00240
                     15	    0.00497	    0.00153	    0.00124	    0.00000	  -0.00124	  -0.00153	  -0.00497
                     22	    0.01255	    0.00288	    0.00117	    0.00002	  -0.00117	  -0.00288	  -0.01254
                     45	    0.00623	    0.00412	    0.00137	  -0.00004	  -0.00135	  -0.00418	  -0.00613
                     60	    0.00151	    0.00116	    0.00102	  -0.00001	  -0.00102	  -0.00119	  -0.00152
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              </tableData>
              <tableData breakPoint="5">
                              -10	        -5	        -2	         0	         2	         5	        10
                    -10	    0.00099	  -0.00168	  -0.00293	  -0.00326	  -0.00421	  -0.00588	  -0.00910
                      3	    0.00109	    0.00010	  -0.00045	  -0.00124	  -0.00143	  -0.00213	  -0.00358
                      9	    0.00170	    0.00133	    0.00017	  -0.00041	  -0.00115	  -0.00209	  -0.00305
                     15	    0.00117	    0.00390	    0.00323	    0.00066	  -0.00153	  -0.00036	  -0.00412
                     22	    0.01226	    0.00311	    0.00275	    0.00211	    0.00083	  -0.00150	  -0.01185
                     45	    0.00819	    0.00587	    0.00291	    0.00152	    0.00008	  -0.00284	  -0.00528
                     60	    0.00367	    0.00328	    0.00287	    0.00166	    0.00080	    0.00089	    0.00052
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              </tableData>
              <tableData breakPoint="10">
                              -10	        -5	        -2	         0	         2	         5	        10
                    -10	  -0.00346	  -0.00557	  -0.00651	  -0.00649	  -0.00762	  -0.00944	  -0.01246
                      3	  -0.00007	  -0.00079	  -0.00125	  -0.00242	  -0.00240	  -0.00313	  -0.00482
                      9	    0.00107	    0.00104	  -0.00008	  -0.00083	  -0.00151	  -0.00247	  -0.00368
                     15	  -0.00137	    0.00590	    0.00587	    0.00466	    0.00147	  -0.00160	  -0.00424
                     22	    0.01212	    0.00415	    0.00424	    0.00429	    0.00271	  -0.00021	  -0.01150
                     45	    0.00980	    0.00733	    0.00429	    0.00280	    0.00130	  -0.00179	  -0.00462
                     60	    0.00537	    0.00494	    0.00440	    0.00308	    0.00218	    0.00280	    0.00214
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              </tableData>
              <tableData breakPoint="13">
                              -10	        -5	        -2	         0	         2	         5	        10
                    -10	  -0.00606	  -0.00783	  -0.00850	  -0.00835	  -0.00959	  -0.01152	  -0.01443
                      3	  -0.00068	  -0.00126	  -0.00168	  -0.00308	  -0.00295	  -0.00374	  -0.00559
                      9	    0.00074	    0.00088	  -0.00020	  -0.00101	  -0.00169	  -0.00269	  -0.00405
                     15	  -0.00216	    0.00759	    0.00913	    0.00485	    0.00442	  -0.00033	  -0.00385
                     22	    0.01233	    0.00468	    0.00524	    0.00553	    0.00375	    0.00050	  -0.01151
                     45	    0.01060	    0.00813	    0.00502	    0.00346	    0.00190	  -0.00122	  -0.00421
                     60	    0.00612	    0.00573	    0.00510	    0.00378	    0.00285	    0.00356	    0.00292
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              </tableData>
              <tableData breakPoint="16">
                              -10	        -5	        -2	         0	         2	         5	        10
                    -10	  -0.00858	  -0.00998	  -0.01046	  -0.01015	  -0.01150	  -0.01353	  -0.01632
                      3	  -0.00121	  -0.00168	  -0.00207	  -0.00371	  -0.00348	  -0.00432	  -0.00636
                      9	    0.00044	    0.00076	  -0.00028	  -0.00117	  -0.00186	  -0.00291	  -0.00442
                     15	  -0.00400	    0.00603	    0.00877	    0.00725	    0.00466	    0.00179	  -0.00349
                     22	    0.01224	    0.00511	    0.00602	    0.00688	    0.00476	    0.00114	  -0.01150
                     45	    0.01130	    0.00881	    0.00567	    0.00409	    0.00240	  -0.00073	  -0.00383
                     60	    0.00681	    0.00639	    0.00571	    0.00435	    0.00340	    0.00419	    0.00362
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              </tableData>
          </table>
       </product>
    </function>
    <function name="aero/c/CFYDRD">
    <description>SIDE FORCE DUE TO RUDDER DEFLECTION</description>
    <product>
          <table>
            <independentVar lookup="row">aero/alpha-deg</independentVar>
            <independentVar lookup="column">aero/beta-deg</independentVar>
            <independentVar lookup="table">fcs/rudder-pos-deg</independentVar>
              <tableData breakPoint="0">
                              -25	       -15	        -5	         0	         5	        15	        25
                    -10	  -0.04638	  -0.02964	  -0.01009	    0.00000	    0.01009	    0.02965	    0.04639
                      3	  -0.04314	  -0.02774	  -0.00951	    0.00000	    0.00951	    0.02774	    0.04314
                      9	  -0.04221	  -0.02719	  -0.00933	    0.00001	    0.00934	    0.02721	    0.04222
                     15	  -0.03058	  -0.01969	  -0.00677	  -0.00001	    0.00675	    0.01968	    0.03056
                     22	  -0.00575	  -0.00327	  -0.00088	    0.00000	    0.00088	    0.00327	    0.00573
                     45	  -0.01084	  -0.00704	  -0.00247	  -0.00005	    0.00237	    0.00695	    0.01075
                     60	  -0.00176	  -0.00117	  -0.00043	  -0.00004	    0.00037	    0.00110	    0.00171
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              </tableData>
          </table>
       </product>
    </function>
    <function name="aero/c/CFYDSBL">
    <description>SIDE FORCE DUE TO LOWER SPEEDBRAKE DEFLECTION</description>
    <product>
          <table>
            <independentVar lookup="row">aero/alpha-deg</independentVar>
            <independentVar lookup="column">fcs/airbrake-upper</independentVar>
            <tableData>
                                  0	          5	         10	         15	         20	         25	         30	         35	         40	         45	         50	         55
                    -10	  -0.00009	  -0.00032	  -0.00070	  -0.00126	  -0.00161	  -0.00199	  -0.00260	  -0.00228	  -0.00205	  -0.00189	  -0.00177	  -0.00194
                      3	  -0.00001	    0.00005	    0.00014	    0.00025	    0.00039	    0.00051	    0.00059	    0.00065	    0.00071	    0.00074	    0.00074	    0.00073
                      9	  -0.00014	    0.00029	    0.00076	    0.00125	    0.00174	    0.00218	    0.00253	    0.00281	    0.00301	    0.00314	    0.00317	    0.00311
                     15	  -0.00018	    0.00018	    0.00058	    0.00102	    0.00145	    0.00265	    0.00296	    0.00229	    0.00260	    0.00278	    0.00285	    0.00275
                     22	  -0.00055	    0.00020	    0.00095	    0.00170	    0.00243	    0.00308	    0.00357	    0.00391	    0.00417	    0.00432	    0.00436	    0.00429
                     45	    0.00000	    0.00000	  -0.00002	  -0.00003	  -0.00005	  -0.00007	  -0.00012	  -0.00031	  -0.00046	  -0.00052	  -0.00049	  -0.00053
                     60	    0.00045	    0.00030	    0.00014	  -0.00005	  -0.00023	  -0.00040	  -0.00055	  -0.00068	  -0.00084	  -0.00099	  -0.00103	  -0.00095
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            </tableData>
          </table>
       </product>
    </function>
    <function name="aero/c/CFYDSBU">
    <description>SIDE FORCE DUE TO UPPER SPEEDBRAKE DEFLECTION</description>
    <product>
          <table>
            <independentVar lookup="row">aero/alpha-deg</independentVar>
            <independentVar lookup="column">fcs/airbrake-lower</independentVar>
            <tableData>
                                  0	          5	         11	         17	         22	         28	         34	         39	         45	         50	         56	         62	         67
                    -10	  -0.00008	    0.00017	    0.00022	  -0.00018	  -0.00002	    0.00030	  -0.00135	  -0.00176	  -0.00139	  -0.00142	  -0.00134	  -0.00152	    0.00029
                      3	  -0.00001	  -0.00004	  -0.00004	    0.00004	    0.00018	    0.00049	    0.00089	    0.00075	    0.00033	    0.00021	    0.00029	    0.00090	    0.00069
                      9	  -0.00012	  -0.00049	  -0.00089	  -0.00120	  -0.00140	  -0.00154	  -0.00161	  -0.00164	  -0.00166	  -0.00167	  -0.00165	  -0.00162	  -0.00157
                     15	  -0.00016	  -0.00048	  -0.00082	  -0.00109	  -0.00127	  -0.00136	  -0.00140	  -0.00143	  -0.00147	  -0.00148	  -0.00146	  -0.00141	  -0.00138
                     22	  -0.00052	  -0.00127	  -0.00211	  -0.00287	  -0.00341	  -0.00384	  -0.00418	  -0.00441	  -0.00457	  -0.00461	  -0.00452	  -0.00428	  -0.00397
                     45	    0.00010	    0.00014	    0.00017	    0.00020	    0.00018	    0.00005	    0.00000	  -0.00001	  -0.00002	  -0.00003	  -0.00002	    0.00000	    0.00003
                     60	    0.00043	    0.00056	    0.00068	    0.00076	    0.00074	    0.00070	    0.00068	    0.00068	    0.00068	    0.00068	    0.00068	    0.00068	    0.00069
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            </tableData>
          </table>
       </product>
    </function>
    <function name="aero/c/CFYDSD1L">
    <description>SIDE FORCE DUE TO LE SLAT 1L DEFLECTION</description>
    <product>
          <table>
            <independentVar lookup="row">aero/alpha-deg</independentVar>
            <independentVar lookup="column">fcs/slat-1L-pos-deg</independentVar>
            <tableData>
                                -17	        -14	        -10	         -7	         -3	          0	          3	          7	         10	         14	         17
                    -10	    0.00037	    0.00031	    0.00022	    0.00015	    0.00007	    0.00000	  -0.00007	  -0.00015	  -0.00020	  -0.00027	  -0.00032
                      3	  -0.00004	  -0.00004	  -0.00003	  -0.00002	  -0.00001	    0.00000	    0.00001	    0.00004	    0.00005	    0.00008	    0.00010
                      9	  -0.00051	  -0.00044	  -0.00033	  -0.00024	  -0.00011	    0.00000	    0.00010	    0.00025	    0.00036	    0.00051	    0.00061
                     15	  -0.00178	  -0.00150	  -0.00110	  -0.00078	  -0.00034	    0.00001	    0.00035	    0.00082	    0.00173	    0.00151	    0.00190
                     22	  -0.00177	  -0.00146	  -0.00101	  -0.00068	  -0.00018	    0.00000	    0.00013	    0.00029	    0.00042	    0.00057	    0.00068
                     45	    0.00042	    0.00036	    0.00025	    0.00018	    0.00010	    0.00005	  -0.00001	  -0.00009	  -0.00014	  -0.00019	  -0.00022
                     60	    0.00017	    0.00014	    0.00010	    0.00007	    0.00004	    0.00004	    0.00001	  -0.00003	  -0.00004	  -0.00005	  -0.00006
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            </tableData>
          </table>
       </product>
    </function>
    <function name="aero/c/CFYDSD1R">
    <description>SIDE FORCE DUE TO LE SLAT 1R DEFLECTION</description>
    <product>
          <table>
            <independentVar lookup="row">aero/alpha-deg</independentVar>
            <independentVar lookup="column">fcs/slat-1R-pos-deg</independentVar>
            <tableData>
                                -17	        -14	        -10	         -7	         -3	          0	          3	          7	         10	         14	         17
                    -10	  -0.00037	  -0.00031	  -0.00022	  -0.00015	  -0.00007	    0.00000	    0.00007	    0.00015	    0.00020	    0.00027	    0.00032
                      3	    0.00004	    0.00004	    0.00003	    0.00002	    0.00001	    0.00000	  -0.00001	  -0.00004	  -0.00005	  -0.00008	  -0.00010
                      9	    0.00051	    0.00044	    0.00033	    0.00024	    0.00011	    0.00000	  -0.00010	  -0.00025	  -0.00036	  -0.00051	  -0.00061
                     15	    0.00178	    0.00150	    0.00110	    0.00078	    0.00034	  -0.00001	  -0.00035	  -0.00082	  -0.00173	  -0.00151	  -0.00190
                     22	    0.00177	    0.00146	    0.00101	    0.00068	    0.00018	    0.00000	  -0.00013	  -0.00029	  -0.00042	  -0.00057	  -0.00068
                     45	  -0.00042	  -0.00036	  -0.00025	  -0.00018	  -0.00010	  -0.00005	    0.00001	    0.00009	    0.00014	    0.00019	    0.00022
                     60	  -0.00017	  -0.00014	  -0.00010	  -0.00007	  -0.00004	  -0.00004	  -0.00001	    0.00003	    0.00004	    0.00005	    0.00006
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            </tableData>
          </table>
       </product>
    </function>
    <function name="aero/c/CFYDSD2L">
    <description>SIDE FORCE DUE TO LE SLAT 2L DEFLECTION</description>
    <product>
          <table>
            <independentVar lookup="row">aero/alpha-deg</independentVar>
            <independentVar lookup="column">fcs/slat-2L-pos-deg</independentVar>
            <tableData>
                                -17	        -14	        -10	         -7	         -3	          0	          3	          7	         10	         14	         17
                    -10	    0.00033	    0.00028	    0.00020	    0.00013	    0.00005	    0.00000	  -0.00006	  -0.00013	  -0.00018	  -0.00025	  -0.00029
                      3	  -0.00005	  -0.00005	  -0.00004	  -0.00003	  -0.00001	    0.00000	    0.00002	    0.00004	    0.00006	    0.00008	    0.00010
                      9	  -0.00065	  -0.00056	  -0.00041	  -0.00030	  -0.00014	    0.00000	    0.00013	    0.00031	    0.00044	    0.00062	    0.00074
                     15	  -0.00063	  -0.00070	  -0.00051	  -0.00036	  -0.00015	    0.00001	    0.00018	    0.00012	    0.00027	    0.00044	    0.00058
                     22	    0.00076	    0.00062	    0.00044	    0.00031	    0.00013	    0.00000	  -0.00012	  -0.00028	  -0.00039	  -0.00052	  -0.00060
                     45	    0.00041	    0.00034	    0.00025	    0.00019	    0.00011	    0.00005	  -0.00002	  -0.00006	  -0.00011	  -0.00015	  -0.00018
                     60	    0.00023	    0.00019	    0.00013	    0.00010	    0.00007	    0.00004	  -0.00002	  -0.00004	  -0.00003	  -0.00004	  -0.00004
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            </tableData>
          </table>
       </product>
    </function>
    <function name="aero/c/CFYDSD2R">
    <description>SIDE FORCE DUE TO LE SLAT 2R DEFLECTION</description>
    <product>
          <table>
            <independentVar lookup="row">aero/alpha-deg</independentVar>
            <independentVar lookup="column">fcs/slat-2R-pos-deg</independentVar>
            <tableData>
                                -17	        -14	        -10	         -7	         -3	          0	          3	          7	         10	         14	         17
                    -10	  -0.00033	  -0.00028	  -0.00020	  -0.00013	  -0.00005	    0.00000	    0.00006	    0.00013	    0.00018	    0.00025	    0.00029
                      3	    0.00005	    0.00005	    0.00004	    0.00003	    0.00001	    0.00000	  -0.00002	  -0.00004	  -0.00006	  -0.00008	  -0.00010
                      9	    0.00065	    0.00056	    0.00041	    0.00030	    0.00014	    0.00000	  -0.00013	  -0.00031	  -0.00044	  -0.00062	  -0.00074
                     15	    0.00063	    0.00070	    0.00051	    0.00036	    0.00015	  -0.00001	  -0.00018	  -0.00012	  -0.00027	  -0.00044	  -0.00058
                     22	  -0.00076	  -0.00062	  -0.00044	  -0.00031	  -0.00013	    0.00000	    0.00012	    0.00028	    0.00039	    0.00052	    0.00060
                     45	  -0.00041	  -0.00034	  -0.00025	  -0.00019	  -0.00011	  -0.00005	    0.00002	    0.00006	    0.00011	    0.00015	    0.00018
                     60	  -0.00023	  -0.00019	  -0.00013	  -0.00010	  -0.00007	  -0.00004	    0.00002	    0.00004	    0.00003	    0.00004	    0.00004
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            </tableData>
          </table>
       </product>
    </function>
    <function name="aero/c/CFYGEAR">
    <description>SIDE FORCE INCREMENT DUE TO GEAR</description>
    <product>
          <property>gear/gear-pos-norm</property>
          <table>
            <independentVar lookup="row">aero/alpha-deg</independentVar>
            <tableData>
                    -10		    0.00002
                     -5		    0.00000
                      3		    0.00000
                      8		  -0.00001
                     13		  -0.00008
                     18		  -0.00082
                     25		    0.00049
                     35		    0.00077
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            </tableData>
          </table>
       </product>
    </function>
    <function name="aero/c/CFYmn">
    <description>SIDE FORCE DUE TO MACH</description>
    <product>
          <table>
            <independentVar lookup="row">velocities/mach</independentVar>
            <independentVar lookup="column">aero/alpha-deg</independentVar>
            <tableData>
                                -10	         -1	       0.01	          1	         10
                    0.2	    0.00000	    0.00000	    0.00000	    0.00000	  -0.00001
                    0.8	    0.00000	    0.00000	    0.00000	    0.00000	    0.00000
                   0.99	    0.00001	    0.00000	    0.00000	    0.00000	  -0.00001
                    1.3	    0.00061	    0.00000	  -0.00001	    0.00000	    0.00064
                    1.6	    0.00000	    0.00001	  -0.00004	    0.00000	  -0.00001
                    2.2	    0.00583	    0.00004	    0.00002	    0.00014	    0.00598
                    2.5	    0.00454	    0.00003	    0.00003	    0.00010	    0.00406
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            </tableData>
          </table>
       </product>
    </function>
    <function name="aero/c/CFYP">
    <description>SIDE FORCE DUE TO ROLL RATE</description>
    <product>
          <property>aero/pb</property>
          <table>
            <independentVar lookup="row">aero/alpha-deg</independentVar>
            <tableData>
                    -10		  -0.23282
                     -5		  -0.09247
                      4		    0.06576
                     10		    0.23633
                     16		    0.15193
                     24		    0.23977
                     50		  -0.03559
                     60		  -0.07040
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            </tableData>
          </table>
       </product>
    </function>
    <function name="aero/c/CFYR">
    <description>SIDE FORCE DUE TO YAW RATE</description>
    <product>
          <property>aero/rb</property>
          <table>
            <independentVar lookup="row">aero/alpha-deg</independentVar>
            <tableData>
                    -10		    0.37824
                     -5		    0.35092
                      4		    0.34366
                     10		    0.33594
                     16		    0.32547
                     24		    0.21521
                     50		    0.25380
                     60		    0.22725
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            </tableData>
          </table>
       </product>
    </function>
    <function name="aero/c/CMN1">
    <description>BASIC YAWING MOMENT</description>
    <product>
          <table>
            <independentVar lookup="row">aero/alpha-deg</independentVar>
            <independentVar lookup="column">aero/beta-deg</independentVar>
            <tableData>
                                -10	         -5	         -2	          0	          2	          5	         10
                    -10	  -0.00732	  -0.00117	    0.00000	    0.00000	    0.00000	    0.00117	    0.00732
                      3	  -0.00569	  -0.00105	  -0.00011	    0.00000	    0.00012	    0.00105	    0.00569
                      9	  -0.00567	  -0.00097	    0.00004	    0.00000	  -0.00004	    0.00097	    0.00567
                     15	  -0.00740	  -0.00188	  -0.00083	    0.00000	    0.00083	    0.00188	    0.00740
                     22	  -0.00930	  -0.00554	  -0.00160	    0.00000	    0.00160	    0.00554	    0.00931
                     45	    0.00332	    0.00387	    0.00185	    0.00001	  -0.00182	  -0.00382	  -0.00320
                     60	    0.01344	    0.00721	    0.00220	    0.00001	  -0.00217	  -0.00717	  -0.01340
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            </tableData>
          </table>
       </product>
    </function>
    <function name="aero/c/CMNBETADOT">
    <description>YAW MOMENT DERIVATIVE FOR BETA DOT</description>
    <product>
          <property>aero/betadot-rad_sec</property>
          <property>aero/bi2vel</property>
          <table>
            <independentVar lookup="row">aero/alpha-deg</independentVar>
            <tableData>
                    -10		  -0.00629
                     -5		  -0.00497
                      4		    0.00460
                     10		    0.00358
                     16		  -0.00908
                     24		    0.03333
                     50		  -0.16140
                     60		  -0.10993
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            </tableData>
          </table>
       </product>
    </function>
    <function name="aero/c/CMNDED1L">
    <description>YAW MOMENT DUE TO ELEVON 1L</description>
    <product>
          <table>
            <independentVar lookup="row">aero/alpha-deg</independentVar>
            <independentVar lookup="column">aero/beta-deg</independentVar>
            <independentVar lookup="table">fcs/elevon-1L-pos-deg</independentVar>
              <tableData breakPoint="-25">
                              -10	        -5	        -2	         0	         2	         5	        10
                    -10	  -0.00786	  -0.00709	  -0.00655	  -0.00632	  -0.00601	  -0.00596	  -0.00680
                      3	  -0.00819	  -0.00802	  -0.00778	  -0.00711	  -0.00762	  -0.00802	  -0.00806
                      9	  -0.00842	  -0.00809	  -0.00783	  -0.00790	  -0.00800	  -0.00828	  -0.00833
                     15	  -0.00781	  -0.00699	  -0.00695	  -0.00703	  -0.00648	  -0.00679	  -0.00760
                     22	  -0.00576	  -0.00576	  -0.00549	  -0.00533	  -0.00551	  -0.00640	  -0.00762
                     45	  -0.00264	  -0.00161	  -0.00143	  -0.00153	  -0.00150	  -0.00188	  -0.00208
                     60	    0.00100	    0.00093	    0.00073	    0.00072	    0.00093	    0.00101	    0.00061
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              </tableData>
              <tableData breakPoint="-20">
                              -10	        -5	        -2	         0	         2	         5	        10
                    -10	  -0.00619	  -0.00560	  -0.00499	  -0.00479	  -0.00455	  -0.00471	  -0.00545
                      3	  -0.00638	  -0.00621	  -0.00596	  -0.00541	  -0.00586	  -0.00615	  -0.00622
                      9	  -0.00654	  -0.00624	  -0.00603	  -0.00610	  -0.00620	  -0.00644	  -0.00650
                     15	  -0.00609	  -0.00541	  -0.00524	  -0.00523	  -0.00471	  -0.00497	  -0.00570
                     22	  -0.00428	  -0.00476	  -0.00423	  -0.00399	  -0.00451	  -0.00494	  -0.00563
                     45	  -0.00227	  -0.00129	  -0.00113	  -0.00125	  -0.00125	  -0.00146	  -0.00168
                     60	    0.00077	    0.00071	    0.00052	    0.00060	    0.00081	    0.00078	    0.00045
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              </tableData>
              <tableData breakPoint="-16">
                              -10	        -5	        -2	         0	         2	         5	        10
                    -10	  -0.00477	  -0.00434	  -0.00383	  -0.00367	  -0.00349	  -0.00364	  -0.00429
                      3	  -0.00491	  -0.00475	  -0.00451	  -0.00406	  -0.00445	  -0.00465	  -0.00474
                      9	  -0.00502	  -0.00476	  -0.00460	  -0.00466	  -0.00474	  -0.00495	  -0.00501
                     15	  -0.00472	  -0.00405	  -0.00388	  -0.00380	  -0.00331	  -0.00356	  -0.00466
                     22	  -0.00358	  -0.00369	  -0.00319	  -0.00313	  -0.00348	  -0.00362	  -0.00417
                     45	  -0.00165	  -0.00103	  -0.00105	  -0.00098	  -0.00094	  -0.00111	  -0.00133
                     60	    0.00063	    0.00060	    0.00035	    0.00026	    0.00075	    0.00055	    0.00039
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              </tableData>
              <tableData breakPoint="-15">
                              -10	        -5	        -2	         0	         2	         5	        10
                    -10	  -0.00441	  -0.00402	  -0.00354	  -0.00339	  -0.00322	  -0.00337	  -0.00400
                      3	  -0.00455	  -0.00440	  -0.00415	  -0.00374	  -0.00411	  -0.00429	  -0.00437
                      9	  -0.00464	  -0.00439	  -0.00425	  -0.00430	  -0.00439	  -0.00458	  -0.00464
                     15	  -0.00437	  -0.00373	  -0.00355	  -0.00346	  -0.00299	  -0.00323	  -0.00431
                     22	  -0.00332	  -0.00343	  -0.00295	  -0.00290	  -0.00323	  -0.00332	  -0.00387
                     45	  -0.00152	  -0.00096	  -0.00098	  -0.00092	  -0.00088	  -0.00103	  -0.00123
                     60	    0.00058	    0.00054	    0.00030	    0.00024	    0.00069	    0.00055	    0.00035
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              </tableData>
              <tableData breakPoint="-10">
                              -10	        -5	        -2	         0	         2	         5	        10
                    -10	  -0.00260	  -0.00245	  -0.00212	  -0.00204	  -0.00193	  -0.00207	  -0.00252
                      3	  -0.00281	  -0.00269	  -0.00249	  -0.00221	  -0.00249	  -0.00261	  -0.00267
                      9	  -0.00286	  -0.00268	  -0.00260	  -0.00263	  -0.00269	  -0.00282	  -0.00287
                     15	  -0.00260	  -0.00225	  -0.00225	  -0.00207	  -0.00153	  -0.00214	  -0.00248
                     22	  -0.00209	  -0.00216	  -0.00189	  -0.00179	  -0.00201	  -0.00239	  -0.00293
                     45	  -0.00096	  -0.00062	  -0.00059	  -0.00058	  -0.00060	  -0.00070	  -0.00063
                     60	    0.00036	    0.00047	    0.00016	    0.00017	    0.00046	    0.00023	    0.00017
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              </tableData>
              <tableData breakPoint="-5">
                              -10	        -5	        -2	         0	         2	         5	        10
                    -10	  -0.00114	  -0.00105	  -0.00089	  -0.00087	  -0.00080	  -0.00090	  -0.00116
                      3	  -0.00127	  -0.00120	  -0.00108	  -0.00094	  -0.00109	  -0.00116	  -0.00119
                      9	  -0.00129	  -0.00119	  -0.00115	  -0.00118	  -0.00119	  -0.00125	  -0.00129
                     15	  -0.00120	  -0.00112	  -0.00112	  -0.00087	  -0.00050	  -0.00068	  -0.00141
                     22	  -0.00102	  -0.00105	  -0.00090	  -0.00085	  -0.00094	  -0.00112	  -0.00134
                     45	  -0.00043	  -0.00030	  -0.00028	  -0.00028	  -0.00030	  -0.00037	  -0.00044
                     60	    0.00012	    0.00026	  -0.00001	    0.00017	    0.00018	    0.00006	    0.00002
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              </tableData>
              <tableData breakPoint="0">
                              -10	        -5	        -2	         0	         2	         5	        10
                    -10	    0.00000	    0.00000	    0.00000	    0.00000	    0.00000	    0.00000	    0.00000
                      3	    0.00000	    0.00000	    0.00000	    0.00000	    0.00001	    0.00000	    0.00000
                      9	    0.00000	    0.00000	    0.00000	    0.00000	    0.00000	    0.00000	    0.00000
                     15	    0.00000	    0.00000	    0.00000	    0.00000	    0.00000	    0.00000	    0.00000
                     22	    0.00000	    0.00000	    0.00000	    0.00000	    0.00000	    0.00000	    0.00000
                     45	    0.00000	    0.00001	    0.00000	    0.00001	    0.00000	    0.00000	    0.00000
                     60	    0.00000	  -0.00001	    0.00000	    0.00000	    0.00000	    0.00000	    0.00000
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              </tableData>
              <tableData breakPoint="5">
                              -10	        -5	        -2	         0	         2	         5	        10
                    -10	    0.00085	    0.00062	    0.00052	    0.00051	    0.00041	    0.00055	    0.00088
                      3	    0.00076	    0.00083	    0.00056	    0.00039	    0.00065	    0.00081	    0.00084
                      9	    0.00101	    0.00076	    0.00066	    0.00069	    0.00073	    0.00084	    0.00086
                     15	    0.00063	  -0.00068	    0.00023	    0.00088	    0.00083	    0.00115	    0.00057
                     22	    0.00089	    0.00092	    0.00079	    0.00072	    0.00079	    0.00100	    0.00070
                     45	    0.00024	    0.00029	    0.00031	    0.00027	    0.00025	  -0.00010	    0.00047
                     60	  -0.00018	  -0.00019	  -0.00018	  -0.00015	  -0.00005	  -0.00115	  -0.00073
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              </tableData>
              <tableData breakPoint="10">
                              -10	        -5	        -2	         0	         2	         5	        10
                    -10	    0.00144	    0.00093	    0.00064	    0.00055	    0.00043	    0.00068	    0.00132
                      3	    0.00098	    0.00109	    0.00045	    0.00015	    0.00068	    0.00085	    0.00111
                      9	    0.00144	    0.00112	    0.00098	    0.00099	    0.00108	    0.00130	    0.00137
                     15	    0.00096	  -0.00102	  -0.00034	    0.00081	    0.00069	    0.00137	    0.00139
                     22	    0.00166	    0.00171	    0.00145	    0.00131	    0.00146	    0.00175	    0.00172
                     45	    0.00060	    0.00054	    0.00052	    0.00043	    0.00048	    0.00015	    0.00101
                     60	  -0.00050	  -0.00038	  -0.00096	  -0.00027	  -0.00020	  -0.00133	  -0.00084
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              </tableData>
              <tableData breakPoint="13">
                              -10	        -5	        -2	         0	         2	         5	        10
                    -10	    0.00166	    0.00096	    0.00056	    0.00043	    0.00027	    0.00057	    0.00145
                      3	    0.00092	    0.00099	    0.00012	  -0.00022	    0.00046	    0.00062	    0.00106
                      9	    0.00153	    0.00115	    0.00098	    0.00102	    0.00111	    0.00137	    0.00150
                     15	    0.00134	  -0.00083	  -0.00015	    0.00014	    0.00093	    0.00145	    0.00164
                     22	    0.00217	    0.00212	    0.00179	    0.00161	    0.00179	    0.00226	    0.00225
                     45	    0.00071	    0.00065	    0.00063	    0.00055	    0.00061	    0.00028	    0.00068
                     60	  -0.00049	  -0.00046	  -0.00103	  -0.00032	  -0.00026	  -0.00142	  -0.00088
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              </tableData>
              <tableData breakPoint="16">
                              -10	        -5	        -2	         0	         2	         5	        10
                    -10	    0.00178	    0.00088	    0.00039	    0.00021	    0.00003	    0.00037	    0.00142
                      3	    0.00074	    0.00079	  -0.00035	  -0.00076	    0.00010	    0.00025	    0.00089
                      9	    0.00148	    0.00105	    0.00086	    0.00092	    0.00103	    0.00136	    0.00161
                     15	    0.00135	  -0.00064	  -0.00088	    0.00030	    0.00005	    0.00171	    0.00232
                     22	    0.00255	    0.00261	    0.00210	    0.00187	    0.00208	    0.00263	    0.00264
                     45	    0.00088	    0.00077	    0.00073	    0.00066	    0.00075	    0.00040	    0.00087
                     60	  -0.00055	  -0.00054	  -0.00109	  -0.00037	  -0.00031	  -0.00148	  -0.00094
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              </tableData>
          </table>
       </product>
    </function>
    <function name="aero/c/CMNDED1R">
    <description>YAW MOMENT DUE TO ELEVON 1R</description>
    <product>
          <table>
            <independentVar lookup="row">aero/alpha-deg</independentVar>
            <independentVar lookup="column">aero/beta-deg</independentVar>
            <independentVar lookup="table">fcs/elevon-1R-pos-deg</independentVar>
              <tableData breakPoint="-25">
                              -10	        -5	        -2	         0	         2	         5	        10
                    -10	    0.00786	    0.00709	    0.00655	    0.00632	    0.00601	    0.00596	    0.00680
                      3	    0.00819	    0.00802	    0.00778	    0.00711	    0.00762	    0.00802	    0.00806
                      9	    0.00842	    0.00809	    0.00783	    0.00790	    0.00800	    0.00828	    0.00833
                     15	    0.00781	    0.00699	    0.00695	    0.00703	    0.00648	    0.00679	    0.00760
                     22	    0.00576	    0.00576	    0.00549	    0.00533	    0.00551	    0.00640	    0.00762
                     45	    0.00264	    0.00161	    0.00143	    0.00153	    0.00150	    0.00188	    0.00208
                     60	  -0.00100	  -0.00093	  -0.00073	  -0.00072	  -0.00093	  -0.00101	  -0.00061
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              </tableData>
              <tableData breakPoint="-20">
                              -10	        -5	        -2	         0	         2	         5	        10
                    -10	    0.00619	    0.00560	    0.00499	    0.00479	    0.00455	    0.00471	    0.00545
                      3	    0.00638	    0.00621	    0.00596	    0.00541	    0.00586	    0.00615	    0.00622
                      9	    0.00654	    0.00624	    0.00603	    0.00610	    0.00620	    0.00644	    0.00650
                     15	    0.00609	    0.00541	    0.00524	    0.00523	    0.00471	    0.00497	    0.00570
                     22	    0.00428	    0.00476	    0.00423	    0.00399	    0.00451	    0.00494	    0.00563
                     45	    0.00227	    0.00129	    0.00113	    0.00125	    0.00125	    0.00146	    0.00168
                     60	  -0.00077	  -0.00071	  -0.00052	  -0.00060	  -0.00081	  -0.00078	  -0.00045
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              </tableData>
              <tableData breakPoint="-16">
                              -10	        -5	        -2	         0	         2	         5	        10
                    -10	    0.00477	    0.00434	    0.00383	    0.00367	    0.00349	    0.00364	    0.00429
                      3	    0.00491	    0.00475	    0.00451	    0.00406	    0.00445	    0.00465	    0.00474
                      9	    0.00502	    0.00476	    0.00460	    0.00466	    0.00474	    0.00495	    0.00501
                     15	    0.00472	    0.00405	    0.00388	    0.00380	    0.00331	    0.00356	    0.00466
                     22	    0.00358	    0.00369	    0.00319	    0.00313	    0.00348	    0.00362	    0.00417
                     45	    0.00165	    0.00103	    0.00105	    0.00098	    0.00094	    0.00111	    0.00133
                     60	  -0.00063	  -0.00060	  -0.00035	  -0.00026	  -0.00075	  -0.00055	  -0.00039
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              </tableData>
              <tableData breakPoint="-15">
                              -10	        -5	        -2	         0	         2	         5	        10
                    -10	    0.00441	    0.00402	    0.00354	    0.00339	    0.00322	    0.00337	    0.00400
                      3	    0.00455	    0.00440	    0.00415	    0.00374	    0.00411	    0.00429	    0.00437
                      9	    0.00464	    0.00439	    0.00425	    0.00430	    0.00439	    0.00458	    0.00464
                     15	    0.00437	    0.00373	    0.00355	    0.00346	    0.00299	    0.00323	    0.00431
                     22	    0.00332	    0.00343	    0.00295	    0.00290	    0.00323	    0.00332	    0.00387
                     45	    0.00152	    0.00096	    0.00098	    0.00092	    0.00088	    0.00103	    0.00123
                     60	  -0.00058	  -0.00054	  -0.00030	  -0.00024	  -0.00069	  -0.00055	  -0.00035
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              </tableData>
              <tableData breakPoint="-10">
                              -10	        -5	        -2	         0	         2	         5	        10
                    -10	    0.00260	    0.00245	    0.00212	    0.00204	    0.00193	    0.00207	    0.00252
                      3	    0.00281	    0.00269	    0.00249	    0.00221	    0.00249	    0.00261	    0.00267
                      9	    0.00286	    0.00268	    0.00260	    0.00263	    0.00269	    0.00282	    0.00287
                     15	    0.00260	    0.00225	    0.00225	    0.00207	    0.00153	    0.00214	    0.00248
                     22	    0.00209	    0.00216	    0.00189	    0.00179	    0.00201	    0.00239	    0.00293
                     45	    0.00096	    0.00062	    0.00059	    0.00058	    0.00060	    0.00070	    0.00063
                     60	  -0.00036	  -0.00047	  -0.00016	  -0.00017	  -0.00046	  -0.00023	  -0.00017
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              </tableData>
              <tableData breakPoint="-5">
                              -10	        -5	        -2	         0	         2	         5	        10
                    -10	    0.00114	    0.00105	    0.00089	    0.00087	    0.00080	    0.00090	    0.00116
                      3	    0.00127	    0.00120	    0.00108	    0.00094	    0.00109	    0.00116	    0.00119
                      9	    0.00129	    0.00119	    0.00115	    0.00118	    0.00119	    0.00125	    0.00129
                     15	    0.00120	    0.00112	    0.00112	    0.00087	    0.00050	    0.00068	    0.00141
                     22	    0.00102	    0.00105	    0.00090	    0.00085	    0.00094	    0.00112	    0.00134
                     45	    0.00043	    0.00030	    0.00028	    0.00028	    0.00030	    0.00037	    0.00044
                     60	  -0.00012	  -0.00026	    0.00001	  -0.00017	  -0.00018	  -0.00006	  -0.00002
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              </tableData>
              <tableData breakPoint="0">
                              -10	        -5	        -2	         0	         2	         5	        10
                    -10	    0.00000	    0.00000	    0.00000	    0.00000	    0.00000	    0.00000	    0.00000
                      3	    0.00000	    0.00000	    0.00000	    0.00000	  -0.00001	    0.00000	    0.00000
                      9	    0.00000	    0.00000	    0.00000	    0.00000	    0.00000	    0.00000	    0.00000
                     15	    0.00000	    0.00000	    0.00000	    0.00000	    0.00000	    0.00000	    0.00000
                     22	    0.00000	    0.00000	    0.00000	    0.00000	    0.00000	    0.00000	    0.00000
                     45	    0.00000	  -0.00001	    0.00000	  -0.00001	    0.00000	    0.00000	    0.00000
                     60	    0.00000	    0.00001	    0.00000	    0.00000	    0.00000	    0.00000	    0.00000
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              </tableData>
              <tableData breakPoint="5">
                              -10	        -5	        -2	         0	         2	         5	        10
                    -10	  -0.00085	  -0.00062	  -0.00052	  -0.00051	  -0.00041	  -0.00055	  -0.00088
                      3	  -0.00076	  -0.00083	  -0.00056	  -0.00039	  -0.00065	  -0.00081	  -0.00084
                      9	  -0.00101	  -0.00076	  -0.00066	  -0.00069	  -0.00073	  -0.00084	  -0.00086
                     15	  -0.00063	    0.00068	  -0.00023	  -0.00088	  -0.00083	  -0.00115	  -0.00057
                     22	  -0.00089	  -0.00092	  -0.00079	  -0.00072	  -0.00079	  -0.00100	  -0.00070
                     45	  -0.00024	  -0.00029	  -0.00031	  -0.00027	  -0.00025	    0.00010	  -0.00047
                     60	    0.00018	    0.00019	    0.00018	    0.00015	    0.00005	    0.00115	    0.00073
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              </tableData>
              <tableData breakPoint="10">
                              -10	        -5	        -2	         0	         2	         5	        10
                    -10	  -0.00144	  -0.00093	  -0.00064	  -0.00055	  -0.00043	  -0.00068	  -0.00132
                      3	  -0.00098	  -0.00109	  -0.00045	  -0.00015	  -0.00068	  -0.00085	  -0.00111
                      9	  -0.00144	  -0.00112	  -0.00098	  -0.00099	  -0.00108	  -0.00130	  -0.00137
                     15	  -0.00096	    0.00102	    0.00034	  -0.00081	  -0.00069	  -0.00137	  -0.00139
                     22	  -0.00166	  -0.00171	  -0.00145	  -0.00131	  -0.00146	  -0.00175	  -0.00172
                     45	  -0.00060	  -0.00054	  -0.00052	  -0.00043	  -0.00048	  -0.00015	  -0.00101
                     60	    0.00050	    0.00038	    0.00096	    0.00027	    0.00020	    0.00133	    0.00084
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              </tableData>
              <tableData breakPoint="13">
                              -10	        -5	        -2	         0	         2	         5	        10
                    -10	  -0.00166	  -0.00096	  -0.00056	  -0.00043	  -0.00027	  -0.00057	  -0.00145
                      3	  -0.00092	  -0.00099	  -0.00012	    0.00022	  -0.00046	  -0.00062	  -0.00106
                      9	  -0.00153	  -0.00115	  -0.00098	  -0.00102	  -0.00111	  -0.00137	  -0.00150
                     15	  -0.00134	    0.00083	    0.00015	  -0.00014	  -0.00093	  -0.00145	  -0.00164
                     22	  -0.00217	  -0.00212	  -0.00179	  -0.00161	  -0.00179	  -0.00226	  -0.00225
                     45	  -0.00071	  -0.00065	  -0.00063	  -0.00055	  -0.00061	  -0.00028	  -0.00068
                     60	    0.00049	    0.00046	    0.00103	    0.00032	    0.00026	    0.00142	    0.00088
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              </tableData>
              <tableData breakPoint="16">
                              -10	        -5	        -2	         0	         2	         5	        10
                    -10	  -0.00178	  -0.00088	  -0.00039	  -0.00021	  -0.00003	  -0.00037	  -0.00142
                      3	  -0.00074	  -0.00079	    0.00035	    0.00076	  -0.00010	  -0.00025	  -0.00089
                      9	  -0.00148	  -0.00105	  -0.00086	  -0.00092	  -0.00103	  -0.00136	  -0.00161
                     15	  -0.00135	    0.00064	    0.00088	  -0.00030	  -0.00005	  -0.00171	  -0.00232
                     22	  -0.00255	  -0.00261	  -0.00210	  -0.00187	  -0.00208	  -0.00263	  -0.00264
                     45	  -0.00088	  -0.00077	  -0.00073	  -0.00066	  -0.00075	  -0.00040	  -0.00087
                     60	    0.00055	    0.00054	    0.00109	    0.00037	    0.00031	    0.00148	    0.00094
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              </tableData>
          </table>
       </product>
    </function>
    <function name="aero/c/CMNDED2L">
    <description>YAW MOMENT DUE TO ELEVON 2L</description>
    <product>
          <table>
            <independentVar lookup="row">aero/alpha-deg</independentVar>
            <independentVar lookup="column">aero/beta-deg</independentVar>
            <independentVar lookup="table">fcs/elevon-2L-pos-deg</independentVar>
              <tableData breakPoint="-25">
                              -10	        -5	        -2	         0	         2	         5	        10
                    -10	  -0.00412	  -0.00210	  -0.00152	  -0.00156	  -0.00156	  -0.00216	  -0.00283
                      3	  -0.00645	  -0.00540	  -0.00468	  -0.00409	  -0.00437	  -0.00420	  -0.00327
                      9	  -0.00674	  -0.00600	  -0.00525	  -0.00500	  -0.00484	  -0.00479	  -0.00440
                     15	  -0.00747	  -0.00618	  -0.00582	  -0.00588	  -0.00515	  -0.00508	  -0.00557
                     22	  -0.00755	  -0.00816	  -0.00664	  -0.00678	  -0.00691	  -0.00789	  -0.00905
                     45	  -0.00769	  -0.00452	  -0.00358	  -0.00260	  -0.00175	  -0.00083	    0.00019
                     60	    0.00046	    0.00200	    0.00088	    0.00213	    0.00373	    0.00357	    0.00633
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              </tableData>
              <tableData breakPoint="-20">
                              -10	        -5	        -2	         0	         2	         5	        10
                    -10	  -0.00343	  -0.00163	  -0.00115	  -0.00121	  -0.00124	  -0.00173	  -0.00221
                      3	  -0.00542	  -0.00444	  -0.00378	  -0.00328	  -0.00349	  -0.00332	  -0.00246
                      9	  -0.00564	  -0.00494	  -0.00428	  -0.00403	  -0.00386	  -0.00376	  -0.00338
                     15	  -0.00635	  -0.00515	  -0.00480	  -0.00473	  -0.00404	  -0.00394	  -0.00429
                     22	  -0.00592	  -0.00704	  -0.00575	  -0.00542	  -0.00579	  -0.00583	  -0.00761
                     45	  -0.00688	  -0.00398	  -0.00302	  -0.00218	  -0.00142	  -0.00082	    0.00106
                     60	    0.00009	    0.00155	    0.00055	    0.00148	    0.00343	    0.00286	    0.00536
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              </tableData>
              <tableData breakPoint="-16">
                              -10	        -5	        -2	         0	         2	         5	        10
                    -10	  -0.00283	  -0.00123	  -0.00085	  -0.00093	  -0.00100	  -0.00138	  -0.00168
                      3	  -0.00453	  -0.00362	  -0.00302	  -0.00259	  -0.00275	  -0.00258	  -0.00180
                      9	  -0.00468	  -0.00404	  -0.00346	  -0.00320	  -0.00302	  -0.00289	  -0.00253
                     15	  -0.00545	  -0.00427	  -0.00393	  -0.00378	  -0.00311	  -0.00299	  -0.00321
                     22	  -0.00509	  -0.00571	  -0.00447	  -0.00413	  -0.00440	  -0.00471	  -0.00565
                     45	  -0.00654	  -0.00351	  -0.00256	  -0.00182	  -0.00113	  -0.00046	    0.00113
                     60	  -0.00031	    0.00120	    0.00041	    0.00111	    0.00223	    0.00249	    0.00483
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              </tableData>
              <tableData breakPoint="-15">
                              -10	        -5	        -2	         0	         2	         5	        10
                    -10	  -0.00268	  -0.00113	  -0.00078	  -0.00086	  -0.00094	  -0.00136	  -0.00155
                      3	  -0.00430	  -0.00341	  -0.00283	  -0.00241	  -0.00256	  -0.00239	  -0.00163
                      9	  -0.00443	  -0.00381	  -0.00325	  -0.00299	  -0.00282	  -0.00267	  -0.00232
                     15	  -0.00520	  -0.00405	  -0.00371	  -0.00354	  -0.00287	  -0.00275	  -0.00294
                     22	  -0.00475	  -0.00539	  -0.00420	  -0.00387	  -0.00397	  -0.00430	  -0.00602
                     45	  -0.00637	  -0.00339	  -0.00244	  -0.00170	  -0.00104	  -0.00037	    0.00129
                     60	  -0.00038	    0.00110	    0.00035	    0.00111	    0.00220	    0.00234	    0.00464
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              </tableData>
              <tableData breakPoint="-10">
                              -10	        -5	        -2	         0	         2	         5	        10
                    -10	  -0.00189	  -0.00063	  -0.00042	  -0.00053	  -0.00065	  -0.00094	  -0.00090
                      3	  -0.00313	  -0.00235	  -0.00188	  -0.00156	  -0.00163	  -0.00144	  -0.00078
                      9	  -0.00316	  -0.00264	  -0.00219	  -0.00195	  -0.00177	  -0.00157	  -0.00128
                     15	  -0.00390	  -0.00290	  -0.00261	  -0.00233	  -0.00170	  -0.00154	  -0.00158
                     22	  -0.00330	  -0.00403	  -0.00300	  -0.00260	  -0.00274	  -0.00232	  -0.00367
                     45	  -0.00552	  -0.00274	  -0.00179	  -0.00117	  -0.00050	    0.00015	    0.00222
                     60	  -0.00074	    0.00076	  -0.00001	    0.00067	    0.00144	    0.00163	    0.00384
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              </tableData>
              <tableData breakPoint="-5">
                              -10	        -5	        -2	         0	         2	         5	        10
                    -10	  -0.00106	  -0.00014	  -0.00010	  -0.00024	  -0.00039	  -0.00060	  -0.00030
                      3	  -0.00195	  -0.00130	  -0.00095	  -0.00074	  -0.00073	  -0.00053	    0.00004
                      9	  -0.00191	  -0.00156	  -0.00115	  -0.00094	  -0.00074	  -0.00054	  -0.00030
                     15	  -0.00240	  -0.00184	  -0.00154	  -0.00114	  -0.00057	  -0.00036	  -0.00029
                     22	  -0.00161	  -0.00240	  -0.00156	  -0.00128	  -0.00124	  -0.00072	  -0.00188
                     45	  -0.00466	  -0.00211	  -0.00115	  -0.00056	    0.00004	    0.00077	    0.00307
                     60	  -0.00106	  -0.00013	  -0.00035	    0.00032	    0.00096	    0.00102	    0.00334
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              </tableData>
              <tableData breakPoint="0">
                              -10	        -5	        -2	         0	         2	         5	        10
                    -10	  -0.00022	    0.00031	    0.00018	    0.00000	  -0.00018	  -0.00031	    0.00022
                      3	  -0.00081	  -0.00032	  -0.00010	    0.00000	    0.00011	    0.00032	    0.00080
                      9	  -0.00065	  -0.00048	  -0.00018	    0.00000	    0.00018	    0.00048	    0.00065
                     15	  -0.00090	  -0.00075	  -0.00049	    0.00000	    0.00049	    0.00075	    0.00090
                     22	    0.00004	  -0.00082	  -0.00019	    0.00001	    0.00019	    0.00080	  -0.00003
                     45	  -0.00379	  -0.00130	  -0.00058	    0.00000	    0.00057	    0.00133	    0.00390
                     60	  -0.00134	  -0.00048	  -0.00067	    0.00000	    0.00068	    0.00051	    0.00135
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              </tableData>
              <tableData breakPoint="5">
                              -10	        -5	        -2	         0	         2	         5	        10
                    -10	    0.00063	    0.00067	    0.00041	    0.00016	  -0.00006	  -0.00009	    0.00063
                      3	    0.00026	    0.00058	    0.00066	    0.00064	    0.00086	    0.00108	    0.00148
                      9	    0.00058	    0.00052	    0.00071	    0.00083	    0.00105	    0.00134	    0.00143
                     15	    0.00067	  -0.00020	    0.00016	    0.00129	    0.00189	    0.00134	    0.00157
                     22	    0.00168	    0.00058	    0.00116	    0.00123	    0.00149	    0.00224	    0.00172
                     45	  -0.00304	  -0.00069	  -0.00001	    0.00054	    0.00112	    0.00186	    0.00462
                     60	  -0.00157	  -0.00087	  -0.00095	  -0.00019	    0.00036	    0.00005	    0.00080
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              </tableData>
              <tableData breakPoint="10">
                              -10	        -5	        -2	         0	         2	         5	        10
                    -10	    0.00139	    0.00097	    0.00055	    0.00026	  -0.00001	    0.00003	    0.00096
                      3	    0.00120	    0.00133	    0.00130	    0.00117	    0.00149	    0.00172	    0.00202
                      9	    0.00169	    0.00141	    0.00143	    0.00159	    0.00176	    0.00209	    0.00211
                     15	    0.00181	    0.00053	    0.00047	    0.00141	    0.00206	    0.00296	    0.00282
                     22	    0.00321	    0.00217	    0.00240	    0.00235	    0.00265	    0.00362	    0.00277
                     45	  -0.00231	  -0.00015	    0.00047	    0.00106	    0.00156	    0.00237	    0.00526
                     60	  -0.00177	  -0.00113	  -0.00120	  -0.00041	    0.00032	  -0.00037	  -0.00034
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              </tableData>
              <tableData breakPoint="13">
                              -10	        -5	        -2	         0	         2	         5	        10
                    -10	    0.00182	    0.00111	    0.00055	    0.00027	  -0.00003	    0.00007	    0.00111
                      3	    0.00170	    0.00173	    0.00160	    0.00143	    0.00181	    0.00203	    0.00228
                      9	    0.00229	    0.00189	    0.00181	    0.00196	    0.00213	    0.00249	    0.00246
                     15	    0.00219	    0.00035	    0.00018	    0.00219	    0.00169	    0.00318	    0.00318
                     22	    0.00419	    0.00301	    0.00318	    0.00296	    0.00328	    0.00432	    0.00366
                     45	  -0.00193	    0.00012	    0.00071	    0.00132	    0.00182	    0.00263	    0.00559
                     60	  -0.00183	  -0.00126	  -0.00134	  -0.00047	    0.00020	  -0.00055	  -0.00055
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              </tableData>
              <tableData breakPoint="16">
                              -10	        -5	        -2	         0	         2	         5	        10
                    -10	    0.00222	    0.00123	    0.00052	    0.00026	  -0.00006	    0.00008	    0.00122
                      3	    0.00215	    0.00207	    0.00187	    0.00164	    0.00208	    0.00230	    0.00250
                      9	    0.00286	    0.00232	    0.00214	    0.00229	    0.00245	    0.00284	    0.00277
                     15	    0.00317	    0.00126	    0.00089	    0.00184	    0.00229	    0.00321	    0.00350
                     22	    0.00501	    0.00379	    0.00383	    0.00364	    0.00384	    0.00493	    0.00434
                     45	  -0.00159	    0.00038	    0.00092	    0.00153	    0.00207	    0.00286	    0.00592
                     60	  -0.00190	  -0.00137	  -0.00145	  -0.00056	    0.00011	  -0.00069	  -0.00073
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              </tableData>
          </table>
       </product>
    </function>
    <function name="aero/c/CMNDED2R">
    <description>YAW MOMENT DUE TO ELEVON 2R</description>
    <product>
          <table>
            <independentVar lookup="row">aero/alpha-deg</independentVar>
            <independentVar lookup="column">aero/beta-deg</independentVar>
            <independentVar lookup="table">fcs/elevon-2R-pos-deg</independentVar>
              <tableData breakPoint="-25">
                              -10	        -5	        -2	         0	         2	         5	        10
                    -10	    0.00412	    0.00210	    0.00152	    0.00156	    0.00156	    0.00216	    0.00283
                      3	    0.00645	    0.00540	    0.00468	    0.00409	    0.00437	    0.00420	    0.00327
                      9	    0.00674	    0.00600	    0.00525	    0.00500	    0.00484	    0.00479	    0.00440
                     15	    0.00747	    0.00618	    0.00582	    0.00588	    0.00515	    0.00508	    0.00557
                     22	    0.00755	    0.00816	    0.00664	    0.00678	    0.00691	    0.00789	    0.00905
                     45	    0.00769	    0.00452	    0.00358	    0.00260	    0.00175	    0.00083	  -0.00019
                     60	  -0.00046	  -0.00200	  -0.00088	  -0.00213	  -0.00373	  -0.00357	  -0.00633
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              </tableData>
              <tableData breakPoint="-20">
                              -10	        -5	        -2	         0	         2	         5	        10
                    -10	    0.00343	    0.00163	    0.00115	    0.00121	    0.00124	    0.00173	    0.00221
                      3	    0.00542	    0.00444	    0.00378	    0.00328	    0.00349	    0.00332	    0.00246
                      9	    0.00564	    0.00494	    0.00428	    0.00403	    0.00386	    0.00376	    0.00338
                     15	    0.00635	    0.00515	    0.00480	    0.00473	    0.00404	    0.00394	    0.00429
                     22	    0.00592	    0.00704	    0.00575	    0.00542	    0.00579	    0.00583	    0.00761
                     45	    0.00688	    0.00398	    0.00302	    0.00218	    0.00142	    0.00082	  -0.00106
                     60	  -0.00009	  -0.00155	  -0.00055	  -0.00148	  -0.00343	  -0.00286	  -0.00536
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              </tableData>
              <tableData breakPoint="-16">
                              -10	        -5	        -2	         0	         2	         5	        10
                    -10	    0.00283	    0.00123	    0.00085	    0.00093	    0.00100	    0.00138	    0.00168
                      3	    0.00453	    0.00362	    0.00302	    0.00259	    0.00275	    0.00258	    0.00180
                      9	    0.00468	    0.00404	    0.00346	    0.00320	    0.00302	    0.00289	    0.00253
                     15	    0.00545	    0.00427	    0.00393	    0.00378	    0.00311	    0.00299	    0.00321
                     22	    0.00509	    0.00571	    0.00447	    0.00413	    0.00440	    0.00471	    0.00565
                     45	    0.00654	    0.00351	    0.00256	    0.00182	    0.00113	    0.00046	  -0.00113
                     60	    0.00031	  -0.00120	  -0.00041	  -0.00111	  -0.00223	  -0.00249	  -0.00483
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              </tableData>
              <tableData breakPoint="-15">
                              -10	        -5	        -2	         0	         2	         5	        10
                    -10	    0.00268	    0.00113	    0.00078	    0.00086	    0.00094	    0.00136	    0.00155
                      3	    0.00430	    0.00341	    0.00283	    0.00241	    0.00256	    0.00239	    0.00163
                      9	    0.00443	    0.00381	    0.00325	    0.00299	    0.00282	    0.00267	    0.00232
                     15	    0.00520	    0.00405	    0.00371	    0.00354	    0.00287	    0.00275	    0.00294
                     22	    0.00475	    0.00539	    0.00420	    0.00387	    0.00397	    0.00430	    0.00602
                     45	    0.00637	    0.00339	    0.00244	    0.00170	    0.00104	    0.00037	  -0.00129
                     60	    0.00038	  -0.00110	  -0.00035	  -0.00111	  -0.00220	  -0.00234	  -0.00464
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              </tableData>
              <tableData breakPoint="-10">
                              -10	        -5	        -2	         0	         2	         5	        10
                    -10	    0.00189	    0.00063	    0.00042	    0.00053	    0.00065	    0.00094	    0.00090
                      3	    0.00313	    0.00235	    0.00188	    0.00156	    0.00163	    0.00144	    0.00078
                      9	    0.00316	    0.00264	    0.00219	    0.00195	    0.00177	    0.00157	    0.00128
                     15	    0.00390	    0.00290	    0.00261	    0.00233	    0.00170	    0.00154	    0.00158
                     22	    0.00330	    0.00403	    0.00300	    0.00260	    0.00274	    0.00232	    0.00367
                     45	    0.00552	    0.00274	    0.00179	    0.00117	    0.00050	  -0.00015	  -0.00222
                     60	    0.00074	  -0.00076	    0.00001	  -0.00067	  -0.00144	  -0.00163	  -0.00384
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              </tableData>
              <tableData breakPoint="-5">
                              -10	        -5	        -2	         0	         2	         5	        10
                    -10	    0.00106	    0.00014	    0.00010	    0.00024	    0.00039	    0.00060	    0.00030
                      3	    0.00195	    0.00130	    0.00095	    0.00074	    0.00073	    0.00053	  -0.00004
                      9	    0.00191	    0.00156	    0.00115	    0.00094	    0.00074	    0.00054	    0.00030
                     15	    0.00240	    0.00184	    0.00154	    0.00114	    0.00057	    0.00036	    0.00029
                     22	    0.00161	    0.00240	    0.00156	    0.00128	    0.00124	    0.00072	    0.00188
                     45	    0.00466	    0.00211	    0.00115	    0.00056	  -0.00004	  -0.00077	  -0.00307
                     60	    0.00106	    0.00013	    0.00035	  -0.00032	  -0.00096	  -0.00102	  -0.00334
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              </tableData>
              <tableData breakPoint="0">
                              -10	        -5	        -2	         0	         2	         5	        10
                    -10	    0.00022	  -0.00031	  -0.00018	    0.00000	    0.00018	    0.00031	  -0.00022
                      3	    0.00081	    0.00032	    0.00010	    0.00000	  -0.00011	  -0.00032	  -0.00080
                      9	    0.00065	    0.00048	    0.00018	    0.00000	  -0.00018	  -0.00048	  -0.00065
                     15	    0.00090	    0.00075	    0.00049	    0.00000	  -0.00049	  -0.00075	  -0.00090
                     22	  -0.00004	    0.00082	    0.00019	  -0.00001	  -0.00019	  -0.00080	    0.00003
                     45	    0.00379	    0.00130	    0.00058	    0.00000	  -0.00057	  -0.00133	  -0.00390
                     60	    0.00134	    0.00048	    0.00067	    0.00000	  -0.00068	  -0.00051	  -0.00135
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              </tableData>
              <tableData breakPoint="5">
                              -10	        -5	        -2	         0	         2	         5	        10
                    -10	  -0.00063	  -0.00067	  -0.00041	  -0.00016	    0.00006	    0.00009	  -0.00063
                      3	  -0.00026	  -0.00058	  -0.00066	  -0.00064	  -0.00086	  -0.00108	  -0.00148
                      9	  -0.00058	  -0.00052	  -0.00071	  -0.00083	  -0.00105	  -0.00134	  -0.00143
                     15	  -0.00067	    0.00020	  -0.00016	  -0.00129	  -0.00189	  -0.00134	  -0.00157
                     22	  -0.00168	  -0.00058	  -0.00116	  -0.00123	  -0.00149	  -0.00224	  -0.00172
                     45	    0.00304	    0.00069	    0.00001	  -0.00054	  -0.00112	  -0.00186	  -0.00462
                     60	    0.00157	    0.00087	    0.00095	    0.00019	  -0.00036	  -0.00005	  -0.00080
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              </tableData>
              <tableData breakPoint="10">
                              -10	        -5	        -2	         0	         2	         5	        10
                    -10	  -0.00139	  -0.00097	  -0.00055	  -0.00026	    0.00001	  -0.00003	  -0.00096
                      3	  -0.00120	  -0.00133	  -0.00130	  -0.00117	  -0.00149	  -0.00172	  -0.00202
                      9	  -0.00169	  -0.00141	  -0.00143	  -0.00159	  -0.00176	  -0.00209	  -0.00211
                     15	  -0.00181	  -0.00053	  -0.00047	  -0.00141	  -0.00206	  -0.00296	  -0.00282
                     22	  -0.00321	  -0.00217	  -0.00240	  -0.00235	  -0.00265	  -0.00362	  -0.00277
                     45	    0.00231	    0.00015	  -0.00047	  -0.00106	  -0.00156	  -0.00237	  -0.00526
                     60	    0.00177	    0.00113	    0.00120	    0.00041	  -0.00032	    0.00037	    0.00034
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              </tableData>
              <tableData breakPoint="13">
                              -10	        -5	        -2	         0	         2	         5	        10
                    -10	  -0.00182	  -0.00111	  -0.00055	  -0.00027	    0.00003	  -0.00007	  -0.00111
                      3	  -0.00170	  -0.00173	  -0.00160	  -0.00143	  -0.00181	  -0.00203	  -0.00228
                      9	  -0.00229	  -0.00189	  -0.00181	  -0.00196	  -0.00213	  -0.00249	  -0.00246
                     15	  -0.00219	  -0.00035	  -0.00018	  -0.00219	  -0.00169	  -0.00318	  -0.00318
                     22	  -0.00419	  -0.00301	  -0.00318	  -0.00296	  -0.00328	  -0.00432	  -0.00366
                     45	    0.00193	  -0.00012	  -0.00071	  -0.00132	  -0.00182	  -0.00263	  -0.00559
                     60	    0.00183	    0.00126	    0.00134	    0.00047	  -0.00020	    0.00055	    0.00055
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              </tableData>
              <tableData breakPoint="16">
                              -10	        -5	        -2	         0	         2	         5	        10
                    -10	  -0.00222	  -0.00123	  -0.00052	  -0.00026	    0.00006	  -0.00008	  -0.00122
                      3	  -0.00215	  -0.00207	  -0.00187	  -0.00164	  -0.00208	  -0.00230	  -0.00250
                      9	  -0.00286	  -0.00232	  -0.00214	  -0.00229	  -0.00245	  -0.00284	  -0.00277
                     15	  -0.00317	  -0.00126	  -0.00089	  -0.00184	  -0.00229	  -0.00321	  -0.00350
                     22	  -0.00501	  -0.00379	  -0.00383	  -0.00364	  -0.00384	  -0.00493	  -0.00434
                     45	    0.00159	  -0.00038	  -0.00092	  -0.00153	  -0.00207	  -0.00286	  -0.00592
                     60	    0.00190	    0.00137	    0.00145	    0.00056	  -0.00011	    0.00069	    0.00073
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              </tableData>
          </table>
       </product>
    </function>
    <function name="aero/c/CMNDRDr">
    <description>YAWING MOMENT DUE TO RUDDER DEFLECTION</description>
    <product>
          <table>
            <independentVar lookup="row">aero/alpha-deg</independentVar>
            <independentVar lookup="column">aero/beta-deg</independentVar>
            <independentVar lookup="table">fcs/rudder-pos-deg</independentVar>
              <tableData breakPoint="-25">
                              -10	        -5	        -2	         0	         2	         5	        10
                    -10	  -0.02969	  -0.02914	  -0.02778	  -0.02695	  -0.02652	  -0.02694	  -0.02897
                      3	  -0.02598	  -0.02468	  -0.02369	  -0.02356	  -0.02303	  -0.02334	  -0.02492
                      9	  -0.02366	  -0.02260	  -0.02103	  -0.02079	  -0.02037	  -0.02123	  -0.02304
                     15	  -0.02239	  -0.01988	  -0.01919	  -0.02095	  -0.01902	  -0.01934	  -0.02120
                     22	  -0.01912	  -0.01798	  -0.01669	  -0.01584	  -0.01682	  -0.01851	  -0.01786
                     45	  -0.00703	  -0.00654	  -0.00616	  -0.00614	  -0.00622	  -0.00693	  -0.00862
                     60	  -0.00044	  -0.00069	  -0.00085	  -0.00097	  -0.00107	  -0.00126	  -0.00163
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              </tableData>
              <tableData breakPoint="-15">
                              -10	        -5	        -2	         0	         2	         5	        10
                    -10	  -0.01954	  -0.01839	  -0.01771	  -0.01724	  -0.01707	  -0.01749	  -0.01885
                      3	  -0.01687	  -0.01568	  -0.01519	  -0.01514	  -0.01485	  -0.01512	  -0.01623
                      9	  -0.01521	  -0.01438	  -0.01350	  -0.01338	  -0.01315	  -0.01379	  -0.01499
                     15	  -0.01489	  -0.01268	  -0.01221	  -0.01351	  -0.01210	  -0.01283	  -0.01393
                     22	  -0.01226	  -0.01157	  -0.01073	  -0.01025	  -0.01083	  -0.01179	  -0.01155
                     45	  -0.00473	  -0.00430	  -0.00398	  -0.00398	  -0.00401	  -0.00445	  -0.00549
                     60	  -0.00043	  -0.00051	  -0.00058	  -0.00063	  -0.00067	  -0.00075	  -0.00092
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              </tableData>
              <tableData breakPoint="-5">
                              -10	        -5	        -2	         0	         2	         5	        10
                    -10	  -0.00670	  -0.00617	  -0.00598	  -0.00588	  -0.00587	  -0.00607	  -0.00657
                      3	  -0.00577	  -0.00531	  -0.00517	  -0.00519	  -0.00511	  -0.00524	  -0.00567
                      9	  -0.00531	  -0.00487	  -0.00460	  -0.00459	  -0.00453	  -0.00479	  -0.00523
                     15	  -0.00490	  -0.00431	  -0.00394	  -0.00465	  -0.00415	  -0.00494	  -0.00486
                     22	  -0.00422	  -0.00406	  -0.00375	  -0.00353	  -0.00365	  -0.00408	  -0.00417
                     45	  -0.00156	  -0.00151	  -0.00138	  -0.00139	  -0.00138	  -0.00152	  -0.00190
                     60	  -0.00021	  -0.00020	  -0.00022	  -0.00022	  -0.00022	  -0.00024	  -0.00026
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              </tableData>
              <tableData breakPoint="0">
                              -10	        -5	        -2	         0	         2	         5	        10
                    -10	    0.00000	    0.00000	    0.00000	    0.00000	    0.00000	    0.00000	    0.00000
                      3	    0.00000	    0.00000	    0.00000	    0.00000	  -0.00001	    0.00000	    0.00000
                      9	    0.00000	    0.00000	    0.00000	    0.00000	    0.00000	    0.00000	    0.00000
                     15	    0.00000	  -0.00001	    0.00000	    0.00000	    0.00000	    0.00000	    0.00000
                     22	    0.00000	    0.00000	    0.00000	    0.00000	    0.00000	    0.00000	    0.00000
                     45	    0.00000	    0.00000	    0.00000	  -0.00001	    0.00000	    0.00000	    0.00000
                     60	    0.00000	    0.00000	    0.00000	    0.00000	    0.00000	    0.00000	    0.00000
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              </tableData>
              <tableData breakPoint="5">
                              -10	        -5	        -2	         0	         2	         5	        10
                    -10	    0.00657	    0.00607	    0.00587	    0.00588	    0.00598	    0.00617	    0.00669
                      3	    0.00567	    0.00524	    0.00510	    0.00519	    0.00516	    0.00531	    0.00577
                      9	    0.00523	    0.00480	    0.00453	    0.00459	    0.00460	    0.00487	    0.00531
                     15	    0.00486	    0.00494	    0.00416	    0.00465	    0.00394	    0.00431	    0.00490
                     22	    0.00416	    0.00408	    0.00365	    0.00353	    0.00374	    0.00406	    0.00422
                     45	    0.00182	    0.00152	    0.00138	    0.00136	    0.00138	    0.00151	    0.00165
                     60	    0.00026	    0.00024	    0.00022	    0.00022	    0.00021	    0.00020	    0.00021
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              </tableData>
              <tableData breakPoint="15">
                              -10	        -5	        -2	         0	         2	         5	        10
                    -10	    0.01885	    0.01749	    0.01708	    0.01725	    0.01771	    0.01839	    0.01958
                      3	    0.01623	    0.01512	    0.01484	    0.01514	    0.01518	    0.01568	    0.01687
                      9	    0.01499	    0.01379	    0.01315	    0.01338	    0.01350	    0.01438	    0.01521
                     15	    0.01393	    0.01284	    0.01210	    0.01351	    0.01221	    0.01268	    0.01489
                     22	    0.01155	    0.01179	    0.01083	    0.01025	    0.01073	    0.01157	    0.01226
                     45	    0.00541	    0.00444	    0.00400	    0.00396	    0.00396	    0.00430	    0.00466
                     60	    0.00092	    0.00075	    0.00067	    0.00063	    0.00058	    0.00051	    0.00043
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              </tableData>
              <tableData breakPoint="25">
                              -10	        -5	        -2	         0	         2	         5	        10
                    -10	    0.02897	    0.02694	    0.02652	    0.02695	    0.02778	    0.02914	    0.02969
                      3	    0.02492	    0.02335	    0.02302	    0.02356	    0.02368	    0.02467	    0.02598
                      9	    0.02304	    0.02123	    0.02037	    0.02079	    0.02104	    0.02260	    0.02366
                     15	    0.02120	    0.01934	    0.01902	    0.02095	    0.01919	    0.01988	    0.02239
                     22	    0.01786	    0.01851	    0.01682	    0.01585	    0.01669	    0.01798	    0.01912
                     45	    0.00854	    0.00692	    0.00621	    0.00611	    0.00614	    0.00653	    0.00695
                     60	    0.00163	    0.00126	    0.00107	    0.00097	    0.00085	    0.00069	    0.00044
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              </tableData>
          </table>
       </product>
    </function>
    <function name="aero/c/CMNDSBL">
    <description>YAW MOMENT DUE TO LOWER SPEEDBRAKE DEFLECTION</description>
    <product>
          <table>
            <independentVar lookup="row">aero/alpha-deg</independentVar>
            <independentVar lookup="column">fcs/airbrake-upper</independentVar>
            <tableData>
                                  0	          5	         10	         15	         20	         25	         30	         35	         40	         45	         50	         55
                    -10	    0.00000	    0.00000	  -0.00001	  -0.00001	  -0.00001	    0.00001	    0.00001	    0.00018	    0.00022	    0.00025	    0.00027	    0.00024
                      3	    0.00001	  -0.00006	  -0.00013	  -0.00021	  -0.00030	  -0.00037	  -0.00043	  -0.00047	  -0.00049	  -0.00050	  -0.00051	  -0.00050
                      9	    0.00007	  -0.00014	  -0.00036	  -0.00058	  -0.00080	  -0.00101	  -0.00117	  -0.00129	  -0.00138	  -0.00143	  -0.00145	  -0.00142
                     15	    0.00008	  -0.00007	  -0.00023	  -0.00039	  -0.00056	  -0.00032	  -0.00041	  -0.00079	  -0.00081	  -0.00082	  -0.00081	  -0.00081
                     22	    0.00005	  -0.00001	  -0.00007	  -0.00015	  -0.00023	  -0.00032	  -0.00038	  -0.00041	  -0.00042	  -0.00042	  -0.00043	  -0.00043
                     45	    0.00018	    0.00007	  -0.00004	  -0.00015	  -0.00027	  -0.00039	  -0.00051	  -0.00059	  -0.00064	  -0.00066	  -0.00066	  -0.00066
                     60	    0.00033	    0.00021	    0.00008	  -0.00005	  -0.00019	  -0.00032	  -0.00044	  -0.00055	  -0.00063	  -0.00067	  -0.00068	  -0.00066
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            </tableData>
          </table>
       </product>
    </function>
    <function name="aero/c/CMNDSBU">
    <description>YAW MOMENT DUE TO UPPER SPEEDBRAKE DEFLECTION</description>
    <product>
          <table>
            <independentVar lookup="row">aero/alpha-deg</independentVar>
            <independentVar lookup="column">fcs/airbrake-lower</independentVar>
            <tableData>
                                  0	          5	         11	         17	         22	         28	         34	         39	         45	         50	         56	         62	         67
                    -10	    0.00000	  -0.00002	  -0.00008	  -0.00019	  -0.00024	  -0.00024	  -0.00043	  -0.00049	  -0.00041	  -0.00042	  -0.00040	  -0.00046	  -0.00023
                      3	    0.00001	    0.00007	    0.00008	    0.00010	    0.00013	    0.00021	    0.00033	    0.00025	    0.00008	    0.00003	    0.00007	    0.00031	    0.00026
                      9	    0.00006	    0.00025	    0.00044	    0.00060	    0.00070	    0.00076	    0.00078	    0.00079	    0.00080	    0.00080	    0.00079	    0.00078	    0.00077
                     15	    0.00007	    0.00021	    0.00036	    0.00049	    0.00057	    0.00065	    0.00071	    0.00074	    0.00077	    0.00077	    0.00076	    0.00073	    0.00068
                     22	    0.00005	    0.00011	    0.00019	    0.00026	    0.00032	    0.00036	    0.00038	    0.00038	    0.00039	    0.00039	    0.00039	    0.00038	    0.00037
                     45	    0.00016	    0.00026	    0.00036	    0.00045	    0.00050	    0.00054	    0.00054	    0.00055	    0.00055	    0.00055	    0.00055	    0.00054	    0.00053
                     60	    0.00031	    0.00041	    0.00051	    0.00059	    0.00062	    0.00064	    0.00065	    0.00065	    0.00065	    0.00065	    0.00065	    0.00065	    0.00065
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            </tableData>
          </table>
       </product>
    </function>
    <function name="aero/c/CMNDSD1L">
    <description>YAW MOMENT DUE TO LE SLAT 1L</description>
    <product>
          <table>
            <independentVar lookup="row">aero/alpha-deg</independentVar>
            <independentVar lookup="column">fcs/slat-1L-pos-deg</independentVar>
            <tableData>
                                -17	        -14	        -10	         -7	         -3	          0	          3	          7	         10	         14	         17
                    -10	  -0.00039	  -0.00033	  -0.00024	  -0.00017	  -0.00007	    0.00000	    0.00007	    0.00017	    0.00023	    0.00032	    0.00038
                      3	    0.00019	    0.00016	    0.00012	    0.00008	    0.00004	    0.00000	  -0.00004	  -0.00008	  -0.00012	  -0.00017	  -0.00020
                      9	    0.00055	    0.00046	    0.00034	    0.00024	    0.00010	    0.00000	  -0.00010	  -0.00024	  -0.00034	  -0.00047	  -0.00056
                     15	    0.00130	    0.00109	    0.00079	    0.00056	    0.00024	    0.00000	  -0.00024	  -0.00055	  -0.00045	  -0.00095	  -0.00108
                     22	    0.00223	    0.00184	    0.00131	    0.00092	    0.00038	    0.00000	  -0.00036	  -0.00082	  -0.00113	  -0.00152	  -0.00178
                     45	    0.00196	    0.00159	    0.00110	    0.00075	    0.00031	    0.00002	  -0.00026	  -0.00059	  -0.00080	  -0.00103	  -0.00116
                     60	    0.00134	    0.00107	    0.00072	    0.00048	    0.00019	    0.00000	  -0.00016	  -0.00034	  -0.00044	  -0.00053	  -0.00058
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            </tableData>
          </table>
       </product>
    </function>
    <function name="aero/c/CMNDSD1R">
    <description>YAW MOMENT DUE TO LE SLAT 1R</description>
    <product>
          <table>
            <independentVar lookup="row">aero/alpha-deg</independentVar>
            <independentVar lookup="column">fcs/slat-1R-pos-deg</independentVar>
            <tableData>
                                -17	        -14	        -10	         -7	         -3	          0	          3	          7	         10	         14	         17
                    -10	    0.00039	    0.00033	    0.00024	    0.00017	    0.00007	    0.00000	  -0.00007	  -0.00017	  -0.00023	  -0.00032	  -0.00038
                      3	  -0.00019	  -0.00016	  -0.00012	  -0.00008	  -0.00004	    0.00000	    0.00004	    0.00008	    0.00012	    0.00017	    0.00020
                      9	  -0.00055	  -0.00046	  -0.00034	  -0.00024	  -0.00010	    0.00000	    0.00010	    0.00024	    0.00034	    0.00047	    0.00056
                     15	  -0.00130	  -0.00109	  -0.00079	  -0.00056	  -0.00024	    0.00000	    0.00024	    0.00055	    0.00045	    0.00095	    0.00108
                     22	  -0.00223	  -0.00184	  -0.00131	  -0.00092	  -0.00038	    0.00000	    0.00036	    0.00082	    0.00113	    0.00152	    0.00178
                     45	  -0.00196	  -0.00159	  -0.00110	  -0.00075	  -0.00031	  -0.00002	    0.00026	    0.00059	    0.00080	    0.00103	    0.00116
                     60	  -0.00134	  -0.00107	  -0.00072	  -0.00048	  -0.00019	    0.00000	    0.00016	    0.00034	    0.00044	    0.00053	    0.00058
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            </tableData>
          </table>
       </product>
    </function>
    <function name="aero/c/CMNDSD2L">
    <description>YAW MOMENT DUE TO LE SLAT 2L</description>
    <product>
          <table>
            <independentVar lookup="row">aero/alpha-deg</independentVar>
            <independentVar lookup="column">fcs/slat-2L-pos-deg</independentVar>
            <tableData>
                                -17	        -14	        -10	         -7	         -3	          0	          3	          7	         10	         14	         17
                    -10	  -0.00064	  -0.00053	  -0.00039	  -0.00028	  -0.00012	    0.00000	    0.00012	    0.00028	    0.00039	    0.00054	    0.00064
                      3	    0.00013	    0.00011	    0.00008	    0.00006	    0.00002	    0.00000	  -0.00002	  -0.00006	  -0.00008	  -0.00011	  -0.00013
                      9	    0.00060	    0.00051	    0.00037	    0.00026	    0.00011	    0.00000	  -0.00011	  -0.00026	  -0.00036	  -0.00050	  -0.00060
                     15	    0.00143	    0.00125	    0.00090	    0.00063	    0.00027	    0.00000	  -0.00026	  -0.00050	  -0.00073	  -0.00102	  -0.00122
                     22	    0.00185	    0.00152	    0.00108	    0.00075	    0.00031	    0.00000	  -0.00030	  -0.00068	  -0.00094	  -0.00126	  -0.00146
                     45	    0.00136	    0.00110	    0.00077	    0.00053	    0.00022	    0.00001	  -0.00019	  -0.00041	  -0.00055	  -0.00071	  -0.00081
                     60	    0.00080	    0.00064	    0.00044	    0.00029	    0.00012	    0.00000	  -0.00010	  -0.00021	  -0.00027	  -0.00033	  -0.00036
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            </tableData>
          </table>
       </product>
    </function>
    <function name="aero/c/CMNDSD2R">
    <description>YAW MOMENT DUE TO LE SLAT 2R</description>
    <product>
          <table>
            <independentVar lookup="row">aero/alpha-deg</independentVar>
            <independentVar lookup="column">fcs/slat-2R-pos-deg</independentVar>
            <tableData>
                                -17	        -14	        -10	         -7	         -3	          0	          3	          7	         10	         14	         17
                    -10	    0.00064	    0.00053	    0.00039	    0.00028	    0.00012	    0.00000	  -0.00012	  -0.00028	  -0.00039	  -0.00054	  -0.00064
                      3	  -0.00013	  -0.00011	  -0.00008	  -0.00006	  -0.00002	    0.00000	    0.00002	    0.00006	    0.00008	    0.00011	    0.00013
                      9	  -0.00060	  -0.00051	  -0.00037	  -0.00026	  -0.00011	    0.00000	    0.00011	    0.00026	    0.00036	    0.00050	    0.00060
                     15	  -0.00143	  -0.00125	  -0.00090	  -0.00063	  -0.00027	    0.00000	    0.00026	    0.00050	    0.00073	    0.00102	    0.00122
                     22	  -0.00185	  -0.00152	  -0.00108	  -0.00075	  -0.00031	    0.00000	    0.00030	    0.00068	    0.00094	    0.00126	    0.00146
                     45	  -0.00136	  -0.00110	  -0.00077	  -0.00053	  -0.00022	  -0.00001	    0.00019	    0.00041	    0.00055	    0.00071	    0.00081
                     60	  -0.00080	  -0.00064	  -0.00044	  -0.00029	  -0.00012	    0.00000	    0.00010	    0.00021	    0.00027	    0.00033	    0.00036
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            </tableData>
          </table>
       </product>
    </function>
    <function name="aero/c/CMNGEAR">
    <description>YAWING MOMENT INCREMENT DUE TO GEAR</description>
    <product>
          <property>gear/gear-pos-norm</property>
          <table>
            <independentVar lookup="row">aero/alpha-deg</independentVar>
            <tableData>
                    -10		  -0.00001
                     -5		   0.00000
                      3		    0.00000
                      8		    0.00002
                     13		  -0.00005
                     18		  -0.00004
                     25		    0.00006
                     35		  -0.00007
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            </tableData>
          </table>
       </product>
    </function>
    <function name="aero/c/CMNmnw">
    <description>YAW DUE TO MACH</description>
    <product>
          <table>
            <independentVar lookup="row">velocities/mach</independentVar>
            <independentVar lookup="column">aero/alpha-deg</independentVar>
            <tableData>
                                -10	         -1	       0.01	          1	         10
                    0.2	    0.00000	    0.00000	    0.00000	    0.00000	    0.00000
                    0.8	    0.00000	    0.00000	    0.00000	    0.00000	    0.00000
                   0.99	    0.00000	    0.00000	    0.00000	    0.00000	    0.00000
                    1.3	  -0.00024	    0.00000	    0.00003	  -0.00006	    0.00003
                    1.6	    0.00000	  -0.00001	    0.00002	    0.00000	    0.00000
                    2.2	    0.00054	    0.00002	  -0.00002	  -0.00002	    0.00027
                    2.5	    0.00001	    0.00000	  -0.00002	  -0.00003	  -0.00034
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            </tableData>
          </table>
       </product>
    </function>
    <function name="aero/c/CMNP">
    <description>YAWING MOMENT DUE TO ROLL RATE</description>
    <product>
          <property>aero/pb</property>
          <table>
            <independentVar lookup="row">aero/alpha-deg</independentVar>
            <tableData>
                    -10		    0.04814
                     -5		    0.05538
                      4		    0.01421
                     10		    0.01274
                     16		    0.07602
                     24		    0.09963
                     50		    0.15438
                     60		    0.14540
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            </tableData>
          </table>
       </product>
    </function>
    <function name="aero/c/CMNR">
    <description>YAW DAMPING DERIVATIVE</description>
    <product>
          <property>aero/rb</property>
          <table>
            <independentVar lookup="row">aero/alpha-deg</independentVar>
            <tableData>
                    -10		  -0.16737
                     -5		  -0.16087
                      4		  -0.16299
                     10		  -0.15334
                     16		  -0.19924
                     24		  -0.15876
                     50		  -0.08257
                     60		  -0.05742
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            </tableData>
          </table>
       </product>
    </function>
    <function name="aero/coefficients/CLIFT">
      <sum>
          <property>aero/c/CFZB</property>
          <property>aero/c/CFZDED1L</property>
          <property>aero/c/CFZDED1R</property>
          <property>aero/c/CFZDE2L</property>
          <property>aero/c/CFZDE2R</property>
          <property>aero/c/CFZDSD1L</property>
          <property>aero/c/CFZDSD1R</property>
          <property>aero/c/CFZDSBU</property>
          <property>aero/c/CFZDEL</property>
          <property>aero/c/CFZGEAR</property>
          <property>aero/c/CFZmn</property>
       </sum>
    </function>
  <axis name="LIFT">
    <function name="aero/force/LIFT">
    <product>
          <property>aero/qbar-psf</property>
          <property>metrics/Sw-sqft</property>
          <property>aero/coefficients/CLIFT</property>
       </product>
    </function>
  </axis>
    <function name="aero/coefficients/CDRAG">
      <sum>
          <property>aero/c/CFXB</property>
          <property>aero/c/CFXDED1L</property>
          <property>aero/c/CFXDED1R</property>
          <property>aero/c/CFXDED2L</property>
          <property>aero/c/CFXDED2R</property>
          <property>aero/c/CFXDSD1L</property>
          <property>aero/c/CFXDSD1R</property>
          <property>aero/c/CFXDSD2L</property>
          <property>aero/c/CFXDSD2R</property>
          <property>aero/c/CFXDSBU</property>
          <property>aero/c/CFXDSBL</property>
          <property>aero/c/CFXGEAR</property>
          <property>aero/c/CFXmn</property>
       </sum>
    </function>
  <axis name="DRAG">
    <function name="aero/force/DRAG">
    <product>
          <property>aero/qbar-psf</property>
          <property>metrics/Sw-sqft</property>
          <property>aero/coefficients/CDRAG</property>
       </product>
    </function>
  </axis>
    <function name="aero/coefficients/CSIDE">
      <sum>
          <property>aero/c/CFYB</property>
          <property>aero/c/CFYP</property>
          <property>aero/c/CFYR</property>
          <property>aero/c/CFYDED1L</property>
          <property>aero/c/CFYDED1R</property>
          <property>aero/c/CFYDED2L</property>
          <property>aero/c/CFYDED2R</property>
          <property>aero/c/CFYDRD</property>
          <property>aero/c/CFYDSD1L</property>
          <property>aero/c/CFYDSD1R</property>
          <property>aero/c/CFYDSD2L</property>
          <property>aero/c/CFYDSD2R</property>
          <property>aero/c/CFYDSBU</property>
          <property>aero/c/CFYDSBL</property>
          <property>aero/c/CFYGEAR</property>
          <property>aero/c/CFYmn</property>
       </sum>
    </function>
  <axis name="SIDE">
    <function name="aero/force/SIDE">
    <product>
          <property>aero/qbar-psf</property>
          <property>metrics/Sw-sqft</property>
          <property>aero/coefficients/CSIDE</property>
       </product>
    </function>
  </axis>
    <function name="aero/coefficients/CROLL">
      <sum>
          <property>aero/c/CML1</property>
          <property>aero/c/CMLP</property>
          <property>aero/c/CMLR</property>
          <property>aero/c/CMLBETADOT</property>
          <property>aero/c/CMLDED1L</property>
          <property>aero/c/CMLDED1R</property>
          <property>aero/c/CMLDED2L</property>
          <property>aero/c/CMLDED2R</property>
          <property>aero/c/CMLDRD</property>
          <property>aero/c/CMLDSD1L</property>
          <property>aero/c/CMLDSD1R</property>
          <property>aero/c/CMLDSD2L</property>
          <property>aero/c/CMLDSD2R</property>
          <property>aero/c/CMLDSBU</property>
          <property>aero/c/CMLDSBL</property>
          <property>aero/c/CMLGEAR</property>
          <property>aero/c/CMLmnw</property>
       </sum>
    </function>
  <axis name="ROLL">
    <function name="aero/force/ROLL">
    <product>
          <property>aero/qbar-psf</property>
          <property>metrics/Sw-sqft</property>
          <property>metrics/bw-ft</property>
          <property>aero/coefficients/CROLL</property>
       </product>
    </function>
  </axis>
    <function name="aero/coefficients/CPITCH">
      <sum>
          <property>aero/c/CMM1</property>
          <property>aero/c/CMMQ</property>
          <property>aero/c/CMMALPHADOT</property>
          <property>aero/c/CMMBETADOT</property>
          <property>aero/c/CMMDED1L</property>
          <property>aero/c/CMMDED1R</property>
          <property>aero/c/CMMDED2L</property>
          <property>aero/c/CMMDED2R</property>
          <property>aero/c/CMMDSD1L</property>
          <property>aero/c/CMMDSD1R</property>
          <property>aero/c/CMMDSD2L</property>
          <property>aero/c/CMMDSD2R</property>
          <property>aero/c/CMMDSBU</property>
          <property>aero/c/CMMDSBL</property>
          <property>aero/c/CMMGEAR</property>
          <property>aero/c/CMMmnw</property>
       </sum>
    </function>
  <axis name="PITCH">
    <function name="aero/force/PITCH">
    <product>
          <property>aero/qbar-psf</property>
          <property>metrics/Sw-sqft</property>
          <property>metrics/cbarw-ft</property>
          <property>aero/coefficients/CPITCH</property>
       </product>
    </function>
  </axis>
    <function name="aero/coefficients/CYAW">
      <sum>
          <property>aero/c/CMN1</property>
          <property>aero/c/CMNBETADOT</property>
          <property>aero/c/CMNDED1L</property>
          <property>aero/c/CMNDED1R</property>
          <property>aero/c/CMNDED2L</property>
          <property>aero/c/CMNDED2R</property>
          <property>aero/c/CMNDSD1L</property>
          <property>aero/c/CMNDSD1R</property>
          <property>aero/c/CMNDSD2L</property>
          <property>aero/c/CMNDSD2R</property>
          <property>aero/c/CMNDSBU</property>
          <property>aero/c/CMNDSBL</property>
          <property>aero/c/CMNGEAR</property>
          <property>aero/c/CMNDRDr</property>
          <property>aero/c/CMNP</property>
          <property>aero/c/CMNR</property>
          <property>aero/c/CMNmnw</property>
       </sum>
    </function>
  <axis name="YAW">
    <function name="aero/force/YAW">
    <product>
          <property>aero/qbar-psf</property>
          <property>metrics/Sw-sqft</property>
          <property>metrics/bw-ft</property>
          <property>aero/coefficients/CYAW</property>
       </product>
    </function>
  </axis>
</aerodynamics>
    <output name="c:/temp/JSBOut.csv" type="CSV" rate="10">\n        <property>aero/alpha-deg</property>
        <property>aero/alphadot-rad_sec</property>
        <property>aero/beta-deg</property>
        <property>aero/betadot-rad_sec</property>
        <property>aero/bi2vel</property>
        <property>aero/c/CFXB</property>
        <property>aero/c/CFXDED1L</property>
        <property>aero/c/CFXDED1R</property>
        <property>aero/c/CFXDED2L</property>
        <property>aero/c/CFXDED2R</property>
        <property>aero/c/CFXDSBL</property>
        <property>aero/c/CFXDSBU</property>
        <property>aero/c/CFXDSD1L</property>
        <property>aero/c/CFXDSD1R</property>
        <property>aero/c/CFXDSD2L</property>
        <property>aero/c/CFXDSD2R</property>
        <property>aero/c/CFXGEAR</property>
        <property>aero/c/CFXmn</property>
        <property>aero/c/CFYB</property>
        <property>aero/c/CFYDED1L</property>
        <property>aero/c/CFYDED1R</property>
        <property>aero/c/CFYDED2L</property>
        <property>aero/c/CFYDED2R</property>
        <property>aero/c/CFYDRD</property>
        <property>aero/c/CFYDSBL</property>
        <property>aero/c/CFYDSBU</property>
        <property>aero/c/CFYDSD1L</property>
        <property>aero/c/CFYDSD1R</property>
        <property>aero/c/CFYDSD2L</property>
        <property>aero/c/CFYDSD2R</property>
        <property>aero/c/CFYGEAR</property>
        <property>aero/c/CFYmn</property>
        <property>aero/c/CFYP</property>
        <property>aero/c/CFYR</property>
        <property>aero/c/CFZB</property>
        <property>aero/c/CFZDE2L</property>
        <property>aero/c/CFZDE2R</property>
        <property>aero/c/CFZDED1L</property>
        <property>aero/c/CFZDED1R</property>
        <property>aero/c/CFZDEL</property>
        <property>aero/c/CFZDSBU</property>
        <property>aero/c/CFZDSD1L</property>
        <property>aero/c/CFZDSD1R</property>
        <property>aero/c/CFZGEAR</property>
        <property>aero/c/CFZmn</property>
        <property>aero/c/CML1</property>
        <property>aero/c/CMLBETADOT</property>
        <property>aero/c/CMLDED1L</property>
        <property>aero/c/CMLDED1R</property>
        <property>aero/c/CMLDED2L</property>
        <property>aero/c/CMLDED2R</property>
        <property>aero/c/CMLDRD</property>
        <property>aero/c/CMLDSBL</property>
        <property>aero/c/CMLDSBU</property>
        <property>aero/c/CMLDSD1L</property>
        <property>aero/c/CMLDSD1R</property>
        <property>aero/c/CMLDSD2L</property>
        <property>aero/c/CMLDSD2R</property>
        <property>aero/c/CMLGEAR</property>
        <property>aero/c/CMLmnw</property>
        <property>aero/c/CMLP</property>
        <property>aero/c/CMLR</property>
        <property>aero/c/CMM1</property>
        <property>aero/c/CMMALPHADOT</property>
        <property>aero/c/CMMBETADOT</property>
        <property>aero/c/CMMDED1L</property>
        <property>aero/c/CMMDED1R</property>
        <property>aero/c/CMMDED2L</property>
        <property>aero/c/CMMDED2R</property>
        <property>aero/c/CMMDSBL</property>
        <property>aero/c/CMMDSBU</property>
        <property>aero/c/CMMDSD1L</property>
        <property>aero/c/CMMDSD1R</property>
        <property>aero/c/CMMDSD2L</property>
        <property>aero/c/CMMDSD2R</property>
        <property>aero/c/CMMGEAR</property>
        <property>aero/c/CMMmnw</property>
        <property>aero/c/CMMQ</property>
        <property>aero/c/CMN1</property>
        <property>aero/c/CMNBETADOT</property>
        <property>aero/c/CMNDED1L</property>
        <property>aero/c/CMNDED1R</property>
        <property>aero/c/CMNDED2L</property>
        <property>aero/c/CMNDED2R</property>
        <property>aero/c/CMNDRDr</property>
        <property>aero/c/CMNDSBL</property>
        <property>aero/c/CMNDSBU</property>
        <property>aero/c/CMNDSD1L</property>
        <property>aero/c/CMNDSD1R</property>
        <property>aero/c/CMNDSD2L</property>
        <property>aero/c/CMNDSD2R</property>
        <property>aero/c/CMNGEAR</property>
        <property>aero/c/CMNmnw</property>
        <property>aero/c/CMNP</property>
        <property>aero/c/CMNR</property>
        <property>aero/ci2vel</property>
        <property>aero/coefficients/CDRAG</property>
        <property>aero/coefficients/CLIFT</property>
        <property>aero/coefficients/CPITCH</property>
        <property>aero/coefficients/CROLL</property>
        <property>aero/coefficients/CSIDE</property>
        <property>aero/coefficients/CYAW</property>
        <property>aero/pb</property>
        <property>aero/qb</property>
        <property>aero/rb</property>
        <property>fcs/airbrake-lower</property>
        <property>fcs/airbrake-upper</property>
        <property>fcs/elevon-1L-pos-deg</property>
        <property>fcs/elevon-1R-pos-deg</property>
        <property>fcs/elevon-2L-pos-deg</property>
        <property>fcs/elevon-2R-pos-deg</property>
        <property>fcs/rudder-pos-deg</property>
        <property>fcs/slat-1L-pos-deg</property>
        <property>fcs/slat-1R-pos-deg</property>
        <property>fcs/slat-2L-pos-deg</property>
        <property>fcs/slat-2R-pos-deg</property>
        <property>gear/gear-pos-norm</property>
        <property>velocities/mach</property>
    </output>
</fdm_config>
